<?xml version="1.0" encoding="UTF-8"?>
<neuroml xmlns="http://morphml.org/neuroml/schema" xmlns:meta="http://morphml.org/metadata/schema" xmlns:mml="http://morphml.org/morphml/schema" xmlns:bio="http://morphml.org/biophysics/schema" xmlns:cml="http://morphml.org/channelml/schema" xmlns:net="http://morphml.org/networkml/schema" xmlns:xsi="http://www.w3.org/2001/XMLSchema-instance" xsi:schemaLocation="http://morphml.org/neuroml/schema  NeuroML.xsd" lengthUnits="micron">
<cells>
    <cell name="Ca1">
    <mml:segments>
            <mml:segment id="1" name="basal_1" cable="1">
                <mml:proximal x="0.0" y="0.0" z="0.0" diameter="3.84"/>
                <mml:distal x="0" y="110" z="0" diameter="3.84"/>
            </mml:segment>
            <mml:segment id="2" name="basal_2"  parent="1" cable="2">
                  <mml:distal x="0" y="220" z="0" diameter="3.84"/>
            </mml:segment>
            <mml:segment id="3" name="basal_3"  parent="2" cable="3">
                <mml:distal x="0" y="330" z="0" diameter="3.84"/>
            </mml:segment>
            <mml:segment id="4" name="basal_4"  parent="3" cable="4">
                <mml:distal x="0" y="440" z="0" diameter="3.84"/>
            </mml:segment>
            <mml:segment id="5" name="basal_5"  parent="4" cable="5">
                <mml:distal x="0" y="550" z="0" diameter="3.84"/>
            </mml:segment>
            <mml:segment id="6" name="basal_6"  parent="5" cable="6">
                <mml:distal x="0" y="660" z="0" diameter="3.84"/>
            </mml:segment>
            <mml:segment id="7" name="basal_7"  parent="6" cable="7">
                <mml:distal x="0.0" y="770.0" z="0.0" diameter="3.84"/>
            </mml:segment>
            <mml:segment id="8" name="basal_8"  parent="7" cable="8">
                <mml:distal x="0.0" y="880.0" z="0.0" diameter="3.84"/>
            </mml:segment>
            <mml:segment id="0" name="soma"  parent="8" cable="0">
                <mml:distal x="0" y="1005" z="0" diameter="8.46"/>
            </mml:segment>
            <mml:segment id="9" name="apical_10"  parent="0" cable="9">
                <mml:distal x="0" y="1125" z="0" diameter="4"/>
            </mml:segment>
            <mml:segment id="10" name="apical_11"  parent="9" cable="10">
                <mml:distal x="0" y="1245" z="0" diameter="3"/>
            </mml:segment>
            <mml:segment id="11" name="apical_12"  parent="10" cable="11">
                <mml:distal x="0" y="1365" z="0" diameter="3"/>
            </mml:segment>
            <mml:segment id="12" name="apical_13"  parent="11" cable="12">
                <mml:distal x="0" y="1485" z="0" diameter="2.6"/>
            </mml:segment>
            <mml:segment id="13" name="apical_14"  parent="12" cable="13">
                <mml:distal x="0" y="1605" z="0" diameter="2.6"/>
            </mml:segment>
            <mml:segment id="14" name="apical_15"  parent="13" cable="14">
                <mml:distal x="0" y="1725" z="0" diameter="2.6"/>
            </mml:segment>
            <mml:segment id="15" name="apical_16"  parent="14" cable="15">
                <mml:distal x="0" y="1845" z="0" diameter="2.6"/>
            </mml:segment>
            <mml:segment id="16" name="apical_17"  parent="15" cable="16">
                <mml:distal x="0" y="1965" z="0" diameter="2.6"/>
            </mml:segment>
            <mml:segment id="17" name="apical_18"  parent="16" cable="17">
                <mml:distal x="0" y="2085" z="0" diameter="2.6"/>
            </mml:segment>
            <mml:segment id="18" name="apical_19"  parent="17" cable="18">
                <mml:distal x="0" y="2205" z="0" diameter="2.6"/>
            </mml:segment>
            <mml:segment id="19" name="lat_11_1"  parent="9" cable="19">
                <mml:distal x="-60" y="1185" z="0" diameter="2"/>
            </mml:segment>
            <mml:segment id="20" name="lat_11_2"  parent="19" cable="20">
                <mml:distal x="-120" y="1245" z="0" diameter="1.8"/>
            </mml:segment>
            <mml:segment id="21" name="lat_11_3"  parent="20" cable="21">
                <mml:distal x="-120" y="1325" z="0" diameter="1.5"/>
            </mml:segment>
            <mml:segment id="22" name="lat_11_4"  parent="21" cable="22">
                <mml:distal x="-120" y="1405" z="0" diameter="1.5"/>
            </mml:segment>
            <mml:segment id="23" name="lat_13_1"  parent="11" cable="23">
                <mml:distal x="40" y="1405" z="0" diameter="1"/>
            </mml:segment>
            <mml:segment id="24" name="lat_13_2"  parent="23" cable="24">
                <mml:distal x="80" y="1445" z="0" diameter="1"/>
            </mml:segment>
            <mml:segment id="25" name="lat_14_1"  parent="24" cable="25">
                <mml:distal x="80" y="1455" z="0" diameter="1"/>
            </mml:segment>
            <mml:segment id="26" name="lat_14_2"  parent="25" cable="26">
                <mml:distal x="80" y="1465" z="0" diameter="1"/>
            </mml:segment>
            <mml:segment id="27" name="lat_14_3"  parent="26" cable="27">
                <mml:distal x="80" y="1475" z="0" diameter="1"/>
            </mml:segment>
            <mml:segment id="28" name="lat_14_4"  parent="27" cable="28">
                <mml:distal x="80" y="1485" z="0" diameter="1"/>
            </mml:segment>
            <mml:segment id="29" name="lat_14_5"  parent="28" cable="29">
                <mml:distal x="80" y="1495" z="0" diameter="1"/>
            </mml:segment>
            <mml:segment id="30" name="lat_14_6"  parent="29" cable="30">
                <mml:distal x="80" y="1505" z="0" diameter="1"/>
            </mml:segment>
            <mml:segment id="31" name="lat_14_7"  parent="30" cable="31">
                <mml:distal x="80" y="1515" z="0" diameter="1"/>
            </mml:segment>
            <mml:segment id="32" name="lat_14_8"  parent="31" cable="32">
                <mml:distal x="80" y="1525" z="0" diameter="1"/>
            </mml:segment>
            <mml:segment id="33" name="lat_14_9"  parent="32" cable="33">
                <mml:distal x="80" y="1535" z="0" diameter="1"/>
            </mml:segment>
            <mml:segment id="34" name="lat_14_10"  parent="33" cable="34">
                <mml:distal x="80" y="1545" z="0" diameter="1"/>
            </mml:segment>
            <mml:segment id="35" name="lat_14_11"  parent="34" cable="35">
                <mml:distal x="80" y="1555" z="0" diameter="1"/>
            </mml:segment>
            <mml:segment id="36" name="lat_14_12"  parent="35" cable="36">
                <mml:distal x="80" y="1565" z="0" diameter="1"/>
            </mml:segment>
            <mml:segment id="37" name="lat_15_1"  parent="36" cable="37">
                <mml:distal x="80" y="1625" z="0" diameter="1"/>
            </mml:segment>
            <mml:segment id="38" name="lat_15_2"  parent="37" cable="38">
                <mml:distal x="80" y="1685" z="0" diameter="1"/>
            </mml:segment>
            <mml:segment id="39" name="spine_neck_14_1"  parent="25" cable="39">
                <mml:distal x="80.5" y="1455" z="0" diameter="0.1"/>
            </mml:segment>
            <mml:segment id="40" name="spine_head_14_1"  parent="39" cable="40">
                <mml:distal x="81" y="1455" z="0" diameter="0.5"/>
            </mml:segment>
            <mml:segment id="41" name="spine_neck_14_2"  parent="26" cable="41">
                <mml:distal x="80.5" y="1465" z="0" diameter="0.1"/>
            </mml:segment>
            <mml:segment id="42" name="spine_head_14_2"  parent="41" cable="42">
                <mml:distal x="81" y="1465" z="0" diameter="0.5"/>
            </mml:segment>
            <mml:segment id="43" name="spine_neck_14_3"  parent="27" cable="43">
                <mml:distal x="80.5" y="1475" z="0" diameter="0.1"/>
            </mml:segment>
            <mml:segment id="44" name="spine_head_14_3"  parent="43" cable="44">
                <mml:distal x="81" y="1475" z="0" diameter="0.5"/>
            </mml:segment>
             <mml:segment id="45" name="spine_neck_14_4"  parent="28" cable="45">
                <mml:distal x="80.5" y="1485" z="0" diameter="0.1"/>
            </mml:segment>
            <mml:segment id="46" name="spine_head_14_4"  parent="45" cable="46">
                <mml:distal x="81" y="1485" z="0" diameter="0.5"/>
            </mml:segment>
             <mml:segment id="47" name="spine_neck_14_5"  parent="29" cable="47">
                <mml:distal x="80.5" y="1495" z="0" diameter="0.1"/>
            </mml:segment>
            <mml:segment id="48" name="spine_head_14_5"  parent="47" cable="48">
                <mml:distal x="81" y="1495" z="0" diameter="0.5"/>
            </mml:segment>
             <mml:segment id="49" name="spine_neck_14_6"  parent="30" cable="49">
                <mml:distal x="80.5" y="1505" z="0" diameter="0.1"/>
            </mml:segment>
            <mml:segment id="50" name="spine_head_14_6"  parent="49" cable="50">
                <mml:distal x="81" y="1505" z="0" diameter="0.5"/>
            </mml:segment>
             <mml:segment id="51" name="spine_neck_14_7"  parent="31" cable="51">
                <mml:distal x="80.5" y="1515" z="0" diameter="0.1"/>
            </mml:segment>
            <mml:segment id="52" name="spine_head_14_7"  parent="51" cable="52">
                <mml:distal x="81" y="1515" z="0" diameter="0.5"/>
            </mml:segment>
             <mml:segment id="53" name="spine_neck_14_8"  parent="32" cable="53">
                <mml:distal x="80.5" y="1525" z="0" diameter="0.1"/>
            </mml:segment>
            <mml:segment id="54" name="spine_head_14_8"  parent="53" cable="54">
                <mml:distal x="81" y="1525" z="0" diameter="0.5"/>
            </mml:segment>
             <mml:segment id="55" name="spine_neck_14_9"  parent="33" cable="55">
                <mml:distal x="80.5" y="1535" z="0" diameter="0.1"/>
            </mml:segment>
            <mml:segment id="56" name="spine_head_14_9"  parent="55" cable="56">
                <mml:distal x="81" y="1535" z="0" diameter="0.5"/>
            </mml:segment>
             <mml:segment id="57" name="spine_neck_14_10"  parent="34" cable="57">
                <mml:distal x="80.5" y="1545" z="0" diameter="0.1"/>
            </mml:segment>
            <mml:segment id="58" name="spine_head_14_10"  parent="57" cable="58">
                <mml:distal x="81" y="1545" z="0" diameter="0.5"/>
            </mml:segment>
            <mml:segment id="59" name="spine_neck_14_11"  parent="35" cable="59">
                <mml:distal x="80.5" y="1555" z="0" diameter="0.1"/>
            </mml:segment>
            <mml:segment id="60" name="spine_head_14_11"  parent="59" cable="60">
                <mml:distal x="81" y="1555" z="0" diameter="0.5"/>
            </mml:segment>
            <mml:segment id="61" name="spine_neck_14_12"  parent="36" cable="61">
                <mml:distal x="80.5" y="1565" z="0" diameter="0.1"/>
            </mml:segment>
            <mml:segment id="62" name="spine_head_14_12"  parent="61" cable="62">
                <mml:distal x="81" y="1565" z="0" diameter="0.5"/>
            </mml:segment>
      </mml:segments>
      <mml:cables>
            <mml:cable id="0" name="Soma">
                <meta:group>all</meta:group>
                <meta:group>soma</meta:group>
            </mml:cable>
            <mml:cable id="1" name="basal_1">
                <meta:group>all</meta:group>
                <meta:group>basal_1</meta:group>
            </mml:cable>
	    <mml:cable id="2" name="basal_2">
                <meta:group>all</meta:group>
                <meta:group>basal_2</meta:group>
            </mml:cable>
	    <mml:cable id="3" name="basal_3">
                <meta:group>all</meta:group>
                <meta:group>basal_3</meta:group>
            </mml:cable>
	    <mml:cable id="4" name="basal_4">
                <meta:group>all</meta:group>
                <meta:group>basal_4</meta:group>
            </mml:cable>
	    <mml:cable id="5" name="basal_5">
                <meta:group>all</meta:group>
                <meta:group>basal_5</meta:group>
            </mml:cable>
	    <mml:cable id="6" name="basal_6">
                <meta:group>all</meta:group>
                <meta:group>basal_6</meta:group>
            </mml:cable>
	    <mml:cable id="7" name="basal_7">
                <meta:group>all</meta:group>
                <meta:group>basal_7</meta:group>
            </mml:cable>
	    <mml:cable id="8" name="basal_8">
                <meta:group>all</meta:group>
                <meta:group>basal_8</meta:group>
            </mml:cable>
            <mml:cable id="9" name="apical_10">
                <meta:group>all</meta:group>
                <meta:group>apical_10</meta:group>
            </mml:cable>
	    <mml:cable id="10" name="apical_11">
                <meta:group>all</meta:group>
                <meta:group>apical_11</meta:group>
            </mml:cable>
	    <mml:cable id="11" name="apical_12">
                <meta:group>all</meta:group>
                <meta:group>apical_12</meta:group>
            </mml:cable>
	    <mml:cable id="12" name="apical_13">
                <meta:group>all</meta:group>
                <meta:group>apical_13</meta:group>
            </mml:cable>
	    <mml:cable id="13" name="apical_14">
                <meta:group>all</meta:group>
                <meta:group>apical_14</meta:group>
            </mml:cable>
	    <mml:cable id="14" name="apical_15">
                <meta:group>all</meta:group>
                <meta:group>apical_15</meta:group>
            </mml:cable>
	    <mml:cable id="15" name="apical_16">
                <meta:group>all</meta:group>
                <meta:group>apical_16</meta:group>
            </mml:cable>
	    <mml:cable id="16" name="apical_17">
                <meta:group>all</meta:group>
                <meta:group>apical_17</meta:group>
            </mml:cable>
	    <mml:cable id="17" name="apical_18">
                <meta:group>all</meta:group>
                <meta:group>apical_18</meta:group>
            </mml:cable>
	    <mml:cable id="18" name="apical_19">
                <meta:group>all</meta:group>
                <meta:group>apical_19</meta:group>
            </mml:cable>
            <mml:cable id="19" name="lat_11_1">
                <meta:group>all</meta:group>
                <meta:group>lat_11_1</meta:group>
            </mml:cable>
	    <mml:cable id="20" name="lat_11_2">
                <meta:group>all</meta:group>
                <meta:group>lat_11_2</meta:group>
            </mml:cable>
	    <mml:cable id="21" name="lat_11_3">
                <meta:group>all</meta:group>
                <meta:group>lat_11_3</meta:group>
            </mml:cable>
	    <mml:cable id="22" name="lat_11_4">
                <meta:group>all</meta:group>
                <meta:group>lat_11_4</meta:group>
            </mml:cable>
	    <mml:cable id="23" name="lat_13_1">
                <meta:group>all</meta:group>
                <meta:group>lat_13_1</meta:group>
            </mml:cable>
	    <mml:cable id="24" name="lat_13_2">
                <meta:group>all</meta:group>
                <meta:group>lat_13_2</meta:group>
            </mml:cable>
	    <mml:cable id="25" name="lat_14_1">
                <meta:group>all</meta:group>
                <meta:group>lat_14_1</meta:group>
            </mml:cable>
	     <mml:cable id="26" name="lat_14_2">
                <meta:group>all</meta:group>
                <meta:group>lat_14_2</meta:group>
            </mml:cable>
	    <mml:cable id="27" name="lat_14_3">
                <meta:group>all</meta:group>
                <meta:group>lat_14_3</meta:group>
            </mml:cable>
	    <mml:cable id="28" name="lat_14_4">
                <meta:group>all</meta:group>
                <meta:group>lat_14_4</meta:group>
            </mml:cable>
	    <mml:cable id="29" name="lat_14_5">
                <meta:group>all</meta:group>
                <meta:group>lat_14_5</meta:group>
            </mml:cable>
	    <mml:cable id="30" name="lat_14_6">
                <meta:group>all</meta:group>
                <meta:group>lat_14_6</meta:group>
            </mml:cable>
	    <mml:cable id="31" name="lat_14_7">
                <meta:group>all</meta:group>
                <meta:group>lat_14_7</meta:group>
            </mml:cable>
	    <mml:cable id="32" name="lat_14_8">
                <meta:group>all</meta:group>
                <meta:group>lat_14_8</meta:group>
            </mml:cable>
	    <mml:cable id="33" name="lat_14_9">
                <meta:group>all</meta:group>
                <meta:group>lat_14_9</meta:group>
            </mml:cable>
	    <mml:cable id="34" name="lat_14_10">
                <meta:group>all</meta:group>
                <meta:group>lat_14_10</meta:group>
            </mml:cable>
	    <mml:cable id="35" name="lat_14_11">
                <meta:group>all</meta:group>
                <meta:group>lat_14_11</meta:group>
            </mml:cable>
            <mml:cable id="36" name="lat_14_12">
                <meta:group>all</meta:group>
                <meta:group>lat_14_12</meta:group>
            </mml:cable>
	    <mml:cable id="37" name="lat_15_1">
                <meta:group>all</meta:group>
                <meta:group>lat_15_1</meta:group>
            </mml:cable>
	    <mml:cable id="38" name="lat_15_2">
                <meta:group>all</meta:group>
                <meta:group>lat_15_2</meta:group>
            </mml:cable>
            <mml:cable id="39" name="spine_neck_14_1">
                <meta:group>all</meta:group>
                <meta:group>spine_neck_14_1</meta:group>
            </mml:cable>
	    <mml:cable id="40" name="spine_head_14_1">
                <meta:group>all</meta:group>
                <meta:group>spine_head_14_1</meta:group>
            </mml:cable>
	    <mml:cable id="41" name="spine_neck_14_2">
                <meta:group>all</meta:group>
                <meta:group>spine_neck_14_2</meta:group>
            </mml:cable>
	    <mml:cable id="42" name="spine_head_14_2">
                <meta:group>all</meta:group>
                <meta:group>spine_head_14_2</meta:group>
            </mml:cable>
	    <mml:cable id="43" name="spine_neck_14_3">
                <meta:group>all</meta:group>
                <meta:group>spine_neck_14_3</meta:group>
            </mml:cable>
	    <mml:cable id="44" name="spine_head_14_3">
                <meta:group>all</meta:group>
                <meta:group>spine_head_14_3</meta:group>
            </mml:cable>
	    <mml:cable id="45" name="spine_neck_14_4">
                <meta:group>all</meta:group>
                <meta:group>spine_neck_14_4</meta:group>
            </mml:cable>
	    <mml:cable id="46" name="spine_head_14_4">
                <meta:group>all</meta:group>
                <meta:group>spine_head_14_4</meta:group>
            </mml:cable>
	    <mml:cable id="47" name="spine_neck_14_5">
                <meta:group>all</meta:group>
                <meta:group>spine_neck_14_5</meta:group>
            </mml:cable>
	    <mml:cable id="48" name="spine_head_14_5">
                <meta:group>all</meta:group>
                <meta:group>spine_head_14_5</meta:group>
            </mml:cable>
	    <mml:cable id="49" name="spine_neck_14_6">
                <meta:group>all</meta:group>
                <meta:group>spine_neck_14_6</meta:group>
            </mml:cable>
	    <mml:cable id="50" name="spine_head_14_6">
                <meta:group>all</meta:group>
                <meta:group>spine_head_14_6</meta:group>
            </mml:cable>
	    <mml:cable id="51" name="spine_neck_14_7">
                <meta:group>all</meta:group>
                <meta:group>spine_neck_14_7</meta:group>
            </mml:cable>
	    <mml:cable id="52" name="spine_head_14_7">
                <meta:group>all</meta:group>
                <meta:group>spine_head_14_7</meta:group>
            </mml:cable>
	    <mml:cable id="53" name="spine_neck_14_8">
                <meta:group>all</meta:group>
                <meta:group>spine_neck_14_8</meta:group>
            </mml:cable>
	    <mml:cable id="54" name="spine_head_14_8">
                <meta:group>all</meta:group>
                <meta:group>spine_head_14_8</meta:group>
            </mml:cable>
	     <mml:cable id="55" name="spine_neck_14_9">
                <meta:group>all</meta:group>
                <meta:group>spine_neck_14_9</meta:group>
            </mml:cable>
	    <mml:cable id="56" name="spine_head_14_9">
                <meta:group>all</meta:group>
                <meta:group>spine_head_14_9</meta:group>
            </mml:cable>
	    <mml:cable id="57" name="spine_neck_14_10">
                <meta:group>all</meta:group>
                <meta:group>spine_neck_14_10</meta:group>
            </mml:cable>
	    <mml:cable id="58" name="spine_head_14_10">
                <meta:group>all</meta:group>
                <meta:group>spine_head_14_10</meta:group>
            </mml:cable>
	    <mml:cable id="59" name="spine_neck_14_11">
                <meta:group>all</meta:group>
                <meta:group>spine_neck_14_11</meta:group>
            </mml:cable>
	    <mml:cable id="60" name="spine_head_14_11">
                <meta:group>all</meta:group>
                <meta:group>spine_head_14_11</meta:group>
            </mml:cable>
	    <mml:cable id="61" name="spine_neck_14_12">
                <meta:group>all</meta:group>
                <meta:group>spine_neck_14_12</meta:group>
            </mml:cable>
	    <mml:cable id="62" name="spine_head_14_12">
                <meta:group>all</meta:group>
                <meta:group>spine_head_14_12</meta:group>
            </mml:cable>
	</mml:cables>
    <!--Adding the biophysical parameters-->
        <biophysics units="SI Units">
          <bio:mechanism name="LeakConductance" type="Channel Mechanism" passive_conductance="true">
                <bio:parameter name="e" value=" -0.06">
                    <bio:group>all</bio:group>
                </bio:parameter>
                <bio:parameter name="gmax" value="1.0">
                    <bio:group>all</bio:group>
                </bio:parameter>
            </bio:mechanism>
          <bio:mechanism name="CaPool" type="Ion Concentration">
             <bio:parameter name="specific_current_scaling_factor" value="8.96e-3">
                <bio:group>lat_14_3</bio:group>
                <bio:group>lat_14_4</bio:group>
                <bio:group>lat_14_5</bio:group>
                <bio:group>lat_13_1</bio:group>
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             </bio:parameter>
           </bio:mechanism>
           <bio:mechanism name="CaPool" type="Ion Concentration">
                <bio:parameter name="fixed_current_scaling_factor" value="34.53e12">
                    <bio:group>basal_8</bio:group>
                </bio:parameter>
           </bio:mechanism>
           <bio:mechanism name="CaPool" type="Ion Concentration">
                <bio:parameter name="fixed_current_scaling_factor" value="17.402e12">
                   <bio:group>soma</bio:group>
                </bio:parameter>
           </bio:mechanism>
           <bio:mechanism name="CaPool" type="Ion Concentration">
                <bio:parameter name="fixed_current_scaling_factor" value="26.404e12">
                    <bio:group>apical_10</bio:group>
                </bio:parameter>
           </bio:mechanism>
           <bio:mechanism name="NMDA_Ca_conc" type="Ion Concentration">
                <bio:parameter name="specific_current_scaling_factor" value="8.96e-3">
                      <bio:group>spine_head_14_1</bio:group>
                      <bio:group>spine_head_14_2</bio:group>
                      <bio:group>spine_head_14_3</bio:group>
                      <bio:group>spine_head_14_4</bio:group>
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                </bio:parameter>
           </bio:mechanism>
          <bio:mechanism name="CaConductance" type="Channel Mechanism">
                <bio:parameter name="gmax" value="50.0">
                    <bio:group>basal_7</bio:group>
		              <bio:group>basal_2</bio:group>
		              <bio:group>basal_3</bio:group>
                </bio:parameter>
           </bio:mechanism>
           <bio:mechanism name="CaConductance" type="Channel Mechanism">
              <bio:parameter name="gmax" value="70.0">
                <bio:group>apical_11</bio:group>
                <bio:group>lat_14_9</bio:group>
                <bio:group>lat_14_6</bio:group>
                <bio:group>apical_13</bio:group>
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              </bio:parameter>
           </bio:mechanism>
           <bio:mechanism name="CaConductance" type="Channel Mechanism">
              <bio:parameter name="gmax" value="60.0">
                <bio:group>spine_head_14_1</bio:group>
                  <bio:group>spine_head_14_2</bio:group>
                  <bio:group>spine_head_14_3</bio:group>
                  <bio:group>spine_head_14_4</bio:group>
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             </bio:parameter>
           </bio:mechanism>
           <bio:mechanism name="CaConductance" type="Channel Mechanism">
                <bio:parameter name="gmax" value="120.0">
                   <bio:group>basal_6</bio:group>
                </bio:parameter>
           </bio:mechanism>
           <bio:mechanism name="CaConductance" type="Channel Mechanism">
                <bio:parameter name="gmax" value="80.0">
                   <bio:group>basal_8</bio:group>
                    <bio:group>apical_10</bio:group>
                </bio:parameter>
           </bio:mechanism>
           <bio:mechanism name="CaConductance" type="Channel Mechanism">
                <bio:parameter name="gmax" value="40.0">
                    <bio:group>soma</bio:group>
                </bio:parameter>
           </bio:mechanism>
           <bio:mechanism name="K_AHPConductance" type="Channel Mechanism">
              <bio:parameter name="gmax" value="8.0">
                <bio:group>lat_14_7</bio:group>
                <bio:group>lat_13_2</bio:group>
                <bio:group>lat_14_10</bio:group>
                <bio:group>lat_15_1</bio:group>
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            </bio:parameter>
           </bio:mechanism>
           <bio:mechanism name="K_CConductance" type="Channel Mechanism">
              <bio:parameter name="gmax" value="50.0">
                  <bio:group>lat_14_7</bio:group>
                  <bio:group>lat_13_2</bio:group>
                  <bio:group>lat_14_10</bio:group>
                  <bio:group>lat_15_1</bio:group>
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             </bio:parameter>
           </bio:mechanism>
           <bio:mechanism name="K_CConductance" type="Channel Mechanism">
                <bio:parameter name="gmax" value="100.0">
                    <bio:group>soma</bio:group>
		                <bio:group>basal_6</bio:group>
                </bio:parameter>
           </bio:mechanism>
           <bio:mechanism name="K_CConductance" type="Channel Mechanism">
                <bio:parameter name="gmax" value="200.0">
                    <bio:group>apical_10</bio:group>
		                <bio:group>basal_8</bio:group>
                </bio:parameter>
           </bio:mechanism>
           <bio:mechanism name="NaConductance" type="Channel Mechanism">
                <bio:parameter name="gmax" value="200.0">
                    <bio:group>basal_6</bio:group>
                </bio:parameter>
           </bio:mechanism>
           <bio:mechanism name="NaConductance" type="Channel Mechanism">
                <bio:parameter name="gmax" value="150.0">
                    <bio:group>apical_10</bio:group>
                    <bio:group>basal_8</bio:group>
                </bio:parameter>
           </bio:mechanism>
           <bio:mechanism name="NaConductance" type="Channel Mechanism">
                <bio:parameter name="gmax" value="300.0">
                    <bio:group>soma</bio:group>
                </bio:parameter>
           </bio:mechanism>
           <bio:mechanism name="NaConductance" type="Channel Mechanism">
                <bio:parameter name="gmax" value="40.0">
                     <bio:group>apical_11</bio:group>
                    <bio:group>lat_11_1</bio:group>
                </bio:parameter>
           </bio:mechanism>
           <bio:mechanism name="NaConductance" type="Channel Mechanism">
                <bio:parameter name="gmax" value="30.0">
                    <bio:group>apical_12</bio:group>
                </bio:parameter>
           </bio:mechanism>
           <bio:mechanism name="NaConductance" type="Channel Mechanism">
                <bio:parameter name="gmax" value="25.0">
                    <bio:group>lat_13_2</bio:group>
                    <bio:group>apical_13</bio:group>
                    <bio:group>lat_13_1</bio:group>
                </bio:parameter>
           </bio:mechanism>
           <bio:mechanism name="NaConductance" type="Channel Mechanism">
              <bio:parameter name="gmax" value="20.0">
                <bio:group>lat_14_3</bio:group>
                <bio:group>apical_15</bio:group>
                <bio:group>lat_14_8</bio:group>
                <bio:group>apical_16</bio:group>
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            </bio:parameter>
          </bio:mechanism>
           <bio:mechanism name="NaConductance" type="Channel Mechanism">
                <bio:parameter name="gmax" value="15.0">
                    <bio:group>apical_18</bio:group>
		                <bio:group>apical_17</bio:group>
                </bio:parameter>
           </bio:mechanism>
           <bio:mechanism name="K_DRConductance" type="Channel Mechanism">
                <bio:parameter name="gmax" value="200.0">
                     <bio:group>basal_6</bio:group>
                </bio:parameter>
           </bio:mechanism>
           <bio:mechanism name="K_DRConductance" type="Channel Mechanism">
              <bio:parameter name="gmax" value="50.0">
                <bio:group>lat_14_9</bio:group>
                <bio:group>lat_14_6</bio:group>
                <bio:group>lat_11_1</bio:group>
                <bio:group>apical_15</bio:group>
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          </bio:parameter>
           </bio:mechanism>
           <bio:mechanism name="K_DRConductance" type="Channel Mechanism">
                <bio:parameter name="gmax" value="100.0">
                     <bio:group>apical_10</bio:group>
		                  <bio:group>basal_8</bio:group>
                </bio:parameter>
           </bio:mechanism>
           <bio:mechanism name="K_DRConductance" type="Channel Mechanism">
                <bio:parameter name="gmax" value="250.0">
                      <bio:group>soma</bio:group>
                </bio:parameter>
           </bio:mechanism>
          <bio:mechanism name="K_AConductance" type="Channel Mechanism">
                <bio:parameter name="gmax" value="50.0">
                    <bio:group>soma</bio:group>
		</bio:parameter>
           </bio:mechanism>
	        <bio:mechanism name="K_AConductance" type="Channel Mechanism">
            <bio:parameter name="gmax" value="100.0">
                <bio:group>lat_14_4</bio:group>
                <bio:group>lat_13_2</bio:group>
                <bio:group>apical_11</bio:group>
                <bio:group>lat_13_1</bio:group>
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             </bio:parameter>
           </bio:mechanism>
          <bio:spec_capacitance>
              <bio:parameter value="0.03">
                  <bio:group>all</bio:group>
              </bio:parameter>
            </bio:spec_capacitance>
          <bio:spec_axial_resistance>
              <bio:parameter value="1.0">
                  <bio:group>all</bio:group>
              </bio:parameter>
            </bio:spec_axial_resistance>
          <bio:init_memb_potential>
              <bio:parameter value="-0.06">
                  <bio:group>all</bio:group>
              </bio:parameter>
            </bio:init_memb_potential>
        </biophysics>
      <connectivity>
          <net:potential_syn_loc synapse_type="NMDA" >
                  <net:group>spine_head_14_1</net:group>
                  <net:group>spine_head_14_2</net:group>
                  <net:group>spine_head_14_3</net:group>
                  <net:group>spine_head_14_4</net:group>
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        </net:potential_syn_loc>
          <net:potential_syn_loc synapse_type="Ca_NMDA" >
                <net:group>spine_head_14_1</net:group>
                <net:group>spine_head_14_2</net:group>
                <net:group>spine_head_14_3</net:group>
                <net:group>spine_head_14_4</net:group>
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          </net:potential_syn_loc>
          <net:potential_syn_loc synapse_type="glu" >
                <net:group>spine_head_14_1</net:group>
                <net:group>spine_head_14_2</net:group>
                <net:group>spine_head_14_3</net:group>
                <net:group>spine_head_14_4</net:group>
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          </net:potential_syn_loc>
      </connectivity>
    </cell>
</cells>
</neuroml>
