<?xml version="1.0" encoding="UTF-8"?>

<channelml xmlns="http://morphml.org/channelml/schema"
    xmlns:xsi="http://www.w3.org/2001/XMLSchema-instance"
    xmlns:meta="http://morphml.org/metadata/schema"
    xsi:schemaLocation="http://morphml.org/channelml/schema  ../../../../../trunk/web/NeuroMLFiles/Schemata/v1.7.3/Level2/ChannelML_v1.7.3.xsd"
    units="SI Units">

    <channel_type name="CaConductance">

        <status value="stable">
        </status>
        <current_voltage_relation cond_law="ohmic" ion="ca" default_gmax="132.8e-9" default_erev="0.080" charge="2" fixed_erev="yes">

            <q10_settings q10_factor="3" experimental_temp="17.350264793"/>
            <offset value="0.010"/>

            <gate name="m" instances="2">
                <closed_state id="m0"/>
                <open_state id="m"/>

                <transition name="alpha" from="m0" to="m" expr_form="sigmoid" rate="1600" scale="-0.01389" midpoint="0.005" />
                <transition name="beta" from="m" to="m0" expr_form="exp_linear" rate="100" scale="-0.005" midpoint="-0.0089" />

            </gate>

            <gate name="h" instances="1">
                <closed_state id="h0"/>
                <open_state id="h"/>

                <transition name="alpha" from="h0" to="h" expr_form="tabulated" >
		  <table xmin = "-0.1" xmax = "0.05">
			<entry value="5"/>
			<entry value="5"/>
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		     </table>
		 </transition>
                <transition name="beta" from="h" to="h0" expr_form="tabulated" >
                  <table xmin = "-0.1" xmax = "0.05">
			<entry value="0"/>
			<entry value="0"/>
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		 </table>
		 </transition>
            </gate>
        </current_voltage_relation>

    </channel_type>
</channelml>
