<?xml version="1.0" encoding="UTF-8"?>
 <channelml xmlns="http://morphml.org/channelml/schema"
    xmlns:xsi="http://www.w3.org/2001/XMLSchema-instance"
    xmlns:meta="http://morphml.org/metadata/schema"
    xsi:schemaLocation="http://morphml.org/channelml/schema  http://www.neuroml.org/NeuroMLValidator/NeuroMLFiles/Schemata/v1.7.1/Level2/ChannelML_v1.7.1.xsd"
    units="SI Units">
    <synapse_type name="Ca_NMDA">

        <status value="stable"/>

        <blocking_syn max_conductance="20" rise_time="20e-3" decay_time="40e-3" reversal_potential="0.1">
            <block species="mg" conc="1.2" eta="0.28" gamma="62"/>
        </blocking_syn>

    </synapse_type>

</channelml>
