<?xml version="1.0" encoding="UTF-8"?>
<channelml xmlns="http://morphml.org/channelml/schema" xmlns:xsi="http://www.w3.org/2001/XMLSchema-instance" xmlns:meta="http://morphml.org/metadata/schema" xsi:schemaLocation="http://morphml.org/channelml/schema  ../../Schemata/v1.7.3/Level2/ChannelML_v1.7.3.xsd" units="SI Units">

    <channel_type name="K_AConductance" density="yes">

        <status value="stable">
        </status>
        <current_voltage_relation cond_law="ohmic" ion="k" default_erev="-0.075" default_gmax="166e-9">

            <gate name="n" instances="1">
                <closed_state id="n0"/>
                <open_state id="n"/>

                <transition name="alpha" from="n0" to="n" expr_form="exp_linear" rate="200" scale="0.01" midpoint="-0.0469"/>
                <transition name="beta" from="n" to="n0" expr_form="exp_linear" rate="175" scale="-0.01" midpoint="-0.0199"/>
            </gate>

            <gate name="m" instances="1">
                <closed_state id="m0"/>
                <open_state id="m"/>

                <transition name="alpha" from="m0" to="m" expr_form="exponential" rate="1.6" scale="-0.018" midpoint="-0.073"/>
                <transition name="beta" from="m" to="m0" expr_form="sigmoid" rate="50.0" scale="-0.005" midpoint="-0.0499"/>
            </gate>

        </current_voltage_relation>

    </channel_type>
</channelml>
