<?xml version="1.0" encoding="UTF-8"?>
<channelml xmlns="http://morphml.org/channelml/schema" xmlns:xsi="http://www.w3.org/2001/XMLSchema-instance" xmlns:meta="http://morphml.org/metadata/schema" xsi:schemaLocation="http://morphml.org/channelml/schema ../../Schemata/v1.8.0/Level2/ChannelML_v1.8.0.xsd" units="SI Units">

    <channel_type name="K_AHPConductance">

        <status value="stable">
        </status>
        <current_voltage_relation cond_law="ohmic" ion="k" default_gmax="26.56e-9" default_erev="-0.075">
            <conc_dependence name="Calcium" ion="ca" charge="2" variable_name="ca_conc" min_conc="0" max_conc="1000.0"/>

            <gate name="n" instances="1" x_variable="concentration">
                <closed_state id="n0"/>
                <open_state id="n"/>

                <transition name="alpha" from="n0" to="n" expr_form="tabulated">
		   <table xmin = "0.0" xmax = "1000.0">
			<entry value="0"/>
			<entry value="0.4"/>
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		   </table>
		 </transition>
                <transition name="beta" from="n" to="n0" expr_form="tabulated" >
                <table xmin = "0.0" xmax = "1000.0">
			<entry value="1.0"/>
			<entry value="1.0"/>
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		   </table>
		 </transition>
            </gate>
        </current_voltage_relation>
     </channel_type>
</channelml>
