<?xml version="1.0" encoding="UTF-8"?>
<channelml xmlns="http://morphml.org/channelml/schema"
    xmlns:xsi="http://www.w3.org/2001/XMLSchema-instance"
    xmlns:meta="http://morphml.org/metadata/schema"
    xsi:schemaLocation="http://morphml.org/channelml/schema   ../../Schemata/v1.7.1/Level2/ChannelML_v1.7.1.xsd"
    units="SI Units">

    <ion name="ca" charge="2" role="SignallingSubstance">
    </ion>

    <ion_concentration name="NMDA_Ca_conc">

        <status value="stable">
        </status>

        <ion_species name="ca"/>

        <decaying_pool_model resting_conc ="0.0" decay_constant="0.01333">

            <pool_volume_info shell_thickness = "0.0"/>

        </decaying_pool_model>

    </ion_concentration>
</channelml>
