// SBML level 2 version 4

model kinase_loop()

  // Compartments:
  compartment kinetics_19_0_ = 9.963067e-16;

  // Species:
  substanceOnly species X_33_0_ in kinetics_19_0_ = 0;
  substanceOnly species X_enz_cplx_36_0_ in kinetics_19_0_ = 0;
  substanceOnly species X_inactive_38_0_ in kinetics_19_0_ = 9.963067e-16;
  substanceOnly species Y_40_0_ in kinetics_19_0_ = 0;
  substanceOnly species Y_enz_cplx_43_0_ in kinetics_19_0_ = 0;
  substanceOnly species $Y_sub_45_0_ in kinetics_19_0_ = 9.963067e-16;
  substanceOnly species Y_prd_47_0_ in kinetics_19_0_ = 0;
  substanceOnly species Y_inactive_51_0_ in kinetics_19_0_ = 9.963067e-16;
  substanceOnly species phosphatase_56_0_ in kinetics_19_0_ = 4.981616e-16;
  substanceOnly species P_cplx_59_0_ in kinetics_19_0_ = 0;
  substanceOnly species $Ca_61_0_ in kinetics_19_0_ = 9.963233e-17;

  // Reactions:
  X_enz_35_0__Complex_formation_: X_33_0_ + Y_inactive_51_0_ -> X_enz_cplx_36_0_; X_enz_35_0__Complex_formation__k1*X_33_0_*Y_inactive_51_0_ - X_enz_35_0__Complex_formation__k2*X_enz_cplx_36_0_;
    X_enz_35_0__Complex_formation__k1 = 5.018552e15 per_uMole_per_second; X_enz_35_0__Complex_formation__k2 = 4 per_second;
  X_enz_35_0__Product_formation_: X_enz_cplx_36_0_ => X_33_0_ + Y_40_0_; X_enz_35_0__Product_formation__k3*X_enz_cplx_36_0_;
    X_enz_35_0__Product_formation__k3 = 1 per_second;
  Y_enz_42_0__Complex_formation_: Y_40_0_ + $Y_sub_45_0_ -> Y_enz_cplx_43_0_; Y_enz_42_0__Complex_formation__k1*Y_40_0_*Y_sub_45_0_ - Y_enz_42_0__Complex_formation__k2*Y_enz_cplx_43_0_;
    Y_enz_42_0__Complex_formation__k1 = 2.509246e16 per_uMole_per_second; Y_enz_42_0__Complex_formation__k2 = 20 per_second;
  Y_enz_42_0__Product_formation_: Y_enz_cplx_43_0_ => Y_40_0_ + Y_prd_47_0_; Y_enz_42_0__Product_formation__k3*Y_enz_cplx_43_0_;
    Y_enz_42_0__Product_formation__k3 = 5 per_second;
  P_58_0__Complex_formation_: phosphatase_56_0_ + Y_40_0_ -> P_cplx_59_0_; P_58_0__Complex_formation__k1*phosphatase_56_0_*Y_40_0_ - P_58_0__Complex_formation__k2*P_cplx_59_0_;
    P_58_0__Complex_formation__k1 = 5.018431e16 per_uMole_per_second; P_58_0__Complex_formation__k2 = 0.4 per_second;
  P_58_0__Product_formation_: P_cplx_59_0_ => phosphatase_56_0_ + Y_inactive_51_0_; P_58_0__Product_formation__k3*P_cplx_59_0_;
    P_58_0__Product_formation__k3 = 0.1 per_second;
  degrade_Y_49_0_: Y_prd_47_0_ -> $Y_sub_45_0_; degrade_Y_kf*Y_prd_47_0_ - degrade_Y_kb*Y_sub_45_0_;
    degrade_Y_kf = 0.1 per_second; degrade_Y_kb = 0.01 per_second;
  activate_X_53_0_: 2 Y_prd_47_0_ + X_inactive_38_0_ -> X_33_0_; activate_X_kf*Y_prd_47_0_^2*X_inactive_38_0_ - activate_X_kb*X_33_0_;
    activate_X_kf = 2.014841e30 per_uMole_sq_per_second; activate_X_kb = 1 per_second;
  Ca_activate_X_63_0_: $Ca_61_0_ + X_inactive_38_0_ -> X_33_0_; Ca_activate_X_kf*Ca_61_0_*X_inactive_38_0_ - Ca_activate_X_kb*X_33_0_;
    Ca_activate_X_kf = 100371037213930 per_uMole_per_second; Ca_activate_X_kb = 1 per_second;

  // Unit definitions:
  unit substance = 1e-6 mole;
  unit per_uMole_per_second = 1 / (1e-6 mole * second);
  unit per_second = (1e-6 mole)^0 / second;
  unit per_uMole_sq_per_second = 1 / ((1e-6 mole)^2 * second);
end
