// SBML level 2 version 4

model psd12()

  // Compartments:
  compartment B_43_0_ = 9.963067e-17;
  compartment A_67_0_ = 9.963233e-18;
  compartment kinetics_19_0_ = 1.660539e-18;

  // Species:
  substanceOnly species P_45_0_ in B_43_0_ = 4.981616e-17;
  substanceOnly species P1_cplx_48_0_ in B_43_0_ = 0;
  substanceOnly species P2_cplx_51_0_ in B_43_0_ = 0;
  substanceOnly species Rp_53_0_ in B_43_0_ = 0;
  substanceOnly species KK_55_0_ in B_43_0_ = 9.963067e-17;
  substanceOnly species KK1_cplx_58_0_ in B_43_0_ = 0;
  substanceOnly species KK2_cplx_61_0_ in B_43_0_ = 0;
  substanceOnly species M_star__63_0_ in B_43_0_ = 0;
  substanceOnly species M_65_0_ in B_43_0_ = 3.985293e-16;
  substanceOnly species Rp_69_0_ in A_67_0_ = 0;
  substanceOnly species P_71_0_ in A_67_0_ = 4.981616e-18;
  substanceOnly species P1_cplx_74_0_ in A_67_0_ = 0;
  substanceOnly species P2_cplx_77_0_ in A_67_0_ = 0;
  substanceOnly species inact_PKA_79_0_ in A_67_0_ = 9.963233e-18;
  substanceOnly species $Ca_81_0_ in A_67_0_ = 9.963233e-19;
  substanceOnly species KK_85_0_ in A_67_0_ = 9.963233e-18;
  substanceOnly species KK1_cplx_88_0_ in A_67_0_ = 0;
  substanceOnly species KK2_cplx_91_0_ in A_67_0_ = 0;
  substanceOnly species exo_enz_93_0_ in A_67_0_ = 0;
  substanceOnly species kenz_cplx_96_0_ in A_67_0_ = 0;
  substanceOnly species M_star__98_0_ in A_67_0_ = 0;
  substanceOnly species M_100_0_ in A_67_0_ = 0;

  // Reactions:
  P1_47_0__Complex_formation_: P_45_0_ + Rp_53_0_ -> P1_cplx_48_0_; P1_47_0__Complex_formation__k1*P_45_0_*Rp_53_0_ - P1_47_0__Complex_formation__k2*P1_cplx_48_0_;
    P1_47_0__Complex_formation__k1 = 5.018552e18 per_uMole_per_second; P1_47_0__Complex_formation__k2 = 40 per_second;
  P1_47_0__Product_formation_: P1_cplx_48_0_ => P_45_0_ + M_65_0_; P1_47_0__Product_formation__k3*P1_cplx_48_0_;
    P1_47_0__Product_formation__k3 = 10 per_second;
  P2_50_0__Complex_formation_: P_45_0_ + M_star__63_0_ -> P2_cplx_51_0_; P2_50_0__Complex_formation__k1*P_45_0_*M_star__63_0_ - P2_50_0__Complex_formation__k2*P2_cplx_51_0_;
    P2_50_0__Complex_formation__k1 = 5.018552e18 per_uMole_per_second; P2_50_0__Complex_formation__k2 = 40 per_second;
  P2_50_0__Product_formation_: P2_cplx_51_0_ => P_45_0_ + Rp_53_0_; P2_50_0__Product_formation__k3*P2_cplx_51_0_;
    P2_50_0__Product_formation__k3 = 10 per_second;
  KK1_57_0__Complex_formation_: KK_55_0_ + M_65_0_ -> KK1_cplx_58_0_; KK1_57_0__Complex_formation__k1*KK_55_0_*M_65_0_ - KK1_57_0__Complex_formation__k2*KK1_cplx_58_0_;
    KK1_57_0__Complex_formation__k1 = 5.018552e17 per_uMole_per_second; KK1_57_0__Complex_formation__k2 = 40 per_second;
  KK1_57_0__Product_formation_: KK1_cplx_58_0_ => KK_55_0_ + Rp_53_0_; KK1_57_0__Product_formation__k3*KK1_cplx_58_0_;
    KK1_57_0__Product_formation__k3 = 10 per_second;
  KK2_60_0__Complex_formation_: KK_55_0_ + Rp_53_0_ -> KK2_cplx_61_0_; KK2_60_0__Complex_formation__k1*KK_55_0_*Rp_53_0_ - KK2_60_0__Complex_formation__k2*KK2_cplx_61_0_;
    KK2_60_0__Complex_formation__k1 = 5.018552e17 per_uMole_per_second; KK2_60_0__Complex_formation__k2 = 40 per_second;
  KK2_60_0__Product_formation_: KK2_cplx_61_0_ => KK_55_0_ + M_star__63_0_; KK2_60_0__Product_formation__k3*KK2_cplx_61_0_;
    KK2_60_0__Product_formation__k3 = 10 per_second;
  P1_73_0__Complex_formation_: P_71_0_ + Rp_69_0_ -> P1_cplx_74_0_; P1_73_0__Complex_formation__k1*P_71_0_*Rp_69_0_ - P1_73_0__Complex_formation__k2*P1_cplx_74_0_;
    P1_73_0__Complex_formation__k1 = 5.018431e19 per_uMole_per_second; P1_73_0__Complex_formation__k2 = 40 per_second;
  P1_73_0__Product_formation_: P1_cplx_74_0_ => P_71_0_ + M_100_0_; P1_73_0__Product_formation__k3*P1_cplx_74_0_;
    P1_73_0__Product_formation__k3 = 10 per_second;
  P2_76_0__Complex_formation_: P_71_0_ + M_star__98_0_ -> P2_cplx_77_0_; P2_76_0__Complex_formation__k1*P_71_0_*M_star__98_0_ - P2_76_0__Complex_formation__k2*P2_cplx_77_0_;
    P2_76_0__Complex_formation__k1 = 5.018431e19 per_uMole_per_second; P2_76_0__Complex_formation__k2 = 40 per_second;
  P2_76_0__Product_formation_: P2_cplx_77_0_ => P_71_0_ + Rp_69_0_; P2_76_0__Product_formation__k3*P2_cplx_77_0_;
    P2_76_0__Product_formation__k3 = 10 per_second;
  KK1_87_0__Complex_formation_: KK_85_0_ + M_100_0_ -> KK1_cplx_88_0_; KK1_87_0__Complex_formation__k1*KK_85_0_*M_100_0_ - KK1_87_0__Complex_formation__k2*KK1_cplx_88_0_;
    KK1_87_0__Complex_formation__k1 = 5.018431e18 per_uMole_per_second; KK1_87_0__Complex_formation__k2 = 40 per_second;
  KK1_87_0__Product_formation_: KK1_cplx_88_0_ => KK_85_0_ + Rp_69_0_; KK1_87_0__Product_formation__k3*KK1_cplx_88_0_;
    KK1_87_0__Product_formation__k3 = 10 per_second;
  KK2_90_0__Complex_formation_: KK_85_0_ + Rp_69_0_ -> KK2_cplx_91_0_; KK2_90_0__Complex_formation__k1*KK_85_0_*Rp_69_0_ - KK2_90_0__Complex_formation__k2*KK2_cplx_91_0_;
    KK2_90_0__Complex_formation__k1 = 5.018431e18 per_uMole_per_second; KK2_90_0__Complex_formation__k2 = 40 per_second;
  KK2_90_0__Product_formation_: KK2_cplx_91_0_ => KK_85_0_ + M_star__98_0_; KK2_90_0__Product_formation__k3*KK2_cplx_91_0_;
    KK2_90_0__Product_formation__k3 = 10 per_second;
  kenz_95_0__Complex_formation_: exo_enz_93_0_ + M_star__63_0_ -> kenz_cplx_96_0_; kenz_95_0__Complex_formation__k1*exo_enz_93_0_*M_star__63_0_ - kenz_95_0__Complex_formation__k2*kenz_cplx_96_0_;
    kenz_95_0__Complex_formation__k1 = 5.018431e15 per_uMole_per_second; kenz_95_0__Complex_formation__k2 = 0.4 per_second;
  kenz_95_0__Product_formation_: kenz_cplx_96_0_ => exo_enz_93_0_ + M_star__98_0_; kenz_95_0__Product_formation__k3*kenz_cplx_96_0_;
    kenz_95_0__Product_formation__k3 = 0.1 per_second;
  activate_PKA_83_0_: inact_PKA_79_0_ + $Ca_81_0_ -> exo_enz_93_0_; activate_PKA_kf*inact_PKA_79_0_*Ca_81_0_ - activate_PKA_kb*exo_enz_93_0_;
    activate_PKA_kf = 1.00371e17 per_uMole_per_second; activate_PKA_kb = 1 per_second;
  exocytosis_39_0_: M_star__63_0_ => M_star__98_0_; exocytosis_kf*M_star__63_0_;
    exocytosis_kf = 0.015 per_second;
  endocytosis_41_0_: M_100_0_ => M_65_0_; endocytosis_kf*M_100_0_;
    endocytosis_kf = 1 per_second;

  // Unit definitions:
  unit substance = 1e-6 mole;
  unit per_uMole_per_second = 1 / (1e-6 mole * second);
  unit per_second = (1e-6 mole)^0 / second;
end
