// SBML level 2 version 4

model acc71()

  // Compartments:
  compartment kinetics_578_0_ = 5.216749e-13;

  // Species:
  substanceOnly species Pi__589_0_ in kinetics_578_0_ = 0;
  substanceOnly species RasGTP_595_0_ in kinetics_578_0_ = 5.216749e-13;
  substanceOnly species RasGTP_minus_NF1_596_0_ in kinetics_578_0_ = 0;
  substanceOnly species RasGTP_minus_NF1_star__597_0_ in kinetics_578_0_ = 0;
  substanceOnly species RasGDP_minus_NF1_Pi_598_0_ in kinetics_578_0_ = 0;
  substanceOnly species RasGDP_NF1_599_0_ in kinetics_578_0_ = 0;
  substanceOnly species RasGDP_600_0_ in kinetics_578_0_ = 0;
  substanceOnly species NF1_601_0_ in kinetics_578_0_ = 5.216417e-12;

  // Reactions:
  GTP_hydrolysis_sbo_1_sbc__590_0_: RasGTP_minus_NF1_star__597_0_ -> RasGDP_minus_NF1_Pi_598_0_; GTP_hydrolysis_sbo_1_sbc__kf*RasGTP_minus_NF1_star__597_0_ - GTP_hydrolysis_sbo_1_sbc__kb*RasGDP_minus_NF1_Pi_598_0_;
    GTP_hydrolysis_sbo_1_sbc__kf = 19.5 per_second; GTP_hydrolysis_sbo_1_sbc__kb = 0.22 per_second;
  GTP_hydrolysis_sbo_2_sbc__591_0_: RasGDP_minus_NF1_Pi_598_0_ -> Pi__589_0_ + RasGDP_NF1_599_0_; GTP_hydrolysis_sbo_2_sbc__kf*RasGDP_minus_NF1_Pi_598_0_ - GTP_hydrolysis_sbo_2_sbc__kb*Pi__589_0_*RasGDP_NF1_599_0_;
    GTP_hydrolysis_sbo_2_sbc__kf = 40 per_second; GTP_hydrolysis_sbo_2_sbc__kb = 2.070232e8 per_uMole_per_second;
  Ras_activation_592_0_: RasGTP_minus_NF1_596_0_ -> RasGTP_minus_NF1_star__597_0_; Ras_activation_kf*RasGTP_minus_NF1_596_0_ - Ras_activation_kb*RasGTP_minus_NF1_star__597_0_;
    Ras_activation_kf = 418 per_second; Ras_activation_kb = 5.5 per_second;
  GAP_dissociation_593_0_: RasGDP_NF1_599_0_ -> RasGDP_600_0_ + NF1_601_0_; GAP_dissociation_kf*RasGDP_NF1_599_0_ - GAP_dissociation_kb*RasGDP_600_0_*NF1_601_0_;
    GAP_dissociation_kf = 46.5 per_second; GAP_dissociation_kb = 2.300277e12 per_uMole_per_second;
  NF1_binding_594_0_: RasGTP_595_0_ + NF1_601_0_ -> RasGTP_minus_NF1_596_0_; NF1_binding_kf*RasGTP_595_0_*NF1_601_0_ - NF1_binding_kb*RasGTP_minus_NF1_596_0_;
    NF1_binding_kf = 2.300277e12 per_uMole_per_second; NF1_binding_kb = 6.36 per_second;

  // Unit definitions:
  unit substance = 1e-6 mole;
  unit per_second = (1e-6 mole)^0 / second;
  unit per_uMole_per_second = 1 / (1e-6 mole * second);
end
