// SBML level 2 version 4

model acc71()

  // Compartments:
  compartment kinetics_577_0_ = 5.236e-13;

  // Species:
  substanceOnly species Pi__588_0_ in kinetics_577_0_ = 0;
  substanceOnly species RasGTP_594_0_ in kinetics_577_0_ = 5.216748e-13;
  substanceOnly species RasGTP_minus_NF1_595_0_ in kinetics_577_0_ = 0;
  substanceOnly species RasGTP_minus_NF1_star__596_0_ in kinetics_577_0_ = 0;
  substanceOnly species RasGDP_minus_NF1_Pi_597_0_ in kinetics_577_0_ = 0;
  substanceOnly species RasGDP_NF1_598_0_ in kinetics_577_0_ = 0;
  substanceOnly species RasGDP_599_0_ in kinetics_577_0_ = 0;
  substanceOnly species NF1_600_0_ in kinetics_577_0_ = 5.216416e-12;

  // Reactions:
  GTP_hydrolysis_sbo_1_sbc__589_0_: RasGTP_minus_NF1_star__596_0_ -> RasGDP_minus_NF1_Pi_597_0_; GTP_hydrolysis_sbo_1_sbc__kf*RasGTP_minus_NF1_star__596_0_ - GTP_hydrolysis_sbo_1_sbc__kb*RasGDP_minus_NF1_Pi_597_0_;
    GTP_hydrolysis_sbo_1_sbc__kf = 19.5 per_second; GTP_hydrolysis_sbo_1_sbc__kb = 0.22 per_second;
  GTP_hydrolysis_sbo_2_sbc__590_0_: RasGDP_minus_NF1_Pi_597_0_ -> Pi__588_0_ + RasGDP_NF1_598_0_; GTP_hydrolysis_sbo_2_sbc__kf*RasGDP_minus_NF1_Pi_597_0_ - GTP_hydrolysis_sbo_2_sbc__kb*Pi__588_0_*RasGDP_NF1_598_0_;
    GTP_hydrolysis_sbo_2_sbc__kf = 40 per_second; GTP_hydrolysis_sbo_2_sbc__kb = 2.070232e8 per_umole_per_second;
  Ras_activation_591_0_: RasGTP_minus_NF1_595_0_ -> RasGTP_minus_NF1_star__596_0_; Ras_activation_kf*RasGTP_minus_NF1_595_0_ - Ras_activation_kb*RasGTP_minus_NF1_star__596_0_;
    Ras_activation_kf = 418 per_second; Ras_activation_kb = 5.5 per_second;
  GAP_dissociation_592_0_: RasGDP_NF1_598_0_ -> RasGDP_599_0_ + NF1_600_0_; GAP_dissociation_kf*RasGDP_NF1_598_0_ - GAP_dissociation_kb*RasGDP_599_0_*NF1_600_0_;
    GAP_dissociation_kf = 46.5 per_second; GAP_dissociation_kb = 2.300278e12 per_umole_per_second;
  NF1_binding_593_0_: RasGTP_594_0_ + NF1_600_0_ -> RasGTP_minus_NF1_595_0_; NF1_binding_kf*RasGTP_594_0_*NF1_600_0_ - NF1_binding_kb*RasGTP_minus_NF1_595_0_;
    NF1_binding_kf = 2.300278e12 per_umole_per_second; NF1_binding_kb = 6.36 per_second;

  // Unit definitions:
  unit per_second = 1 / second;
  unit per_umole_per_second = 1 / (1e-6 mole * second);
  unit substance = 1e-6 mole;
  unit per_umole_sq_per_second = 1 / ((1e-6 mole)^2 * second);
end
