// SBML level 2 version 4

model acc88()

  // Compartments:
  compartment mTOR_model_624_0_ = 9.963233e-13;
  compartment S6Kinase_630_0_ = 9.962901e-13;
  compartment kinetics_602_0_ = 9.963233e-13;

  // Species:
  substanceOnly species TOR_minus_clx_626_0_ in mTOR_model_624_0_ = 5.97794e-13;
  substanceOnly species S6K_star__631_0_ in S6Kinase_630_0_ = 0;
  substanceOnly species S6K_632_0_ in S6Kinase_630_0_ = 1.245404e-12;
  substanceOnly species S6K_thr_minus_412_633_0_ in S6Kinase_630_0_ = 0;
  substanceOnly species S6_phos_cplx_635_0_ in S6Kinase_630_0_ = 0;
  substanceOnly species $_40S_inact_637_0_ in S6Kinase_630_0_ = 1.992647e-14;
  substanceOnly species PDK1_613_0_ in kinetics_602_0_ = 9.963233e-13;
  substanceOnly species S6K_phospho_cplx_615_0_ in kinetics_602_0_ = 0;
  substanceOnly species PP2A_616_0_ in kinetics_602_0_ = 1.494485e-13;
  substanceOnly species dephos_clus_S6K_cplx_618_0_ in kinetics_602_0_ = 0;
  substanceOnly species dephos_S6K_cplx_620_0_ in kinetics_602_0_ = 0;
  substanceOnly species dephosp_S6K_cplx_622_0_ in kinetics_602_0_ = 0;
  substanceOnly species Rheb_minus_GTP_623_0_ in kinetics_602_0_ = 9.963233e-13;
  substanceOnly species TOR_Rheb_minus_GTP_clx_627_0_ in kinetics_602_0_ = 0;
  substanceOnly species S6K_phospho_cplx_629_0_ in kinetics_602_0_ = 0;
  substanceOnly species $S6K_tot_638_0_ in kinetics_602_0_;
  substanceOnly species _40S_639_0_ in kinetics_602_0_ = 0;
  substanceOnly species S6K_thr_minus_252_640_0_ in kinetics_602_0_ = 0;
  substanceOnly species S6_phospho_cplx_642_0_ in kinetics_602_0_ = 0;
  substanceOnly species MAPK_star__643_0_ in kinetics_602_0_ = 0;
  substanceOnly species cluster_phospho_S6K_cplx_645_0_ in kinetics_602_0_ = 0;
  substanceOnly species _40S_basal_647_0_ in kinetics_602_0_ = 9.963233e-17;
  substanceOnly species basal_cplx_649_0_ in kinetics_602_0_ = 0;

  // Assignment rules:
  S6K_tot_638_0_ := S6K_thr_minus_412_633_0_ + S6K_thr_minus_252_640_0_;

  // Reactions:
  Rheb_minus_GTP_bind_TORclx_625_0_: Rheb_minus_GTP_623_0_ + TOR_minus_clx_626_0_ -> TOR_Rheb_minus_GTP_clx_627_0_; Rheb_minus_GTP_bind_TORclx_kf*Rheb_minus_GTP_623_0_*TOR_minus_clx_626_0_ - Rheb_minus_GTP_bind_TORclx_kb*TOR_Rheb_minus_GTP_clx_627_0_;
    Rheb_minus_GTP_bind_TORclx_kf = 6022141790000 per_uMole_per_second; Rheb_minus_GTP_bind_TORclx_kb = 3 per_second;
  S6_phos_634_0__Complex_formation_: S6K_thr_minus_412_633_0_ + $_40S_inact_637_0_ -> S6_phos_cplx_635_0_; S6_phos_634_0__Complex_formation__k1*S6K_thr_minus_412_633_0_*_40S_inact_637_0_ - S6_phos_634_0__Complex_formation__k2*S6_phos_cplx_635_0_;
    S6_phos_634_0__Complex_formation__k1 = 2.007421e11 per_uMole_per_second; S6_phos_634_0__Complex_formation__k2 = 0.04 per_second;
  S6_phos_634_0__Product_formation_: S6_phos_cplx_635_0_ => S6K_thr_minus_412_633_0_ + _40S_639_0_; S6_phos_634_0__Product_formation__k3*S6_phos_cplx_635_0_;
    S6_phos_634_0__Product_formation__k3 = 0.01 per_second;
  S6_dephosph_636_0_: _40S_639_0_ => $_40S_inact_637_0_; S6_dephosph_kf*_40S_639_0_;
    S6_dephosph_kf = 0.01 per_second;
  S6K_phospho_614_0__Complex_formation_: PDK1_613_0_ + S6K_thr_minus_412_633_0_ -> S6K_phospho_cplx_615_0_; S6K_phospho_614_0__Complex_formation__k1*PDK1_613_0_*S6K_thr_minus_412_633_0_ - S6K_phospho_614_0__Complex_formation__k2*S6K_phospho_cplx_615_0_;
    S6K_phospho_614_0__Complex_formation__k1 = 5.018431e11 per_uMole_per_second; S6K_phospho_614_0__Complex_formation__k2 = 4 per_second;
  S6K_phospho_614_0__Product_formation_: S6K_phospho_cplx_615_0_ => PDK1_613_0_ + S6K_thr_minus_252_640_0_; S6K_phospho_614_0__Product_formation__k3*S6K_phospho_cplx_615_0_;
    S6K_phospho_614_0__Product_formation__k3 = 1 per_second;
  dephos_clus_S6K_617_0__Complex_formation_: PP2A_616_0_ + S6K_star__631_0_ -> dephos_clus_S6K_cplx_618_0_; dephos_clus_S6K_617_0__Complex_formation__k1*PP2A_616_0_*S6K_star__631_0_ - dephos_clus_S6K_617_0__Complex_formation__k2*dephos_clus_S6K_cplx_618_0_;
    dephos_clus_S6K_617_0__Complex_formation__k1 = 5.702727e11 per_uMole_per_second; dephos_clus_S6K_617_0__Complex_formation__k2 = 4 per_second;
  dephos_clus_S6K_617_0__Product_formation_: dephos_clus_S6K_cplx_618_0_ => PP2A_616_0_ + S6K_632_0_; dephos_clus_S6K_617_0__Product_formation__k3*dephos_clus_S6K_cplx_618_0_;
    dephos_clus_S6K_617_0__Product_formation__k3 = 1 per_second;
  dephos_S6K_619_0__Complex_formation_: PP2A_616_0_ + S6K_thr_minus_412_633_0_ -> dephos_S6K_cplx_620_0_; dephos_S6K_619_0__Complex_formation__k1*PP2A_616_0_*S6K_thr_minus_412_633_0_ - dephos_S6K_619_0__Complex_formation__k2*dephos_S6K_cplx_620_0_;
    dephos_S6K_619_0__Complex_formation__k1 = 5.702727e11 per_uMole_per_second; dephos_S6K_619_0__Complex_formation__k2 = 4 per_second;
  dephos_S6K_619_0__Product_formation_: dephos_S6K_cplx_620_0_ => PP2A_616_0_ + S6K_star__631_0_; dephos_S6K_619_0__Product_formation__k3*dephos_S6K_cplx_620_0_;
    dephos_S6K_619_0__Product_formation__k3 = 1 per_second;
  dephosp_S6K_621_0__Complex_formation_: PP2A_616_0_ + S6K_thr_minus_252_640_0_ -> dephosp_S6K_cplx_622_0_; dephosp_S6K_621_0__Complex_formation__k1*PP2A_616_0_*S6K_thr_minus_252_640_0_ - dephosp_S6K_621_0__Complex_formation__k2*dephosp_S6K_cplx_622_0_;
    dephosp_S6K_621_0__Complex_formation__k1 = 5.702727e11 per_uMole_per_second; dephosp_S6K_621_0__Complex_formation__k2 = 4 per_second;
  dephosp_S6K_621_0__Product_formation_: dephosp_S6K_cplx_622_0_ => PP2A_616_0_ + S6K_thr_minus_412_633_0_; dephosp_S6K_621_0__Product_formation__k3*dephosp_S6K_cplx_622_0_;
    dephosp_S6K_621_0__Product_formation__k3 = 1 per_second;
  S6K_phospho_628_0__Complex_formation_: TOR_Rheb_minus_GTP_clx_627_0_ + S6K_star__631_0_ -> S6K_phospho_cplx_629_0_; S6K_phospho_628_0__Complex_formation__k1*TOR_Rheb_minus_GTP_clx_627_0_*S6K_star__631_0_ - S6K_phospho_628_0__Complex_formation__k2*S6K_phospho_cplx_629_0_;
    S6K_phospho_628_0__Complex_formation__k1 = 3.763959e11 per_uMole_per_second; S6K_phospho_628_0__Complex_formation__k2 = 0.24 per_second;
  S6K_phospho_628_0__Product_formation_: S6K_phospho_cplx_629_0_ => TOR_Rheb_minus_GTP_clx_627_0_ + S6K_thr_minus_412_633_0_; S6K_phospho_628_0__Product_formation__k3*S6K_phospho_cplx_629_0_;
    S6K_phospho_628_0__Product_formation__k3 = 0.06 per_second;
  S6_phospho_641_0__Complex_formation_: S6K_thr_minus_252_640_0_ + $_40S_inact_637_0_ -> S6_phospho_cplx_642_0_; S6_phospho_641_0__Complex_formation__k1*S6K_thr_minus_252_640_0_*_40S_inact_637_0_ - S6_phospho_641_0__Complex_formation__k2*S6_phospho_cplx_642_0_;
    S6_phospho_641_0__Complex_formation__k1 = 2.007361e12 per_uMole_per_second; S6_phospho_641_0__Complex_formation__k2 = 0.4 per_second;
  S6_phospho_641_0__Product_formation_: S6_phospho_cplx_642_0_ => S6K_thr_minus_252_640_0_ + _40S_639_0_; S6_phospho_641_0__Product_formation__k3*S6_phospho_cplx_642_0_;
    S6_phospho_641_0__Product_formation__k3 = 0.1 per_second;
  cluster_phospho_S6K_644_0__Complex_formation_: MAPK_star__643_0_ + S6K_632_0_ -> cluster_phospho_S6K_cplx_645_0_; cluster_phospho_S6K_644_0__Complex_formation__k1*MAPK_star__643_0_*S6K_632_0_ - cluster_phospho_S6K_644_0__Complex_formation__k2*cluster_phospho_S6K_cplx_645_0_;
    cluster_phospho_S6K_644_0__Complex_formation__k1 = 2.900866e11 per_uMole_per_second; cluster_phospho_S6K_644_0__Complex_formation__k2 = 4 per_second;
  cluster_phospho_S6K_644_0__Product_formation_: cluster_phospho_S6K_cplx_645_0_ => MAPK_star__643_0_ + S6K_star__631_0_; cluster_phospho_S6K_644_0__Product_formation__k3*cluster_phospho_S6K_cplx_645_0_;
    cluster_phospho_S6K_644_0__Product_formation__k3 = 1 per_second;
  basal_648_0__Complex_formation_: _40S_basal_647_0_ + $_40S_inact_637_0_ -> basal_cplx_649_0_; basal_648_0__Complex_formation__k1*_40S_basal_647_0_*_40S_inact_637_0_ - basal_648_0__Complex_formation__k2*basal_cplx_649_0_;
    basal_648_0__Complex_formation__k1 = 2.007361e12 per_uMole_per_second; basal_648_0__Complex_formation__k2 = 0.4 per_second;
  basal_648_0__Product_formation_: basal_cplx_649_0_ => _40S_basal_647_0_ + _40S_639_0_; basal_648_0__Product_formation__k3*basal_cplx_649_0_;
    basal_648_0__Product_formation__k3 = 0.1 per_second;
  basal_S6K_646_0_: S6K_632_0_ => S6K_star__631_0_; basal_S6K_kf*S6K_632_0_;
    basal_S6K_kf = 0.01 per_second;

  // Unit definitions:
  unit substance = 1e-6 mole;
  unit per_uMole_per_second = 1 / (1e-6 mole * second);
  unit per_second = (1e-6 mole)^0 / second;
end
