<?xml version="1.0" encoding="UTF-8"?>
<neuroml xmlns="http://morphml.org/neuroml/schema" xmlns:meta="http://morphml.org/metadata/schema" xmlns:mml="http://morphml.org/morphml/schema" xmlns:bio="http://morphml.org/biophysics/schema" xmlns:cml="http://morphml.org/channelml/schema" xmlns:net="http://morphml.org/networkml/schema" xmlns:xsi="http://www.w3.org/2001/XMLSchema-instance" xsi:schemaLocation="http://morphml.org/neuroml/schema  http://neuroml.svn.sourceforge.net/viewvc/neuroml/trunk/web/NeuroMLFiles/Schemata/v1.8.1/Level3/NeuroML_Level3_v1.8.1.xsd" lengthUnits="micron">

    <cells>
        <cell name="LIF">

            <meta:notes> Non-standard NeuroML: Aditya Gilra's xml of leaky integrate-and-fire cell to correspond to LeakyIaF in MOOSE.</meta:notes>

            <!--Adding the biophysical parameters-->

            <biophysics units="SI Units">

                <bio:mechanism name="integrate_and_fire" type="Channel Mechanism">
                    <!-- setting Rm, Cm, Em, etc to match the Cerebellar Granule Cell 1998
                        which we compared against for type 1 vs type 2 behaviour. -->
                    <bio:parameter name="Cm" value="3.14159e-12"/>
                    <bio:parameter name="Rm" value="9644789647.82"/>
                    <bio:parameter name="Em" value="-0.065"/>
                    <bio:parameter name="v_reset" value="-0.070"/>
                    <bio:parameter name="threshold" value="-0.045"/>
                    <bio:parameter name="t_refrac" value="0.005"/>
                    <bio:parameter name="inject" value="2.5e-12"/>
                </bio:mechanism>

            </biophysics>

        </cell>
    </cells>
</neuroml>
