<?xml version="1.0" encoding="UTF-8"?>
<networkml xmlns="http://morphml.org/networkml/schema" xmlns:meta="http://morphml.org/metadata/schema" xmlns:xsi="http://www.w3.org/2001/XMLSchema-instance" xsi:schemaLocation="http://morphml.org/networkml/schema  http://www.neuroml.org/NeuroMLValidator/NeuroMLFiles/Schemata/v1.8.1/Level3/NetworkML_v1.8.1.xsd" lengthUnits="micrometer">

<meta:notes>

Network structure (NeuroML 1.x) for project: MainenEtAl_PyramidalCell saved with neuroConstruct v1.5.3 on: 16:55:45, 08-Jul-12

Cell Group: OriginalCell contains 1 cells

</meta:notes>

<meta:properties>
    <meta:property tag="neuroConstruct_random_seed" value="1512224207"/>

    <meta:property tag="neuroConstruct_sim_config" value="Default Simulation Configuration"/>

    <meta:property tag="neuroConstruct_sim_duration" value="60.0"/>

    <meta:property tag="neuroConstruct_sim_time_step" value="0.01"/>

    <meta:property tag="neuroConstruct_temperature" value="23.0"/>
</meta:properties>

        <populations>
    <population name="OriginalCell" cell_type="MainenCellMod">
        <meta:properties>

        </meta:properties>
        <instances size="1">
            <instance id="0">
                <location x="0.0" y="0.0" z="0.0"/>
            </instance>
        </instances>
    </population>
</populations>

            <!--There are no synaptic connections present in the network-->

        <inputs units="Physiological Units">
    <input name="SomaStim">
        <pulse_input delay="0.0" duration="500.0" amplitude="5E-4"/>
        <target population="OriginalCell">
            <sites size="1">
                <site cell_id="0" segment_id="0" fraction_along="0.5"/>
            </sites>
        </target>
    </input>
</inputs>

</networkml>
