<?xml version="1.0" encoding="UTF-8"?>

<channelml xmlns="http://morphml.org/channelml/schema"
   xmlns:xsi="http://www.w3.org/2001/XMLSchema-instance"
   xmlns:meta="http://morphml.org/metadata/schema"
   xsi:schemaLocation="http://morphml.org/channelml/schema  http://www.neuroml.org/NeuroMLValidator/NeuroMLFiles/Schemata/v1.8.0/Level2/ChannelML_v1.8.0.xsd"
   units="Physiological Units">

    <meta:notes>ChannelML file containing a single Channel description</meta:notes>

    <channel_type name="LeakCond" density="yes">

        <status value="stable">
            <meta:contributor>
                <meta:name>Padraig Gleeson</meta:name>
            </meta:contributor>
        </status>

        <meta:notes>Simple example of a leak/passive conductance.</meta:notes>

				<meta:publication>
						<meta:fullTitle>Mainen ZF, Joerges J, Huguenard JR, Sejnowski TJ (1995)
						A model of spike initiation in neocortical pyramidal neurons. Neuron 15:1427-39.</meta:fullTitle>
				    <meta:pubmedRef>http://www.ncbi.nlm.nih.gov/pubmed/8845165?dopt=Abstract</meta:pubmedRef>
        </meta:publication>

        <current_voltage_relation cond_law="ohmic" ion="non_specific" default_gmax="0.025" default_erev="-70"/>

    </channel_type>

</channelml>
