<?xml version="1.0" encoding="UTF-8"?>
<neuroml xmlns="http://morphml.org/neuroml/schema" xmlns:meta="http://morphml.org/metadata/schema" xmlns:mml="http://morphml.org/morphml/schema" xmlns:bio="http://morphml.org/biophysics/schema" xmlns:cml="http://morphml.org/channelml/schema" xmlns:net="http://morphml.org/networkml/schema" xmlns:xsi="http://www.w3.org/2001/XMLSchema-instance" xsi:schemaLocation="http://morphml.org/neuroml/schema  http://neuroml.svn.sourceforge.net/viewvc/neuroml/trunk/web/NeuroMLFiles/Schemata/v1.8.1/Level3/NeuroML_Level3_v1.8.1.xsd" lengthUnits="micron">

    <cells>
        <cell name="MainenCellMod">

            <meta:notes>Cell based on morphology imported from scripts obtained at http://senselab.med.yale.edu/senselab/modeldb/ShowModel.asp?model=8210.

Note that this represents the morphology as imported from dks577a.hoc, but this structure is further altered in dks577.append.hoc in the original scripts.

The Simulation Configuration using this cell has the extra hoc code from those script files added when generated in neuroConstruct. See Export network -> NEURON -> Extra hoc code.

The original mod files for the Na and K channels are reused too.

NOTE: channel densities here reflect the usage of pS/um2 as units for conductance densities in the original Na and K mod files!!

This cell is not valid due to the adjustments needed above. Not also it cannot be run on GENESIS as it uses the original mod files in the channels</meta:notes>

            <mml:segments>

                <mml:segment id="0" name="soma__0" cable="0">
                    <mml:proximal x="0.0" y="0.0" z="0.0" diameter="0.0"/>
                    <mml:distal x="0.5" y="-1.375" z="0.0" diameter="5.25"/>
                </mml:segment>

                <mml:segment id="1" name="soma__1" parent="0" cable="0">
                    <mml:distal x="0.5" y="-2.375" z="0.0" diameter="7.25"/>
                </mml:segment>

                <mml:segment id="2" name="soma__2" parent="1" cable="0">
                    <mml:distal x="2.0" y="-1.25" z="0.0" diameter="12.5"/>
                </mml:segment>

                <mml:segment id="3" name="soma__3" parent="2" cable="0">
                    <mml:distal x="2.5" y="-1.2140007" z="0.0" diameter="13.571"/>
                </mml:segment>

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
            </mml:segments>

            <mml:cables>

                <mml:cable id="0" name="soma">
                    <meta:group>all</meta:group>
                    <meta:group>soma_group</meta:group>
                    <meta:group>active</meta:group>
                </mml:cable>

                <mml:cable id="1" name="hill" fract_along_parent="0.49999997">
                    <meta:group>all</meta:group>
                    <meta:group>dendrite_group</meta:group>
                    <meta:group>axon</meta:group>
                    <meta:group>active</meta:group>
                </mml:cable>

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
                <mml:cablegroup name="soma_group">
                    <mml:cable id="0"/>
                </mml:cablegroup>

            </mml:cables>

            <!--Adding the biophysical parameters-->

            <biophysics units="Physiological Units">

                <bio:mechanism name="kd3" type="Channel Mechanism">
                    <bio:parameter name="gmax" value="1000.0">
                        <bio:group>soma_group</bio:group>
                    </bio:parameter>
                </bio:mechanism>

                <bio:mechanism name="na3" type="Channel Mechanism">
                    <bio:parameter name="gmax" value="3000.0">
                        <bio:group>soma_group</bio:group>
                    </bio:parameter>
                </bio:mechanism>

                <bio:mechanism name="LeakCond" type="Channel Mechanism" passive_conductance="true">
                    <bio:parameter name="e" value="-70.0">
                        <bio:group>all</bio:group>
                    </bio:parameter>
                    <bio:parameter name="gmax" value="0.025">
                        <bio:group>all</bio:group>
                    </bio:parameter>
                </bio:mechanism>

                <bio:spec_capacitance>
                    <bio:parameter value="0.75">
                        <bio:group>all</bio:group>
                    </bio:parameter>
                </bio:spec_capacitance>

                <bio:spec_axial_resistance>
                    <bio:parameter value="0.2">
                        <bio:group>all</bio:group>
                    </bio:parameter>
                </bio:spec_axial_resistance>

                <bio:init_memb_potential>
                    <bio:parameter value="-70.0">
                        <bio:group>all</bio:group>
                    </bio:parameter>
                </bio:init_memb_potential></biophysics>

            <connectivity/>

        </cell>
    </cells>
</neuroml>
