<?xml version="1.0" encoding="UTF-8"?>
<neuroml xmlns="http://morphml.org/neuroml/schema" xmlns:meta="http://morphml.org/metadata/schema" xmlns:mml="http://morphml.org/morphml/schema" xmlns:bio="http://morphml.org/biophysics/schema" xmlns:cml="http://morphml.org/channelml/schema" xmlns:net="http://morphml.org/networkml/schema" xmlns:xsi="http://www.w3.org/2001/XMLSchema-instance" xsi:schemaLocation="http://morphml.org/neuroml/schema  http://neuroml.svn.sourceforge.net/viewvc/neuroml/trunk/web/NeuroMLFiles/Schemata/v1.8.1/Level3/NeuroML_Level3_v1.8.1.xsd" lengthUnits="micron">

    <cells>
        <cell name="purk2">

            <meta:notes>Cell: soma exported from NEURON ModelView</meta:notes>

            <mml:segments>

                <mml:segment id="0" name="Seg0_soma" cable="0">
                    <mml:proximal x="0.0" y="0.0" z="0.0" diameter="29.8"/>
                    <mml:distal x="0.0" y="0.0" z="0.0" diameter="29.8"/>
                </mml:segment>

                <mml:segment id="1" name="Seg0_dend_0" parent="0" cable="1">
                    <mml:proximal x="0.0" y="0.0" z="0.0" diameter="7.72"/>
                    <mml:distal x="5.557" y="9.447" z="-9.4470005" diameter="7.72"/>
                </mml:segment>

                <mml:segment id="2" name="Seg0_dend_1" parent="1" cable="2">
                    <mml:proximal x="5.557" y="9.447" z="-9.4470005" diameter="8.22"/>
                    <mml:distal x="13.983" y="31.356" z="-10.571003" diameter="8.22"/>
                </mml:segment>

                <mml:segment id="70" name="Seg0_dend_69" parent="2" cable="3">
                    <mml:proximal x="13.983" y="31.356" z="-10.571003" diameter="5.28"/>
                    <mml:distal x="20.093" y="30.801" z="-11.126003" diameter="5.28"/>
                </mml:segment>

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
            </mml:segments>

            <mml:cables>

                <mml:cable id="0" name="soma">
                    <meta:group>all</meta:group>
                    <meta:group>soma_group</meta:group>
                    <meta:group>ModelViewParmSubset_1</meta:group>
                    <meta:group>ModelViewParmSubset_3</meta:group>
                    <meta:group>ModelViewParmSubset_4</meta:group>
                    <meta:group>OneSecGrp_SectionRef_1</meta:group>
                </mml:cable>

                <mml:cable id="1" name="dend_0" fract_along_parent="0.5">
                    <meta:group>all</meta:group>
                    <meta:group>dendrite_group</meta:group>
                    <meta:group>ModelViewParmSubset_2</meta:group>
                    <meta:group>ModelViewParmSubset_3</meta:group>
                    <meta:group>ModelViewParmSubset_4</meta:group>
                    <meta:group>ModelViewParmSubset_85</meta:group>
                    <meta:group>ModelViewParmSubset_87</meta:group>
                    <meta:group>OneSecGrp_SectionRef_2</meta:group>
                </mml:cable>

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
            </mml:cables>

            <!--Adding the biophysical parameters-->

            <biophysics units="Physiological Units">

                <bio:mechanism name="Leak" type="Channel Mechanism" passive_conductance="true">
                    <bio:parameter name="gmax" value="0.133581">
                        <bio:group>ModelViewParmSubset_28</bio:group>
                    </bio:parameter>
                </bio:mechanism>

                <bio:mechanism name="Leak" type="Channel Mechanism" passive_conductance="true">
                    <bio:parameter name="gmax" value="0.113795">
                        <bio:group>ModelViewParmSubset_20</bio:group>
                    </bio:parameter>
                </bio:mechanism>

                <bio:mechanism name="Leak" type="Channel Mechanism" passive_conductance="true">
                    <bio:parameter name="gmax" value="0.0981576">
                        <bio:group>ModelViewParmSubset_10</bio:group>
                    </bio:parameter>
                </bio:mechanism>

                <bio:mechanism name="Leak" type="Channel Mechanism" passive_conductance="true">
                    <bio:parameter name="gmax" value="0.0333333">
                        <bio:group>ModelViewParmSubset_87</bio:group>
                    </bio:parameter>
                </bio:mechanism>

                <bio:mechanism name="Leak" type="Channel Mechanism" passive_conductance="true">
                    <bio:parameter name="gmax" value="0.268529">
                        <bio:group>ModelViewParmSubset_47</bio:group>
                    </bio:parameter>
                </bio:mechanism>

                <bio:mechanism name="Leak" type="Channel Mechanism" passive_conductance="true">
                    <bio:parameter name="gmax" value="0.171268">
                        <bio:group>ModelViewParmSubset_37</bio:group>
                    </bio:parameter>
                </bio:mechanism>

                <bio:mechanism name="Leak" type="Channel Mechanism" passive_conductance="true">
                    <bio:parameter name="gmax" value="0.165314">
                        <bio:group>ModelViewParmSubset_36</bio:group>
                    </bio:parameter>
                </bio:mechanism>

                <bio:mechanism name="Leak" type="Channel Mechanism" passive_conductance="true">
                    <bio:parameter name="gmax" value="0.130398">
                        <bio:group>ModelViewParmSubset_27</bio:group>
                    </bio:parameter>
                </bio:mechanism>

                <bio:mechanism name="Leak" type="Channel Mechanism" passive_conductance="true">
                    <bio:parameter name="gmax" value="0.147279">
                        <bio:group>ModelViewParmSubset_32</bio:group>
                    </bio:parameter>
                </bio:mechanism>

                <bio:mechanism name="Leak" type="Channel Mechanism" passive_conductance="true">
                    <bio:parameter name="gmax" value="0.139992">
                        <bio:group>ModelViewParmSubset_30</bio:group>
                    </bio:parameter>
                </bio:mechanism>

                <bio:mechanism name="Leak" type="Channel Mechanism" passive_conductance="true">
                    <bio:parameter name="gmax" value="0.102042">
                        <bio:group>ModelViewParmSubset_13</bio:group>
                    </bio:parameter>
                </bio:mechanism>

                <bio:mechanism name="Leak" type="Channel Mechanism" passive_conductance="true">
                    <bio:parameter name="gmax" value="0.198606">
                        <bio:group>ModelViewParmSubset_41</bio:group>
                    </bio:parameter>
                </bio:mechanism>

                <bio:mechanism name="Leak" type="Channel Mechanism" passive_conductance="true">
                    <bio:parameter name="gmax" value="0.112068">
                        <bio:group>ModelViewParmSubset_19</bio:group>
                    </bio:parameter>
                </bio:mechanism>

                <bio:mechanism name="Leak" type="Channel Mechanism" passive_conductance="true">
                    <bio:parameter name="gmax" value="0.183704">
                        <bio:group>ModelViewParmSubset_39</bio:group>
                    </bio:parameter>
                </bio:mechanism>

                <bio:mechanism name="Leak" type="Channel Mechanism" passive_conductance="true">
                    <bio:parameter name="gmax" value="0.228496">
                        <bio:group>ModelViewParmSubset_44</bio:group>
                    </bio:parameter>
                </bio:mechanism>

                <bio:mechanism name="Leak" type="Channel Mechanism" passive_conductance="true">
                    <bio:parameter name="gmax" value="0.108519">
                        <bio:group>ModelViewParmSubset_17</bio:group>
                    </bio:parameter>
                </bio:mechanism>

                <bio:mechanism name="Leak" type="Channel Mechanism" passive_conductance="true">
                    <bio:parameter name="gmax" value="0.160731">
                        <bio:group>ModelViewParmSubset_35</bio:group>
                    </bio:parameter>
                </bio:mechanism>

                <bio:mechanism name="Leak" type="Channel Mechanism" passive_conductance="true">
                    <bio:parameter name="gmax" value="0.23946">
                        <bio:group>ModelViewParmSubset_45</bio:group>
                    </bio:parameter>
                </bio:mechanism>

                <bio:mechanism name="Leak" type="Channel Mechanism" passive_conductance="true">
                    <bio:parameter name="gmax" value="0.122388">
                        <bio:group>ModelViewParmSubset_24</bio:group>
                    </bio:parameter>
                </bio:mechanism>

                <bio:mechanism name="Leak" type="Channel Mechanism" passive_conductance="true">
                    <bio:parameter name="gmax" value="0.136397">
                        <bio:group>ModelViewParmSubset_29</bio:group>
                    </bio:parameter>
                </bio:mechanism>

                <bio:mechanism name="Leak" type="Channel Mechanism" passive_conductance="true">
                    <bio:parameter name="gmax" value="0.1">
                        <bio:group>OneSecGrp_SectionRef_1</bio:group>
                    </bio:parameter>
                </bio:mechanism>

                <bio:mechanism name="Leak" type="Channel Mechanism" passive_conductance="true">
                    <bio:parameter name="gmax" value="0.176656">
                        <bio:group>ModelViewParmSubset_38</bio:group>
                    </bio:parameter>
                </bio:mechanism>

                <bio:mechanism name="Leak" type="Channel Mechanism" passive_conductance="true">
                    <bio:parameter name="gmax" value="0.100779">
                        <bio:group>ModelViewParmSubset_12</bio:group>
                    </bio:parameter>
                </bio:mechanism>

                <bio:mechanism name="Leak" type="Channel Mechanism" passive_conductance="true">
                    <bio:parameter name="gmax" value="0.120278">
                        <bio:group>ModelViewParmSubset_23</bio:group>
                    </bio:parameter>
                </bio:mechanism>

                <bio:mechanism name="Leak" type="Channel Mechanism" passive_conductance="true">
                    <bio:parameter name="gmax" value="0.104995">
                        <bio:group>ModelViewParmSubset_15</bio:group>
                    </bio:parameter>
                </bio:mechanism>

                <bio:mechanism name="Leak" type="Channel Mechanism" passive_conductance="true">
                    <bio:parameter name="gmax" value="0.150931">
                        <bio:group>ModelViewParmSubset_33</bio:group>
                    </bio:parameter>
                </bio:mechanism>

                <bio:mechanism name="Leak" type="Channel Mechanism" passive_conductance="true">
                    <bio:parameter name="gmax" value="0.19013">
                        <bio:group>ModelViewParmSubset_40</bio:group>
                    </bio:parameter>
                </bio:mechanism>

                <bio:mechanism name="Leak" type="Channel Mechanism" passive_conductance="true">
                    <bio:parameter name="gmax" value="0.254361">
                        <bio:group>ModelViewParmSubset_46</bio:group>
                    </bio:parameter>
                </bio:mechanism>

                <bio:mechanism name="Leak" type="Channel Mechanism" passive_conductance="true">
                    <bio:parameter name="gmax" value="0.103622">
                        <bio:group>ModelViewParmSubset_14</bio:group>
                    </bio:parameter>
                </bio:mechanism>

                <bio:mechanism name="Leak" type="Channel Mechanism" passive_conductance="true">
                    <bio:parameter name="gmax" value="0.12506">
                        <bio:group>ModelViewParmSubset_25</bio:group>
                    </bio:parameter>
                </bio:mechanism>

                <bio:mechanism name="Leak" type="Channel Mechanism" passive_conductance="true">
                    <bio:parameter name="gmax" value="0.206402">
                        <bio:group>ModelViewParmSubset_42</bio:group>
                    </bio:parameter>
                </bio:mechanism>

                <bio:mechanism name="Leak" type="Channel Mechanism" passive_conductance="true">
                    <bio:parameter name="gmax" value="0.0957322">
                        <bio:group>ModelViewParmSubset_8</bio:group>
                    </bio:parameter>
                </bio:mechanism>

                <bio:mechanism name="Leak" type="Channel Mechanism" passive_conductance="true">
                    <bio:parameter name="gmax" value="0.110092">
                        <bio:group>ModelViewParmSubset_18</bio:group>
                    </bio:parameter>
                </bio:mechanism>

                <bio:mechanism name="Leak" type="Channel Mechanism" passive_conductance="true">
                    <bio:parameter name="gmax" value="0.143185">
                        <bio:group>ModelViewParmSubset_31</bio:group>
                    </bio:parameter>
                </bio:mechanism>

                <bio:mechanism name="Leak" type="Channel Mechanism" passive_conductance="true">
                    <bio:parameter name="gmax" value="0.127897">
                        <bio:group>ModelViewParmSubset_26</bio:group>
                    </bio:parameter>
                </bio:mechanism>

                <bio:mechanism name="Leak" type="Channel Mechanism" passive_conductance="true">
                    <bio:parameter name="gmax" value="0.0923213">
                        <bio:group>ModelViewParmSubset_5</bio:group>
                    </bio:parameter>
                </bio:mechanism>

                <bio:mechanism name="Leak" type="Channel Mechanism" passive_conductance="true">
                    <bio:parameter name="gmax" value="0.0993235">
                        <bio:group>ModelViewParmSubset_11</bio:group>
                    </bio:parameter>
                </bio:mechanism>

                <bio:mechanism name="Leak" type="Channel Mechanism" passive_conductance="true">
                    <bio:parameter name="gmax" value="0.106714">
                        <bio:group>ModelViewParmSubset_16</bio:group>
                    </bio:parameter>
                </bio:mechanism>

                <bio:mechanism name="Leak" type="Channel Mechanism" passive_conductance="true">
                    <bio:parameter name="gmax" value="0.11597">
                        <bio:group>ModelViewParmSubset_21</bio:group>
                    </bio:parameter>
                </bio:mechanism>

                <bio:mechanism name="Leak" type="Channel Mechanism" passive_conductance="true">
                    <bio:parameter name="gmax" value="0.0932852">
                        <bio:group>ModelViewParmSubset_6</bio:group>
                    </bio:parameter>
                </bio:mechanism>

                <bio:mechanism name="Leak" type="Channel Mechanism" passive_conductance="true">
                    <bio:parameter name="gmax" value="0.0944842">
                        <bio:group>ModelViewParmSubset_7</bio:group>
                    </bio:parameter>
                </bio:mechanism>

                <bio:mechanism name="Leak" type="Channel Mechanism" passive_conductance="true">
                    <bio:parameter name="gmax" value="0.307143">
                        <bio:group>ModelViewParmSubset_48</bio:group>
                    </bio:parameter>
                </bio:mechanism>

                <bio:mechanism name="Leak" type="Channel Mechanism" passive_conductance="true">
                    <bio:parameter name="gmax" value="0.174451">
                        <bio:group>OneSecGrp_SectionRef_98</bio:group>
                    </bio:parameter>
                </bio:mechanism>

                <bio:mechanism name="Leak" type="Channel Mechanism" passive_conductance="true">
                    <bio:parameter name="gmax" value="0.216786">
                        <bio:group>ModelViewParmSubset_43</bio:group>
                    </bio:parameter>
                </bio:mechanism>

                <bio:mechanism name="Leak" type="Channel Mechanism" passive_conductance="true">
                    <bio:parameter name="e" value="-80.0">
                        <bio:group>all</bio:group>
                    </bio:parameter>
                    <bio:parameter name="gmax" value="-1.0E8">
                        <bio:group>all</bio:group>
                    </bio:parameter>
                    <bio:parameter name="el" value="-80.0">    <!--Note: Units of extra parameters are not known, except if it's e!!-->

                        <bio:group>all</bio:group>
                    </bio:parameter>
                </bio:mechanism>

                <bio:mechanism name="Leak" type="Channel Mechanism" passive_conductance="true">
                    <bio:parameter name="gmax" value="0.117874">
                        <bio:group>ModelViewParmSubset_22</bio:group>
                    </bio:parameter>
                </bio:mechanism>

                <bio:mechanism name="Leak" type="Channel Mechanism" passive_conductance="true">
                    <bio:parameter name="gmax" value="0.0968117">
                        <bio:group>ModelViewParmSubset_9</bio:group>
                    </bio:parameter>
                </bio:mechanism>

                <bio:mechanism name="Leak" type="Channel Mechanism" passive_conductance="true">
                    <bio:parameter name="gmax" value="0.155635">
                        <bio:group>ModelViewParmSubset_34</bio:group>
                    </bio:parameter>
                </bio:mechanism>

                <bio:spec_capacitance>
                    <bio:parameter value="5.70571">
                        <bio:group>ModelViewParmSubset_21</bio:group>
                    </bio:parameter>

                    <bio:parameter value="12.5145">
                        <bio:group>ModelViewParmSubset_46</bio:group>
                    </bio:parameter>

                    <bio:parameter value="5.16573">
                        <bio:group>ModelViewParmSubset_15</bio:group>
                    </bio:parameter>

                    <bio:parameter value="10.155">
                        <bio:group>ModelViewParmSubset_42</bio:group>
                    </bio:parameter>

                    <bio:parameter value="4.95833">
                        <bio:group>ModelViewParmSubset_12</bio:group>
                    </bio:parameter>

                    <bio:parameter value="9.03825">
                        <bio:group>ModelViewParmSubset_39</bio:group>
                    </bio:parameter>

                    <bio:parameter value="5.91766">
                        <bio:group>ModelViewParmSubset_23</bio:group>
                    </bio:parameter>

                    <bio:parameter value="5.09819">
                        <bio:group>ModelViewParmSubset_14</bio:group>
                    </bio:parameter>

                    <bio:parameter value="15.1114">
                        <bio:group>ModelViewParmSubset_48</bio:group>
                    </bio:parameter>

                    <bio:parameter value="9.35442">
                        <bio:group>ModelViewParmSubset_40</bio:group>
                    </bio:parameter>

                    <bio:parameter value="4.71002">
                        <bio:group>ModelViewParmSubset_8</bio:group>
                    </bio:parameter>

                    <bio:parameter value="4.58963">
                        <bio:group>ModelViewParmSubset_6</bio:group>
                    </bio:parameter>

                    <bio:parameter value="4.54221">
                        <bio:group>ModelViewParmSubset_5</bio:group>
                    </bio:parameter>

                    <bio:parameter value="5.51376">
                        <bio:group>ModelViewParmSubset_19</bio:group>
                    </bio:parameter>

                    <bio:parameter value="5.59871">
                        <bio:group>ModelViewParmSubset_20</bio:group>
                    </bio:parameter>

                    <bio:parameter value="10.6659">
                        <bio:group>ModelViewParmSubset_43</bio:group>
                    </bio:parameter>

                    <bio:parameter value="4.76314">
                        <bio:group>ModelViewParmSubset_9</bio:group>
                    </bio:parameter>

                    <bio:parameter value="5.79939">
                        <bio:group>ModelViewParmSubset_22</bio:group>
                    </bio:parameter>

                    <bio:parameter value="7.04471">
                        <bio:group>ModelViewParmSubset_31</bio:group>
                    </bio:parameter>

                    <bio:parameter value="1.64">
                        <bio:group>ModelViewParmSubset_4</bio:group>
                    </bio:parameter>

                    <bio:parameter value="5.33913">
                        <bio:group>ModelViewParmSubset_17</bio:group>
                    </bio:parameter>

                    <bio:parameter value="6.71071">
                        <bio:group>ModelViewParmSubset_29</bio:group>
                    </bio:parameter>

                    <bio:parameter value="7.24613">
                        <bio:group>ModelViewParmSubset_32</bio:group>
                    </bio:parameter>

                    <bio:parameter value="13.2116">
                        <bio:group>ModelViewParmSubset_47</bio:group>
                    </bio:parameter>

                    <bio:parameter value="6.41559">
                        <bio:group>ModelViewParmSubset_27</bio:group>
                    </bio:parameter>

                    <bio:parameter value="4.64862">
                        <bio:group>ModelViewParmSubset_7</bio:group>
                    </bio:parameter>

                    <bio:parameter value="8.13343">
                        <bio:group>ModelViewParmSubset_36</bio:group>
                    </bio:parameter>

                    <bio:parameter value="7.42581">
                        <bio:group>ModelViewParmSubset_33</bio:group>
                    </bio:parameter>

                    <bio:parameter value="4.82935">
                        <bio:group>ModelViewParmSubset_10</bio:group>
                    </bio:parameter>

                    <bio:parameter value="6.15293">
                        <bio:group>ModelViewParmSubset_25</bio:group>
                    </bio:parameter>

                    <bio:parameter value="8.69146">
                        <bio:group>ModelViewParmSubset_38</bio:group>
                    </bio:parameter>

                    <bio:parameter value="5.41651">
                        <bio:group>ModelViewParmSubset_18</bio:group>
                    </bio:parameter>

                    <bio:parameter value="8.58298">
                        <bio:group>OneSecGrp_SectionRef_98</bio:group>
                    </bio:parameter>

                    <bio:parameter value="11.242">
                        <bio:group>ModelViewParmSubset_44</bio:group>
                    </bio:parameter>

                    <bio:parameter value="9.77141">
                        <bio:group>ModelViewParmSubset_41</bio:group>
                    </bio:parameter>

                    <bio:parameter value="7.90796">
                        <bio:group>ModelViewParmSubset_35</bio:group>
                    </bio:parameter>

                    <bio:parameter value="6.57217">
                        <bio:group>ModelViewParmSubset_28</bio:group>
                    </bio:parameter>

                    <bio:parameter value="4.88672">
                        <bio:group>ModelViewParmSubset_11</bio:group>
                    </bio:parameter>

                    <bio:parameter value="6.29251">
                        <bio:group>ModelViewParmSubset_26</bio:group>
                    </bio:parameter>

                    <bio:parameter value="11.7814">
                        <bio:group>ModelViewParmSubset_45</bio:group>
                    </bio:parameter>

                    <bio:parameter value="8.42637">
                        <bio:group>ModelViewParmSubset_37</bio:group>
                    </bio:parameter>

                    <bio:parameter value="6.02149">
                        <bio:group>ModelViewParmSubset_24</bio:group>
                    </bio:parameter>

                    <bio:parameter value="5.25035">
                        <bio:group>ModelViewParmSubset_16</bio:group>
                    </bio:parameter>

                    <bio:parameter value="6.8876">
                        <bio:group>ModelViewParmSubset_30</bio:group>
                    </bio:parameter>

                    <bio:parameter value="7.65725">
                        <bio:group>ModelViewParmSubset_34</bio:group>
                    </bio:parameter>

                    <bio:parameter value="5.02047">
                        <bio:group>ModelViewParmSubset_13</bio:group>
                    </bio:parameter>
                </bio:spec_capacitance>

                <bio:spec_axial_resistance>
                    <bio:parameter value="0.25">
                        <bio:group>all</bio:group>
                    </bio:parameter>
                </bio:spec_axial_resistance>

                <bio:init_memb_potential>
                    <bio:parameter value="-65.0">
                        <bio:group>all</bio:group>
                    </bio:parameter>
                </bio:init_memb_potential></biophysics>

            <connectivity/>

        </cell>
    </cells>
</neuroml>
