<?xml version="1.0" encoding="UTF-8"?>
<networkml xmlns="http://morphml.org/networkml/schema" xmlns:meta="http://morphml.org/metadata/schema" xmlns:xsi="http://www.w3.org/2001/XMLSchema-instance" xsi:schemaLocation="http://morphml.org/networkml/schema  http://www.neuroml.org/NeuroMLValidator/NeuroMLFiles/Schemata/v1.8.1/Level3/NetworkML_v1.8.1.xsd" lengthUnits="micrometer">

<meta:notes>

Network structure (NeuroML 1.x) for project: neuroConstructDefault saved with neuroConstruct v1.5.1 on: 14:35:05, 15-Nov-11

Cell Group: SampleCellGroup contains 1 cells

</meta:notes>

<meta:properties>
    <meta:property tag="neuroConstruct_random_seed" value="111724926"/>

    <meta:property tag="neuroConstruct_sim_config" value="Default Simulation Configuration"/>
</meta:properties>

        <populations>
    <population name="SampleCellGroup" cell_type="SampleCell">
        <meta:properties>

        </meta:properties>
        <instances size="1">
            <instance id="0">
                <location x="13.635313" y="19.450935" z="90.10128"/>
            </instance>
        </instances>
    </population>
</populations>

            <!--There are no synaptic connections present in the network-->

        <inputs units="Physiological Units">
    <input name="SampleIClamp">
        <!--<pulse_input delay="20.0" duration="60.0" amplitude="2.0E-4"/>-->
        <!-- injecting directly into soma.inject in the cell's MorphML -->
        <pulse_input delay="20.0" duration="60.0" amplitude="0.0"/>
        <target population="SampleCellGroup">
            <sites size="1">
                <site cell_id="0" segment_id="0" fraction_along="0.5"/>
            </sites>
        </target>
    </input>
</inputs>

</networkml>
