// SBML level 2 version 4

model v20()

  // Compartments:
  compartment CaMKII_636_0_ = 8.966909e-17;
  compartment PSD_663_0_ = 9.963233e-18;
  compartment CaMKII_PSD_678_0_ = 9.963233e-18;
  compartment kinetics_602_0_ = 8.966909e-17;

  // Species:
  substanceOnly species CaMKII_637_0_ in CaMKII_636_0_ = 1.793382e-15;
  substanceOnly species CaMKII_minus_CaM_638_0_ in CaMKII_636_0_ = 0;
  substanceOnly species CaMKII_minus_thr286_star__minus_CaM_639_0_ in CaMKII_636_0_ = 0;
  substanceOnly species CaMKII_star__star__star__640_0_ in CaMKII_636_0_ = 0;
  substanceOnly species CaMKII_minus_thr286_643_0_ in CaMKII_636_0_ = 0;
  substanceOnly species CaMK_minus_thr306_644_0_ in CaMKII_636_0_ = 0;
  substanceOnly species $tot_CaM_CaMKII_645_0_ in CaMKII_636_0_;
  substanceOnly species CaM_act_305_cplx_647_0_ in CaMKII_636_0_ = 0;
  substanceOnly species CaM_act_286_cplx_649_0_ in CaMKII_636_0_ = 0;
  substanceOnly species $tot_autonomous_CaMKII_650_0_ in CaMKII_636_0_;
  substanceOnly species auton_305_cplx_652_0_ in CaMKII_636_0_ = 0;
  substanceOnly species auton_286_cplx_654_0_ in CaMKII_636_0_ = 0;
  substanceOnly species Ca_minus_PSD_664_0_ in PSD_663_0_ = 7.970586e-19;
  substanceOnly species $Ca_control_PSD_665_0_ in PSD_663_0_ = 7.970586e-19;
  substanceOnly species PP1_on_CaMKII_PSD_666_0_ in PSD_663_0_ = 3.985293e-18;
  substanceOnly species Deph_minus_thr286_cplx_668_0_ in PSD_663_0_ = 0;
  substanceOnly species Deph_minus_thr286b_cplx_670_0_ in PSD_663_0_ = 0;
  substanceOnly species Deph_minus_thr286c_cplx_672_0_ in PSD_663_0_ = 0;
  substanceOnly species Deph_minus_thr305_cplx_674_0_ in PSD_663_0_ = 0;
  substanceOnly species Deph_minus_thr306_cplx_676_0_ in PSD_663_0_ = 0;
  substanceOnly species $CaM_minus_Ca4_minus_PSD_677_0_ in PSD_663_0_ = 1.594117e-22;
  substanceOnly species $_286P_minus_PSD_679_0_ in CaMKII_PSD_678_0_;
  substanceOnly species $actCaMKII_minus_PSD_680_0_ in CaMKII_PSD_678_0_;
  substanceOnly species $tot_CaMKII_PSD_681_0_ in CaMKII_PSD_678_0_;
  substanceOnly species basal_CaMKII_PSD_682_0_ in CaMKII_PSD_678_0_ = 1.992647e-18;
  substanceOnly species $basal_CaMKII_PSD_control_684_0_ in CaMKII_PSD_678_0_ = 1.992647e-18;
  substanceOnly species CaMKII_minus_thr286_minus_CaM_minus_PSD_688_0_ in CaMKII_PSD_678_0_ = 0;
  substanceOnly species CaMKII_minus_CaM_minus_PSD_689_0_ in CaMKII_PSD_678_0_ = 0;
  substanceOnly species CaMKII_minus_thr286_minus_PSD_690_0_ in CaMKII_PSD_678_0_ = 0;
  substanceOnly species CaMKII_minus_PSD_691_0_ in CaMKII_PSD_678_0_ = 0;
  substanceOnly species CaMKII_star__star__star__minus_PSD_692_0_ in CaMKII_PSD_678_0_ = 0;
  substanceOnly species CaMKII_minus_thr306_minus_PSD_693_0_ in CaMKII_PSD_678_0_ = 0;
  substanceOnly species $tot_minus_CaM_minus_CaMKII_minus_PSD_694_0_ in CaMKII_PSD_678_0_;
  substanceOnly species CaM_minus_act_minus_305_minus_PSD_cplx_696_0_ in CaMKII_PSD_678_0_ = 0;
  substanceOnly species CaM_minus_act_minus_286_minus_PSD_cplx_698_0_ in CaMKII_PSD_678_0_ = 0;
  substanceOnly species CaM_act_autoph_cplx_700_0_ in CaMKII_PSD_678_0_ = 0;
  substanceOnly species $tot_minus_auto_minus_PSD_701_0_ in CaMKII_PSD_678_0_;
  substanceOnly species auton_minus_305_minus_PSD_cplx_703_0_ in CaMKII_PSD_678_0_ = 0;
  substanceOnly species auton_minus_286_minus_PSD_cplx_705_0_ in CaMKII_PSD_678_0_ = 0;
  substanceOnly species auton_minus_autoph_cplx_707_0_ in CaMKII_PSD_678_0_ = 0;
  substanceOnly species NMDAR_708_0_ in CaMKII_PSD_678_0_ = 1.195588e-15;
  substanceOnly species $CaMKII_PSD_auton_readout_709_0_ in CaMKII_PSD_678_0_;
  substanceOnly species $CaM_minus_Ca4_623_0_ in kinetics_602_0_ = 1.434706e-21;
  substanceOnly species PP1_minus_active_624_0_ in kinetics_602_0_ = 8.966909e-19;
  substanceOnly species Deph_minus_thr286_cplx_626_0_ in kinetics_602_0_ = 0;
  substanceOnly species Deph_minus_thr286b_cplx_628_0_ in kinetics_602_0_ = 0;
  substanceOnly species Deph_minus_thr305_cplx_630_0_ in kinetics_602_0_ = 0;
  substanceOnly species Deph_minus_thr306_cplx_632_0_ in kinetics_602_0_ = 0;
  substanceOnly species Deph_minus_thr286c_cplx_634_0_ in kinetics_602_0_ = 0;
  substanceOnly species Ca_635_0_ in kinetics_602_0_ = 7.173528e-18;
  substanceOnly species $tot_CaMKII_cyt_659_0_ in kinetics_602_0_;
  substanceOnly species $act_CaMKII_cyt_660_0_ in kinetics_602_0_;
  substanceOnly species $basal_CaMKII_cyt_661_0_ in kinetics_602_0_ = 4.483455e-17;

  // Assignment rules:
  tot_CaM_CaMKII_645_0_ := CaMKII_minus_CaM_638_0_ + CaMKII_minus_thr286_star__minus_CaM_639_0_;
  tot_autonomous_CaMKII_650_0_ := CaMKII_minus_thr286_643_0_ + CaMKII_star__star__star__640_0_ + basal_CaMKII_cyt_661_0_;
  _286P_minus_PSD_679_0_ := CaMKII_minus_thr286_minus_CaM_minus_PSD_688_0_ + CaMKII_minus_thr286_minus_PSD_690_0_;
  actCaMKII_minus_PSD_680_0_ := CaMKII_minus_thr286_minus_CaM_minus_PSD_688_0_ + CaMKII_minus_CaM_minus_PSD_689_0_ + tot_minus_auto_minus_PSD_701_0_;
  tot_CaMKII_PSD_681_0_ := actCaMKII_minus_PSD_680_0_ + CaMKII_minus_PSD_691_0_ + CaMKII_minus_thr306_minus_PSD_693_0_;
  tot_minus_CaM_minus_CaMKII_minus_PSD_694_0_ := CaMKII_minus_thr286_minus_CaM_minus_PSD_688_0_ + CaMKII_minus_CaM_minus_PSD_689_0_;
  tot_minus_auto_minus_PSD_701_0_ := CaMKII_minus_thr286_minus_PSD_690_0_ + CaMKII_star__star__star__minus_PSD_692_0_ + basal_CaMKII_PSD_682_0_;
  CaMKII_PSD_auton_readout_709_0_ := CaMKII_star__star__star__minus_PSD_692_0_ + CaMKII_minus_thr286_minus_PSD_690_0_ + basal_CaMKII_PSD_682_0_;
  tot_CaMKII_cyt_659_0_ := CaMKII_minus_CaM_638_0_ + CaMKII_minus_thr286_star__minus_CaM_639_0_ + CaMKII_minus_thr286_643_0_ + CaMKII_star__star__star__640_0_ + CaMK_minus_thr306_644_0_ + CaMKII_637_0_ + basal_CaMKII_cyt_661_0_;
  act_CaMKII_cyt_660_0_ := tot_CaM_CaMKII_645_0_ + tot_autonomous_CaMKII_650_0_;

  // Reactions:
  CaM_act_305_646_0__Complex_formation_: $tot_CaM_CaMKII_645_0_ + CaMKII_minus_thr286_643_0_ -> CaM_act_305_cplx_647_0_; CaM_act_305_646_0__Complex_formation__k1*tot_CaM_CaMKII_645_0_*CaMKII_minus_thr286_643_0_ - CaM_act_305_646_0__Complex_formation__k2*CaM_act_305_cplx_647_0_;
    CaM_act_305_646_0__Complex_formation__k1 = 2.945068e15 per_uMole_per_second; CaM_act_305_646_0__Complex_formation__k2 = 24 per_second;
  CaM_act_305_646_0__Product_formation_: CaM_act_305_cplx_647_0_ => $tot_CaM_CaMKII_645_0_ + CaMKII_star__star__star__640_0_; CaM_act_305_646_0__Product_formation__k3*CaM_act_305_cplx_647_0_;
    CaM_act_305_646_0__Product_formation__k3 = 6 per_second;
  CaM_act_286_648_0__Complex_formation_: $tot_CaM_CaMKII_645_0_ + CaMKII_minus_CaM_638_0_ -> CaM_act_286_cplx_649_0_; CaM_act_286_648_0__Complex_formation__k1*tot_CaM_CaMKII_645_0_*CaMKII_minus_CaM_638_0_ - CaM_act_286_648_0__Complex_formation__k2*CaM_act_286_cplx_649_0_;
    CaM_act_286_648_0__Complex_formation__k1 = 245420344367870 per_uMole_per_second; CaM_act_286_648_0__Complex_formation__k2 = 2 per_second;
  CaM_act_286_648_0__Product_formation_: CaM_act_286_cplx_649_0_ => $tot_CaM_CaMKII_645_0_ + CaMKII_minus_thr286_star__minus_CaM_639_0_; CaM_act_286_648_0__Product_formation__k3*CaM_act_286_cplx_649_0_;
    CaM_act_286_648_0__Product_formation__k3 = 0.5 per_second;
  auton_305_651_0__Complex_formation_: $tot_autonomous_CaMKII_650_0_ + CaMKII_minus_thr286_643_0_ -> auton_305_cplx_652_0_; auton_305_651_0__Complex_formation__k1*tot_autonomous_CaMKII_650_0_*CaMKII_minus_thr286_643_0_ - auton_305_651_0__Complex_formation__k2*auton_305_cplx_652_0_;
    auton_305_651_0__Complex_formation__k1 = 1.911789e15 per_uMole_per_second; auton_305_651_0__Complex_formation__k2 = 24 per_second;
  auton_305_651_0__Product_formation_: auton_305_cplx_652_0_ => $tot_autonomous_CaMKII_650_0_ + CaMKII_star__star__star__640_0_; auton_305_651_0__Product_formation__k3*auton_305_cplx_652_0_;
    auton_305_651_0__Product_formation__k3 = 6 per_second;
  auton_286_653_0__Complex_formation_: $tot_autonomous_CaMKII_650_0_ + CaMKII_minus_CaM_638_0_ -> auton_286_cplx_654_0_; auton_286_653_0__Complex_formation__k1*tot_autonomous_CaMKII_650_0_*CaMKII_minus_CaM_638_0_ - auton_286_653_0__Complex_formation__k2*auton_286_cplx_654_0_;
    auton_286_653_0__Complex_formation__k1 = 159321783196240 per_uMole_per_second; auton_286_653_0__Complex_formation__k2 = 2 per_second;
  auton_286_653_0__Product_formation_: auton_286_cplx_654_0_ => $tot_autonomous_CaMKII_650_0_ + CaMKII_minus_thr286_star__minus_CaM_639_0_; auton_286_653_0__Product_formation__k3*auton_286_cplx_654_0_;
    auton_286_653_0__Product_formation__k3 = 0.5 per_second;
  CaMKII_minus_bind_minus_CaM_641_0_: $CaM_minus_Ca4_623_0_ + CaMKII_637_0_ -> CaMKII_minus_CaM_638_0_; CaMKII_minus_bind_minus_CaM_kf*CaM_minus_Ca4_623_0_*CaMKII_637_0_ - CaMKII_minus_bind_minus_CaM_kb*CaMKII_minus_CaM_638_0_;
    CaMKII_minus_bind_minus_CaM_kf = 2.230421e17 per_uMole_per_second; CaMKII_minus_bind_minus_CaM_kb = 2 per_second;
  CaMK_minus_thr286_minus_bind_minus_CaM_642_0_: $CaM_minus_Ca4_623_0_ + CaMKII_minus_thr286_643_0_ -> CaMKII_minus_thr286_star__minus_CaM_639_0_; CaMK_minus_thr286_minus_bind_minus_CaM_kf*CaM_minus_Ca4_623_0_*CaMKII_minus_thr286_643_0_ - CaMK_minus_thr286_minus_bind_minus_CaM_kb*CaMKII_minus_thr286_star__minus_CaM_639_0_;
    CaMK_minus_thr286_minus_bind_minus_CaM_kf = 1.115421e19 per_uMole_per_second; CaMK_minus_thr286_minus_bind_minus_CaM_kb = 0.1 per_second;
  Deph_minus_thr286_667_0__Complex_formation_: PP1_on_CaMKII_PSD_666_0_ + CaMKII_minus_thr286_minus_CaM_minus_PSD_688_0_ -> Deph_minus_thr286_cplx_668_0_; Deph_minus_thr286_667_0__Complex_formation__k1*PP1_on_CaMKII_PSD_666_0_*CaMKII_minus_thr286_minus_CaM_minus_PSD_688_0_ - Deph_minus_thr286_667_0__Complex_formation__k2*Deph_minus_thr286_cplx_668_0_;
    Deph_minus_thr286_667_0__Complex_formation__k1 = 5.018431e17 per_uMole_per_second; Deph_minus_thr286_667_0__Complex_formation__k2 = 4 per_second;
  Deph_minus_thr286_667_0__Product_formation_: Deph_minus_thr286_cplx_668_0_ => PP1_on_CaMKII_PSD_666_0_ + CaMKII_minus_CaM_minus_PSD_689_0_; Deph_minus_thr286_667_0__Product_formation__k3*Deph_minus_thr286_cplx_668_0_;
    Deph_minus_thr286_667_0__Product_formation__k3 = 1 per_second;
  Deph_minus_thr286b_669_0__Complex_formation_: PP1_on_CaMKII_PSD_666_0_ + CaMKII_minus_thr286_minus_PSD_690_0_ -> Deph_minus_thr286b_cplx_670_0_; Deph_minus_thr286b_669_0__Complex_formation__k1*PP1_on_CaMKII_PSD_666_0_*CaMKII_minus_thr286_minus_PSD_690_0_ - Deph_minus_thr286b_669_0__Complex_formation__k2*Deph_minus_thr286b_cplx_670_0_;
    Deph_minus_thr286b_669_0__Complex_formation__k1 = 5.018431e17 per_uMole_per_second; Deph_minus_thr286b_669_0__Complex_formation__k2 = 4 per_second;
  Deph_minus_thr286b_669_0__Product_formation_: Deph_minus_thr286b_cplx_670_0_ => PP1_on_CaMKII_PSD_666_0_ + CaMKII_minus_PSD_691_0_; Deph_minus_thr286b_669_0__Product_formation__k3*Deph_minus_thr286b_cplx_670_0_;
    Deph_minus_thr286b_669_0__Product_formation__k3 = 1 per_second;
  Deph_minus_thr286c_671_0__Complex_formation_: PP1_on_CaMKII_PSD_666_0_ + CaMKII_star__star__star__minus_PSD_692_0_ -> Deph_minus_thr286c_cplx_672_0_; Deph_minus_thr286c_671_0__Complex_formation__k1*PP1_on_CaMKII_PSD_666_0_*CaMKII_star__star__star__minus_PSD_692_0_ - Deph_minus_thr286c_671_0__Complex_formation__k2*Deph_minus_thr286c_cplx_672_0_;
    Deph_minus_thr286c_671_0__Complex_formation__k1 = 5.018431e17 per_uMole_per_second; Deph_minus_thr286c_671_0__Complex_formation__k2 = 4 per_second;
  Deph_minus_thr286c_671_0__Product_formation_: Deph_minus_thr286c_cplx_672_0_ => PP1_on_CaMKII_PSD_666_0_ + CaMKII_minus_thr306_minus_PSD_693_0_; Deph_minus_thr286c_671_0__Product_formation__k3*Deph_minus_thr286c_cplx_672_0_;
    Deph_minus_thr286c_671_0__Product_formation__k3 = 1 per_second;
  Deph_minus_thr305_673_0__Complex_formation_: PP1_on_CaMKII_PSD_666_0_ + CaMKII_star__star__star__minus_PSD_692_0_ -> Deph_minus_thr305_cplx_674_0_; Deph_minus_thr305_673_0__Complex_formation__k1*PP1_on_CaMKII_PSD_666_0_*CaMKII_star__star__star__minus_PSD_692_0_ - Deph_minus_thr305_673_0__Complex_formation__k2*Deph_minus_thr305_cplx_674_0_;
    Deph_minus_thr305_673_0__Complex_formation__k1 = 5.018431e17 per_uMole_per_second; Deph_minus_thr305_673_0__Complex_formation__k2 = 4 per_second;
  Deph_minus_thr305_673_0__Product_formation_: Deph_minus_thr305_cplx_674_0_ => PP1_on_CaMKII_PSD_666_0_ + CaMKII_minus_thr286_minus_PSD_690_0_; Deph_minus_thr305_673_0__Product_formation__k3*Deph_minus_thr305_cplx_674_0_;
    Deph_minus_thr305_673_0__Product_formation__k3 = 1 per_second;
  Deph_minus_thr306_675_0__Complex_formation_: PP1_on_CaMKII_PSD_666_0_ + CaMKII_minus_thr306_minus_PSD_693_0_ -> Deph_minus_thr306_cplx_676_0_; Deph_minus_thr306_675_0__Complex_formation__k1*PP1_on_CaMKII_PSD_666_0_*CaMKII_minus_thr306_minus_PSD_693_0_ - Deph_minus_thr306_675_0__Complex_formation__k2*Deph_minus_thr306_cplx_676_0_;
    Deph_minus_thr306_675_0__Complex_formation__k1 = 5.018431e17 per_uMole_per_second; Deph_minus_thr306_675_0__Complex_formation__k2 = 4 per_second;
  Deph_minus_thr306_675_0__Product_formation_: Deph_minus_thr306_cplx_676_0_ => PP1_on_CaMKII_PSD_666_0_ + CaMKII_minus_PSD_691_0_; Deph_minus_thr306_675_0__Product_formation__k3*Deph_minus_thr306_cplx_676_0_;
    Deph_minus_thr306_675_0__Product_formation__k3 = 1 per_second;
  CaM_minus_act_minus_305_minus_PSD_695_0__Complex_formation_: $tot_minus_CaM_minus_CaMKII_minus_PSD_694_0_ + CaMKII_minus_thr286_minus_PSD_690_0_ -> CaM_minus_act_minus_305_minus_PSD_cplx_696_0_; CaM_minus_act_minus_305_minus_PSD_695_0__Complex_formation__k1*tot_minus_CaM_minus_CaMKII_minus_PSD_694_0_*CaMKII_minus_thr286_minus_PSD_690_0_ - CaM_minus_act_minus_305_minus_PSD_695_0__Complex_formation__k2*CaM_minus_act_minus_305_minus_PSD_cplx_696_0_;
    CaM_minus_act_minus_305_minus_PSD_695_0__Complex_formation__k1 = 3.709579e16 per_uMole_per_second; CaM_minus_act_minus_305_minus_PSD_695_0__Complex_formation__k2 = 24 per_second;
  CaM_minus_act_minus_305_minus_PSD_695_0__Product_formation_: CaM_minus_act_minus_305_minus_PSD_cplx_696_0_ => $tot_minus_CaM_minus_CaMKII_minus_PSD_694_0_ + CaMKII_star__star__star__minus_PSD_692_0_; CaM_minus_act_minus_305_minus_PSD_695_0__Product_formation__k3*CaM_minus_act_minus_305_minus_PSD_cplx_696_0_;
    CaM_minus_act_minus_305_minus_PSD_695_0__Product_formation__k3 = 6 per_second;
  CaM_minus_act_minus_286_minus_PSD_697_0__Complex_formation_: $tot_minus_CaM_minus_CaMKII_minus_PSD_694_0_ + CaMKII_minus_CaM_minus_PSD_689_0_ -> CaM_minus_act_minus_286_minus_PSD_cplx_698_0_; CaM_minus_act_minus_286_minus_PSD_697_0__Complex_formation__k1*tot_minus_CaM_minus_CaMKII_minus_PSD_694_0_*CaMKII_minus_CaM_minus_PSD_689_0_ - CaM_minus_act_minus_286_minus_PSD_697_0__Complex_formation__k2*CaM_minus_act_minus_286_minus_PSD_cplx_698_0_;
    CaM_minus_act_minus_286_minus_PSD_697_0__Complex_formation__k1 = 3.091346e15 per_uMole_per_second; CaM_minus_act_minus_286_minus_PSD_697_0__Complex_formation__k2 = 2 per_second;
  CaM_minus_act_minus_286_minus_PSD_697_0__Product_formation_: CaM_minus_act_minus_286_minus_PSD_cplx_698_0_ => $tot_minus_CaM_minus_CaMKII_minus_PSD_694_0_ + CaMKII_minus_thr286_minus_CaM_minus_PSD_688_0_; CaM_minus_act_minus_286_minus_PSD_697_0__Product_formation__k3*CaM_minus_act_minus_286_minus_PSD_cplx_698_0_;
    CaM_minus_act_minus_286_minus_PSD_697_0__Product_formation__k3 = 0.5 per_second;
  CaM_act_autoph_699_0__Complex_formation_: $tot_minus_CaM_minus_CaMKII_minus_PSD_694_0_ + CaMKII_minus_PSD_691_0_ -> CaM_act_autoph_cplx_700_0_; CaM_act_autoph_699_0__Complex_formation__k1*tot_minus_CaM_minus_CaMKII_minus_PSD_694_0_*CaMKII_minus_PSD_691_0_ - CaM_act_autoph_699_0__Complex_formation__k2*CaM_act_autoph_cplx_700_0_;
    CaM_act_autoph_699_0__Complex_formation__k1 = 3.709579e16 per_uMole_per_second; CaM_act_autoph_699_0__Complex_formation__k2 = 24 per_second;
  CaM_act_autoph_699_0__Product_formation_: CaM_act_autoph_cplx_700_0_ => $tot_minus_CaM_minus_CaMKII_minus_PSD_694_0_ + CaMKII_minus_thr286_minus_PSD_690_0_; CaM_act_autoph_699_0__Product_formation__k3*CaM_act_autoph_cplx_700_0_;
    CaM_act_autoph_699_0__Product_formation__k3 = 6 per_second;
  auton_minus_305_minus_PSD_702_0__Complex_formation_: $tot_minus_auto_minus_PSD_701_0_ + CaMKII_minus_thr286_minus_PSD_690_0_ -> auton_minus_305_minus_PSD_cplx_703_0_; auton_minus_305_minus_PSD_702_0__Complex_formation__k1*tot_minus_auto_minus_PSD_701_0_*CaMKII_minus_thr286_minus_PSD_690_0_ - auton_minus_305_minus_PSD_702_0__Complex_formation__k2*auton_minus_305_minus_PSD_cplx_703_0_;
    auton_minus_305_minus_PSD_702_0__Complex_formation__k1 = 2.408857e16 per_uMole_per_second; auton_minus_305_minus_PSD_702_0__Complex_formation__k2 = 24 per_second;
  auton_minus_305_minus_PSD_702_0__Product_formation_: auton_minus_305_minus_PSD_cplx_703_0_ => $tot_minus_auto_minus_PSD_701_0_ + CaMKII_star__star__star__minus_PSD_692_0_; auton_minus_305_minus_PSD_702_0__Product_formation__k3*auton_minus_305_minus_PSD_cplx_703_0_;
    auton_minus_305_minus_PSD_702_0__Product_formation__k3 = 6 per_second;
  auton_minus_286_minus_PSD_704_0__Complex_formation_: $tot_minus_auto_minus_PSD_701_0_ + CaMKII_minus_CaM_minus_PSD_689_0_ -> auton_minus_286_minus_PSD_cplx_705_0_; auton_minus_286_minus_PSD_704_0__Complex_formation__k1*tot_minus_auto_minus_PSD_701_0_*CaMKII_minus_CaM_minus_PSD_689_0_ - auton_minus_286_minus_PSD_704_0__Complex_formation__k2*auton_minus_286_minus_PSD_cplx_705_0_;
    auton_minus_286_minus_PSD_704_0__Complex_formation__k1 = 2.007361e15 per_uMole_per_second; auton_minus_286_minus_PSD_704_0__Complex_formation__k2 = 2 per_second;
  auton_minus_286_minus_PSD_704_0__Product_formation_: auton_minus_286_minus_PSD_cplx_705_0_ => $tot_minus_auto_minus_PSD_701_0_ + CaMKII_minus_thr286_minus_CaM_minus_PSD_688_0_; auton_minus_286_minus_PSD_704_0__Product_formation__k3*auton_minus_286_minus_PSD_cplx_705_0_;
    auton_minus_286_minus_PSD_704_0__Product_formation__k3 = 0.5 per_second;
  auton_minus_autoph_706_0__Complex_formation_: $tot_minus_auto_minus_PSD_701_0_ + CaMKII_minus_PSD_691_0_ -> auton_minus_autoph_cplx_707_0_; auton_minus_autoph_706_0__Complex_formation__k1*tot_minus_auto_minus_PSD_701_0_*CaMKII_minus_PSD_691_0_ - auton_minus_autoph_706_0__Complex_formation__k2*auton_minus_autoph_cplx_707_0_;
    auton_minus_autoph_706_0__Complex_formation__k1 = 2.408857e16 per_uMole_per_second; auton_minus_autoph_706_0__Complex_formation__k2 = 24 per_second;
  auton_minus_autoph_706_0__Product_formation_: auton_minus_autoph_cplx_707_0_ => $tot_minus_auto_minus_PSD_701_0_ + CaMKII_minus_thr286_minus_PSD_690_0_; auton_minus_autoph_706_0__Product_formation__k3*auton_minus_autoph_cplx_707_0_;
    auton_minus_autoph_706_0__Product_formation__k3 = 6 per_second;
  Stoch_Basal_CaMKII_PSD_683_0_: $basal_CaMKII_PSD_control_684_0_ -> basal_CaMKII_PSD_682_0_; Stoch_Basal_CaMKII_PSD_kf*basal_CaMKII_PSD_control_684_0_ - Stoch_Basal_CaMKII_PSD_kb*basal_CaMKII_PSD_682_0_;
    Stoch_Basal_CaMKII_PSD_kf = 1 per_second; Stoch_Basal_CaMKII_PSD_kb = 1 per_second;
  CaMKII_minus_thr286_minus_bind_minus_CaM_minus_PSD_685_0_: $CaM_minus_Ca4_minus_PSD_677_0_ + CaMKII_minus_thr286_minus_PSD_690_0_ -> CaMKII_minus_thr286_minus_CaM_minus_PSD_688_0_; CaMKII_minus_thr286_minus_bind_minus_CaM_minus_PSD_kf*CaM_minus_Ca4_minus_PSD_677_0_*CaMKII_minus_thr286_minus_PSD_690_0_ - CaMKII_minus_thr286_minus_bind_minus_CaM_minus_PSD_kb*CaMKII_minus_thr286_minus_CaM_minus_PSD_688_0_;
    CaMKII_minus_thr286_minus_bind_minus_CaM_minus_PSD_kf = 1.00371e20 per_uMole_per_second; CaMKII_minus_thr286_minus_bind_minus_CaM_minus_PSD_kb = 0.1 per_second;
  CaMKII_minus_bind_minus_CaM_minus_PSD_686_0_: $CaM_minus_Ca4_minus_PSD_677_0_ + CaMKII_minus_PSD_691_0_ => CaMKII_minus_CaM_minus_PSD_689_0_; CaMKII_minus_bind_minus_CaM_minus_PSD_kf*CaM_minus_Ca4_minus_PSD_677_0_*CaMKII_minus_PSD_691_0_;
    CaMKII_minus_bind_minus_CaM_minus_PSD_kf = 5.018431e18 per_uMole_per_second;
  CaMKII_minus_diss_minus_CaM_687_0_: CaMKII_minus_CaM_minus_PSD_689_0_ => $CaM_minus_Ca4_minus_PSD_677_0_ + CaMKII_minus_PSD_691_0_; CaMKII_minus_diss_minus_CaM_kf*CaMKII_minus_CaM_minus_PSD_689_0_;
    CaMKII_minus_diss_minus_CaM_kf = 5 per_second;
  Deph_minus_thr286_625_0__Complex_formation_: PP1_minus_active_624_0_ + CaMKII_minus_thr286_star__minus_CaM_639_0_ -> Deph_minus_thr286_cplx_626_0_; Deph_minus_thr286_625_0__Complex_formation__k1*PP1_minus_active_624_0_*CaMKII_minus_thr286_star__minus_CaM_639_0_ - Deph_minus_thr286_625_0__Complex_formation__k2*Deph_minus_thr286_cplx_626_0_;
    Deph_minus_thr286_625_0__Complex_formation__k1 = 1.093561e16 per_uMole_per_second; Deph_minus_thr286_625_0__Complex_formation__k2 = 4 per_second;
  Deph_minus_thr286_625_0__Product_formation_: Deph_minus_thr286_cplx_626_0_ => PP1_minus_active_624_0_ + CaMKII_minus_CaM_638_0_; Deph_minus_thr286_625_0__Product_formation__k3*Deph_minus_thr286_cplx_626_0_;
    Deph_minus_thr286_625_0__Product_formation__k3 = 1 per_second;
  Deph_minus_thr286b_627_0__Complex_formation_: PP1_minus_active_624_0_ + CaMKII_minus_thr286_643_0_ -> Deph_minus_thr286b_cplx_628_0_; Deph_minus_thr286b_627_0__Complex_formation__k1*PP1_minus_active_624_0_*CaMKII_minus_thr286_643_0_ - Deph_minus_thr286b_627_0__Complex_formation__k2*Deph_minus_thr286b_cplx_628_0_;
    Deph_minus_thr286b_627_0__Complex_formation__k1 = 1.093561e16 per_uMole_per_second; Deph_minus_thr286b_627_0__Complex_formation__k2 = 4 per_second;
  Deph_minus_thr286b_627_0__Product_formation_: Deph_minus_thr286b_cplx_628_0_ => PP1_minus_active_624_0_ + CaMKII_637_0_; Deph_minus_thr286b_627_0__Product_formation__k3*Deph_minus_thr286b_cplx_628_0_;
    Deph_minus_thr286b_627_0__Product_formation__k3 = 1 per_second;
  Deph_minus_thr305_629_0__Complex_formation_: PP1_minus_active_624_0_ + CaMKII_star__star__star__640_0_ -> Deph_minus_thr305_cplx_630_0_; Deph_minus_thr305_629_0__Complex_formation__k1*PP1_minus_active_624_0_*CaMKII_star__star__star__640_0_ - Deph_minus_thr305_629_0__Complex_formation__k2*Deph_minus_thr305_cplx_630_0_;
    Deph_minus_thr305_629_0__Complex_formation__k1 = 1.093561e16 per_uMole_per_second; Deph_minus_thr305_629_0__Complex_formation__k2 = 4 per_second;
  Deph_minus_thr305_629_0__Product_formation_: Deph_minus_thr305_cplx_630_0_ => PP1_minus_active_624_0_ + CaMKII_minus_thr286_643_0_; Deph_minus_thr305_629_0__Product_formation__k3*Deph_minus_thr305_cplx_630_0_;
    Deph_minus_thr305_629_0__Product_formation__k3 = 1 per_second;
  Deph_minus_thr306_631_0__Complex_formation_: PP1_minus_active_624_0_ + CaMK_minus_thr306_644_0_ -> Deph_minus_thr306_cplx_632_0_; Deph_minus_thr306_631_0__Complex_formation__k1*PP1_minus_active_624_0_*CaMK_minus_thr306_644_0_ - Deph_minus_thr306_631_0__Complex_formation__k2*Deph_minus_thr306_cplx_632_0_;
    Deph_minus_thr306_631_0__Complex_formation__k1 = 1.093561e16 per_uMole_per_second; Deph_minus_thr306_631_0__Complex_formation__k2 = 4 per_second;
  Deph_minus_thr306_631_0__Product_formation_: Deph_minus_thr306_cplx_632_0_ => PP1_minus_active_624_0_ + CaMKII_637_0_; Deph_minus_thr306_631_0__Product_formation__k3*Deph_minus_thr306_cplx_632_0_;
    Deph_minus_thr306_631_0__Product_formation__k3 = 1 per_second;
  Deph_minus_thr286c_633_0__Complex_formation_: PP1_minus_active_624_0_ + CaMKII_star__star__star__640_0_ -> Deph_minus_thr286c_cplx_634_0_; Deph_minus_thr286c_633_0__Complex_formation__k1*PP1_minus_active_624_0_*CaMKII_star__star__star__640_0_ - Deph_minus_thr286c_633_0__Complex_formation__k2*Deph_minus_thr286c_cplx_634_0_;
    Deph_minus_thr286c_633_0__Complex_formation__k1 = 1.093561e16 per_uMole_per_second; Deph_minus_thr286c_633_0__Complex_formation__k2 = 4 per_second;
  Deph_minus_thr286c_633_0__Product_formation_: Deph_minus_thr286c_cplx_634_0_ => PP1_minus_active_624_0_ + CaMK_minus_thr306_644_0_; Deph_minus_thr286c_633_0__Product_formation__k3*Deph_minus_thr286c_cplx_634_0_;
    Deph_minus_thr286c_633_0__Product_formation__k3 = 1 per_second;
  transloc_1_655_0_: CaMKII_minus_CaM_638_0_ + NMDAR_708_0_ => CaMKII_minus_CaM_minus_PSD_689_0_; transloc_1_kf*CaMKII_minus_CaM_638_0_*NMDAR_708_0_;
    transloc_1_kf = 12044283580000 per_uMole_per_second;
  transloc_2_656_0_: CaMKII_minus_thr286_star__minus_CaM_639_0_ + NMDAR_708_0_ => CaMKII_minus_thr286_minus_CaM_minus_PSD_688_0_; transloc_2_kf*CaMKII_minus_thr286_star__minus_CaM_639_0_*NMDAR_708_0_;
    transloc_2_kf = 12044283580000 per_uMole_per_second;
  back_1_657_0_: CaMKII_minus_PSD_691_0_ -> CaMKII_637_0_ + NMDAR_708_0_; back_1_kf*CaMKII_minus_PSD_691_0_ - back_1_kb*CaMKII_637_0_*NMDAR_708_0_;
    back_1_kf = 0.3 per_second; back_1_kb = 6022141790000 per_uMole_per_second;
  back_2_658_0_: CaMKII_minus_thr306_minus_PSD_693_0_ -> CaMK_minus_thr306_644_0_ + NMDAR_708_0_; back_2_kf*CaMKII_minus_thr306_minus_PSD_693_0_ - back_2_kb*CaMK_minus_thr306_644_0_*NMDAR_708_0_;
    back_2_kf = 0.6 per_second; back_2_kb = 6022141790000 per_uMole_per_second;
  Ca_stoch_PSD_662_0_: $Ca_control_PSD_665_0_ -> Ca_minus_PSD_664_0_; Ca_stoch_PSD_kf*Ca_control_PSD_665_0_ - Ca_stoch_PSD_kb*Ca_minus_PSD_664_0_;
    Ca_stoch_PSD_kf = 100 per_second; Ca_stoch_PSD_kb = 100 per_second;
  Ca_PSD_to_spine_710_0_: $Ca_control_PSD_665_0_ -> Ca_635_0_; Ca_PSD_to_spine_kf*Ca_control_PSD_665_0_ - Ca_PSD_to_spine_kb*Ca_635_0_;
    Ca_PSD_to_spine_kf = 450 per_second; Ca_PSD_to_spine_kb = 50 per_second;
  CaM_PSD_to_spine_711_0_: $CaM_minus_Ca4_minus_PSD_677_0_ -> $CaM_minus_Ca4_623_0_; CaM_PSD_to_spine_kf*CaM_minus_Ca4_minus_PSD_677_0_ - CaM_PSD_to_spine_kb*CaM_minus_Ca4_623_0_;
    CaM_PSD_to_spine_kf = 450 per_second; CaM_PSD_to_spine_kb = 50 per_second;

  // Unit definitions:
  unit substance = 1e-6 mole;
  unit per_uMole_per_second = 1 / (1e-6 mole * second);
  unit per_second = (1e-6 mole)^0 / second;
end
