// SBML level 2 version 1

model Oxhamre_Bacteria_induced_Ca_oscillations()
  // Oxhamre2005_Ca_oscillation
  // The model should reproduce the figure 1C of the article (successfully reproduced in MathSBML). If your software does not support the variable "time", you can replace the assignmentRule:
  // n = n0 * [ exp(-kbN*time) + kappa * (1 - exp(-kbN*time))]
  // by
  // n = n0 * kappa
  // To the extent possible under law, all copyright and related or neighbouring rights to this encoded model have been dedicated to the public domain worldwide. Please refer to CC0 Public Domain Dedication for more information.
  // In summary, you are entitled to use this encoded model in absolutely any manner you deem suitable, verbatim, or with modification, alone or embedded it in a larger context, redistribute it, commercially or not, in a restricted way or not.
  // To cite BioModels Database, please use: Li C, Donizelli M, Rodriguez N, Dharuri H, Endler L, Chelliah V, Li L, He E, Henry A, Stefan MI, Snoep JL, Hucka M, Le Novère N, Laibe C (2010) BioModels Database: An enhanced, curated and annotated resource for published quantitative kinetic models. BMC Syst Biol., 4:92.
  // biomodels.db:MODEL6623415355
  // biomodels.db:BIOMD0000000047
  // isDescribedBy pubmed:15596518
  // kegg.pathway:rno04020
  // occursIn taxonomy:10114
  // isVersionOf GO:0048016 GO:0019722

  // Compartments:
  compartment Cytosol = 1;  // isVersionOf GO:0005829
  compartment Endoplasmic_Reticulum in Cytosol = 1;  // isVersionOf GO:0005790

  // Species:
  species CaER in Endoplasmic_Reticulum = 0;  // isVersionOf CHEBI:29108
  species Ca_Cyt in Cytosol = 0;  // isVersionOf CHEBI:29108

  // Parameters:
  n0 = 1;
  kbN = 0.5;
  kappa = 5;
  p11 = 0.2;
  p12 = 0.8;
  K1 = 5;
  K2 = 0.7;
  p3 = 0.95;
  k31 = 0.5;
  K3 = 0.7;

  // Assignment rules:
  n := n0*(exp(-kbN*time) + kappa*(1 - exp(-kbN*time)));
  p1 := p11 + p12*n/(K1 + n);
  p2 := Ca_Cyt/(K2 + Ca_Cyt);

  // Rate rules:
  p3' = -(k31*Ca_Cyt*p3) + k31*K3*(1 - p3);

  // Reactions:
  Jch: CaER => Ca_Cyt; Fch_0*p1*p2*p3;  // isVersionOf GO:0006816 GO:0051482
    Fch_0 = 8;
  Jleak: CaER => Ca_Cyt; Fleak;  // isVersionOf GO:0007204 GO:0006816
    Fleak = 0.5;
  Jpump: Ca_Cyt => CaER; Fpump_0*Ca_Cyt/(Kpump + Ca_Cyt);  // isVersionOf GO:0051481 GO:0006816
    Fpump_0 = 2; Kpump = 0.1;

  // Unit definitions:
  unit substance = 1e-6 mole; substance is "micromole (default)";
  unit time = 60 second; time is "minute (default)";
end
