// SBML level 2 version 1

model Sneyd2002_dynamic_model_of_IP3_Receptor()
  // Sneyd2002_IP3_Receptor
  // This model was successfully tested on Jarnac and MathSBML. The model reproduces the time profile of "Open Probability" of the receptor as shown in Figure 4 of the publication. The value of calcium ion concentration "c" in this model is 10 microM.
  // To the extent possible under law, all copyright and related or neighbouring rights to this encoded model have been dedicated to the public domain worldwide. Please refer to CC0 Public Domain Dedication for more information.
  // In summary, you are entitled to use this encoded model in absolutely any manner you deem suitable, verbatim, or with modification, alone or embedded it in a larger context, redistribute it, commercially or not, in a restricted way or not.
  // To cite BioModels Database, please use: Li C, Donizelli M, Rodriguez N, Dharuri H, Endler L, Chelliah V, Li L, He E, Henry A, Stefan MI, Snoep JL, Hucka M, Le Novère N, Laibe C (2010) BioModels Database: An enhanced, curated and annotated resource for published quantitative kinetic models. BMC Syst Biol., 4:92.
  // biomodels.db:MODEL9098147664
  // biomodels.db:BIOMD0000000057
  // isDescribedBy pubmed:11842185
  // occursIn taxonomy:10117
  // kegg.pathway:map04020
  // isVersionOf GO:0048016 GO:0019722 GO:0031585 GO:0006816 GO:0005220

  // Compartments:
  compartment compartment = 1;  // GO:0005829

  // Species:
  species R in compartment = 1; R is "Receptor";  // isVersionOf interpro:IPR000493
  species O in compartment = 0; O is "Open State";  // isVersionOf interpro:IPR000493
  species I1 in compartment = 0; I1 is "Inactivated State 1";  // isVersionOf interpro:IPR000493
  species S in compartment = 0; S is "Shut State";  // isVersionOf interpro:IPR000493
  species A in compartment = 0; A is "Activated State";  // isVersionOf interpro:IPR000493
  species I2 in compartment = 0; I2 is "Inactivated State 2";  // isVersionOf interpro:IPR000493

  // Parameters:
  k1 = 0.64;
  L1 = 0.12;
  l2 = 1.7;
  lminus2 = 0.8;
  c = 10;
  L3 = 0.025;
  k2 = 37.4;
  l4 = 1.7;
  kminus1 = 0.04;
  kminus2 = 1.4;
  kminus3 = 29.8;
  lminus4 = 2.5;
  L5 = 54.7;
  k3 = 0.11;
  k4 = 4;
  l6 = 4707;
  kminus4 = 0.54;
  lminus6 = 11.4;
  IP3 = 10;

  // Assignment rules:
  open_probability := (0.1*O + 0.9*A)^4;
  Phi1 := (k1*L1 + l2)*c/(L1 + c*(1 + L1/L3));
  Phi2 := (k2*L3 + l4*c)/(L3 + c*(1 + L3/L1));
  Phi_minus2 := (kminus2 + lminus4*c)/(1 + c/L5);
  Phi3 := k3*L5/(L5 + c);
  Phi4 := (k4*L5 + l6)*c/(L5 + c);
  Phi_minus4 := L1*(kminus4 + lminus6)/(L1 + c);
  Phi5 := (k1*L1 + l2)*c/(L1 + c);

  // Reactions:
  Receptor_Open_state_transition: R -> O; compartment*(Phi2*Receptor_Open_state_transition_IP3*R - Phi_minus2*O); Receptor_Open_state_transition is "Receptor-Open state transition";  // isVersionOf GO:0031587 GO:0005220
    Receptor_Open_state_transition_IP3 = 10;
  v2: R -> I1; compartment*(Phi1*R - (v2_kminus1 + v2_lminus2)*I1); v2 is "Receptor-Inactivated state 1 transition";  // isVersionOf GO:0031586
    v2_kminus1 = 0.04; v2_lminus2 = 0.8;
  Open_Shut_state_transition: O -> S; compartment*(Phi3*O - Open_Shut_state_transition_kminus3*S); Open_Shut_state_transition is "Open-Shut state transition";  // isVersionOf GO:0031586
    Open_Shut_state_transition_kminus3 = 29.8;
  Open_Activated_state_transition: O -> A; compartment*(Phi4*O - Phi_minus4*A); Open_Activated_state_transition is "Open-Activated state transition";  // isVersionOf GO:0031587
  v5: A -> I2; compartment*(Phi5*A - (v5_kminus1 + v5_lminus2)*I2); v5 is "Activated-Inactivated state 2 transition";  // isVersionOf GO:0031586
    v5_kminus1 = 0.04; v5_lminus2 = 0.8;

  // Unit definitions:
  unit substance = 1e-6 mole; substance is "micromole";
end
