// SBML level 2 version 4

model Qu2003_CellCycle()
  // This model is from the article:
  // Dynamics of the cell cycle: checkpoints, sizers, and timers.
  // Qu Z, MacLellan WR, Weiss JN Biophys. J. 2003 Dec; 85(6): 3600-11 14645053 ,
  // Abstract:
  // We have developed a generic mathematical model of a cell cycle signaling network in higher eukaryotes that can be used to simulate both the G1/S and G2/M transitions. In our model, the positive feedback facilitated by CDC25 and wee1 causes bistability in cyclin-dependent kinase activity, whereas the negative feedback facilitated by SKP2 or anaphase-promoting-complex turns this bistable behavior into limit cycle behavior. The cell cycle checkpoint is a Hopf bifurcation point. These behaviors are coordinated by growth and division to maintain normal cell cycle and size homeostasis. This model successfully reproduces sizer, timer, and the restriction point features of the eukaryotic cell cycle, in addition to other experimental findings.
  // Figure6B has been reproduced by both SBMLodeSolver online and MathSBML. We do not include the synthesis of cyclins is proportional to cell size (Equation 2 in Page3604 of the paper) in this model. The author of the paper keep all the variables and parameters dimensionless. But in the model, we choose to use default units of SBML.
  // This model originates from BioModels Database: A Database of Annotated Published Models. It is copyright (c) 2005-2009 The BioModels Team.
  // For more information see the terms of use .
  // To cite BioModels Database, please use Le Novère N., Bornstein B., Broicher A., Courtot M., Donizelli M., Dharuri H., Li L., Sauro H., Schilstra M., Shapiro B., Snoep J.L., Hucka M. (2006) BioModels Database: A Free, Centralized Database of Curated, Published, Quantitative Kinetic Models of Biochemical and Cellular Systems Nucleic Acids Res., 34: D689-D691.
  // biomodels.db:MODEL6931308526
  // biomodels.db:BIOMD0000000110
  // isDescribedBy pubmed:14645053
  // hasVersion kegg.pathway:sce04111 reactome:REACT_152
  // isVersionOf GO:0000075 GO:0000278 GO:0007346
  // occursIn taxonomy:2759

  // Compartments:
  compartment cell = 1;  // isVersionOf GO:0005623

  // Species:
  species Inactive_Cyclin_CDK_complex in cell = 0.1; Inactive_Cyclin_CDK_complex is "Inactive Cyclin:CDK complex";  // hasPart interpro:IPR006670 GO:0000307
  species x in cell = 0.1; x is "Active Cyclin:CDK complex";  // hasPart interpro:IPR006670 GO:0000307
  species Total_CDK in cell = 200;  // isVersionOf GO:0000307
  species c in cell; c is "Free CDK";  // isVersionOf GO:0000307
  species z0 in cell = 0; z0 is "Unphosphorylated CDC25";  // hasVersion uniprot:P04821
  species z1 in cell = 0; z1 is "One-site phosphorylated CDC25";  // hasVersion uniprot:P04821
  species z2 in cell = 0; z2 is "Two-site phosphorylated CDC25";  // hasVersion uniprot:P04821
  species w0 in cell = 0; w0 is "Unphosphorylated wee1";  // isHomologTo uniprot:P30291
  species w1 in cell = 0; w1 is "phosphorylated wee1";  // isHomologTo uniprot:P30291
  species u in cell = 0; u is "Active SKP2 or APC";  // isVersionOf interpro:IPR001810 GO:0005680
  species i in cell = 0; i is "Free CKI";  // isVersionOf interpro:IPR003175
  species ix in cell = 0; ix is "Cyclin:CDK:CKI complex with CKI unphosphorylated";  // hasPart interpro:IPR003175 interpro:IPR006670 GO:0000307
  species ixp in cell = 0; ixp is "Cyclin:CDK:CKI complex with CKI phosphorylated";  // hasPart interpro:IPR003175 interpro:IPR006670 GO:0000307
  species y in cell = 0; y is "Free cyclin";  // isVersionOf interpro:IPR006670
  species totalCyclin in cell;  // isVersionOf interpro:IPR006670

  // Parameters:
  k1 = 300;
  k2 = 5;
  k3 = 30;
  k4 = 30;
  k5 = 0.1;
  k6 = 1;
  k7 = 10;
  k8 = 100;
  k9 = 1;
  k10 = 10;
  k11 = 1;
  k12 = 0;
  k13 = 1;
  k14 = 1;
  k15 = 1;
  k16 = 2;
  k2u = 50;
  k7u = 0;
  k16u = 25;
  a = 4;
  az = 10;
  aw = 10;
  ai = 10;
  bz = 0.1;
  bw = 0.1;
  bi = 0.1;
  cz = 1;
  cw = 1;
  ci = 1;
  Tau = 25;

  // Assignment rules:
  // Free CDK ( normalized with c0 )c=(c0-x-x1-ix-ixp)/c0.
  c := (Total_CDK - (x + Inactive_Cyclin_CDK_complex + ix + ixp))/(Total_CDK*cell);
  // Total cyclin (x+x1+y)
  totalCyclin := x + Inactive_Cyclin_CDK_complex + y;

  // Reactions:
  Free_cyclin_synthesis: => y; k1*cell;  // isVersionOf GO:0044249
  Cyclin_binding_with_CDK: y -> Inactive_Cyclin_CDK_complex; cell*(k3*c*y - Inactive_Cyclin_CDK_complex*k4);  // modifiers: c; isVersionOf GO:0005515 GO:0030332
  Cyclin_degradation: y => ; cell*(k2 + k2u*u)*y;  // modifiers: u; isVersionOf GO:0008054
  z0_phosphorylation: z0 -> z1; cell*((bz + cz*x)*z0 - z1*az);  // modifiers: x; isVersionOf GO:0006468
  x_phosphorylation: x -> Inactive_Cyclin_CDK_complex; cell*((k6 + w0)*x - (k5 + z2)*Inactive_Cyclin_CDK_complex);  // modifiers: z2, w0; isVersionOf GO:0045736
  z1_phosphorylation: z1 -> z2; cell*((bz + cz*x)*z1 - az*z2);  // modifiers: x; isVersionOf GO:0006468
  unphosphorylated_wee1_synthesis: => w0; k10*cell;  // isVersionOf GO:0044249
  wee1_phosphorylation: w0 -> w1; cell*((bw + cw*x)*w0 - aw*w1);  // modifiers: x; isVersionOf GO:0006468
  SKP2_synthesis: => u; cell*x^2/(a^2 + x^2)/Tau;  // modifiers: x; isVersionOf GO:0044249 GO:0051488
  CKI_synthesis: => i; k12*cell;  // isVersionOf GO:0044249
  reaction_0000011: i + x -> ix; (k14*x*i - k15*ix)*cell; reaction_0000011 is "CKI binding to Active Cyclin:CDK complex";  // isVersionOf GO:0004861 GO:0032403
  ix_phosphorylation: ix -> ixp; cell*((bi + ci*x)*ix - ai*ixp);  // modifiers: x; isVersionOf GO:0004693 GO:0006468
  SKP2_degradation: u => ; cell*u/Tau;  // isVersionOf GO:0030163
  CKI_degradation: i => ; cell*k13*i;  // isVersionOf GO:0030163
  Cyclin_CDK_CKIp_degradation: ixp => x; cell*k16*k16u*ixp; Cyclin_CDK_CKIp_degradation is "Cyclin:CDK:CKIp degradation";  // isVersionOf GO:0043624
  reaction_0000017: w0 => ; cell*w0*k11; reaction_0000017 is "unphosphorylated wee1 degradation";  // isVersionOf GO:0030163
  phosphorylated_wee1_degradation: w1 => ; cell*k11*w1;  // isVersionOf GO:0030163
  reaction_0000019: z0 => ; cell*k9*z0; reaction_0000019 is "Unphosphorylated CDC25 degradation";  // isVersionOf GO:0030163
  reaction_0000020: z1 => ; cell*k9*z1; reaction_0000020 is "One site phosphorylated CDC25 degradaton";  // isVersionOf GO:0030163
  reaction_0000021: z2 -> ; cell*k9*z2; reaction_0000021 is "Two site phosphorylated CDC25 degradation";  // isVersionOf GO:0030163
  reaction_0000022: => z0; cell*k8; reaction_0000022 is "Unphosphorylation CDC25 synthesis";  // isVersionOf GO:0044249
  reaction_0000023: x => ; cell*(k7 + k7u*u)*x; reaction_0000023 is "Active cyclin:CDK complex degradation";  // modifiers: u; isVersionOf GO:0030163

  // Unit definitions:
  unit substance = dimensionless; substance is "arbitrary subst.";
  unit volume = dimensionless; volume is "arbitrary vol";
end
