// SBML level 2 version 1

model Fisher2006_Ca_Oscillation_dpdnt_NFAT_dynamics()
  // The model reproduces the calcium oscillation dependent activation-deactivation kinetics of nuclear factor of activated T cells (NFAT) as depicted in Fig 4a of the paper. A simple algorithm in the events section takes care of the calcium oscillation. The model was successfully tested on MathSBML.
  // To the extent possible under law, all copyright and related or neighbouring rights to this encoded model have been dedicated to the public domain worldwide. Please refer to CC0 Public Domain Dedication for more information.
  // In summary, you are entitled to use this encoded model in absolutely any manner you deem suitable, verbatim, or with modification, alone or embedded it in a larger context, redistribute it, commercially or not, in a restricted way or not.
  // To cite BioModels Database, please use: Li C, Donizelli M, Rodriguez N, Dharuri H, Endler L, Chelliah V, Li L, He E, Henry A, Stefan MI, Snoep JL, Hucka M, Le Novère N, Laibe C (2010) BioModels Database: An enhanced, curated and annotated resource for published quantitative kinetic models. BMC Syst Biol., 4:92.
  // biomodels.db:MODEL2977476330
  // biomodels.db:BIOMD0000000122
  // isDescribedBy pubmed:17031595
  // occursIn taxonomy:40674 BTO:0000782
  // GO:0033173
  // isPartOf kegg.pathway:hsa04660

  // Compartments:
  compartment cytosol = 2.69e-13;  // GO:0005829
  compartment nucleus in cytosol = 1.13e-13;  // GO:0005634

  // Species:
  species $Ca_Nuc in nucleus = 1; Ca_Nuc is "Calcium in Nucleus";  // CHEBI:29108 kegg.compound:C00076
  species $Ca_Cyt in cytosol = 1; Ca_Cyt is "Calcium in Cytosol";  // CHEBI:29108 kegg.compound:C00076
  species NFAT_Nuc in nucleus = 0.0005219; NFAT_Nuc is "NFAT_nuc";  // isVersionOf uniprot:O94916
  species Act_C_Nuc in nucleus = 5.05e-5; Act_C_Nuc is "Active Calcineurin in Nucleus";  // isVersionOf uniprot:Q99653
  species NFAT_Pi_Nuc in nucleus = 0.0002272; NFAT_Pi_Nuc is "Phosphorylated NFAT in nucleus";  // isVersionOf uniprot:O94916
  species NFAT_Act_C_Nuc in nucleus = 0.0009477; NFAT_Act_C_Nuc is "NFAT Calcineurin complex in nucleus";  // hasPart uniprot:Q99653 uniprot:O94916
  species NFAT_Pi_Act_C_Nuc in nucleus = 2.5e-6; NFAT_Pi_Act_C_Nuc is "Phosphorylated NFAT Calcineurin complex in nucleus";  // hasPart uniprot:Q99653 uniprot:O94916
  species Inact_C_Nuc in nucleus = 0.049198; Inact_C_Nuc is "Inactive Calcineurin in nucleus";  // isVersionOf uniprot:Q99653
  species NFAT_Cyt in cytosol = 0.0001101;  // isVersionOf uniprot:O94916
  species Act_C_Cyt in cytosol = 9.1e-6; Act_C_Cyt is "Active Calcineurin in cytosol";  // isVersionOf uniprot:Q99653
  species NFAT_Pi_Cyt in cytosol = 0.0094397; NFAT_Pi_Cyt is "Phosphorylated NFAT in cytosol";  // isVersionOf uniprot:O94916
  species NFAT_Act_C_Cyt in cytosol = 6.1e-6; NFAT_Act_C_Cyt is "NFAT Calcineurin complex in cytosol";  // hasPart uniprot:Q99653 uniprot:O94916
  species NFAT_Pi_Act_C_Cyt in cytosol = 2.2e-6; NFAT_Pi_Act_C_Cyt is "Phosphorylated NFAT Calcineurin complex in cytosol";  // hasPart uniprot:Q99653 uniprot:O94916
  species Inact_C_Cyt in cytosol = 0.0097108; Inact_C_Cyt is "Inactive Calcineurin in cytosol";  // isVersionOf uniprot:Q99653

  // Parameters:
  k1 = 2.56e-5;
  k2 = 0.00256;
  k16 = 6.63;
  k15 = 0.00168;
  k18 = 0.00096;
  k17 = 0.0015;
  k6 = 0.00092;
  k5 = 0.0019;
  k14 = 0.00256;
  k13 = 0.5;
  k12 = 0.00168;
  k11 = 6.63;
  k10 = 0.005;
  k9 = 0.5;
  k3 = 0.005;
  k4 = 0.5;
  k7 = 0.005;
  k8 = 0.5;
  k19 = 1;
  k20 = 1;
  k21 = 0.21;
  k22 = 0.5;
  Time_in_Seconds = 100;

  // Reactions:
  R1: NFAT_Pi_Nuc + Act_C_Nuc -> Act_C_Nuc + NFAT_Nuc; nucleus*(k1*NFAT_Pi_Nuc - k2*NFAT_Nuc); R1 is "Calcineurin dpdnt NFAT dephosphorylation";  // ec-code:3.1.3.16 GO:0004722 GO:0004723; isVersionOf kegg.reaction:R00164
  R2: Act_C_Nuc + NFAT_Nuc -> NFAT_Act_C_Nuc; nucleus*(k16*NFAT_Nuc*Act_C_Nuc - k15*NFAT_Act_C_Nuc); R2 is "NFAT Calcineurin complex formation";  // isVersionOf GO:0051525
  NFAT_transport: NFAT_Nuc -> NFAT_Cyt; nucleus*k18*NFAT_Nuc - cytosol*k17*NFAT_Cyt;  // GO:0051531
  Active_Calcineurin_transport: Act_C_Nuc -> Act_C_Cyt; nucleus*k6*Act_C_Nuc - cytosol*k5*Act_C_Cyt;  // isVersionOf GO:0015031
  R5: NFAT_Act_C_Nuc -> NFAT_Pi_Act_C_Nuc; nucleus*(k14*NFAT_Act_C_Nuc - k13*NFAT_Pi_Act_C_Nuc); R5 is "NFAT Calcineurin complex phosphorylation";  // isVersionOf GO:0006468
  R6: NFAT_Pi_Act_C_Nuc -> Act_C_Nuc + NFAT_Pi_Nuc; nucleus*(k12*NFAT_Pi_Act_C_Nuc - k11*NFAT_Pi_Nuc*Act_C_Nuc); R6 is "Phosphorylated NFAT Calcineurin complex disassembly";  // isVersionOf GO:0043624
  R7: NFAT_Act_C_Nuc -> NFAT_Act_C_Cyt; nucleus*k10*NFAT_Act_C_Nuc - cytosol*k9*NFAT_Act_C_Cyt; R7 is "NFAT Calcineurin complex transport";  // isVersionOf GO:0015031
  R8: NFAT_Act_C_Cyt -> NFAT_Pi_Act_C_Cyt; cytosol*(k14*NFAT_Act_C_Cyt - k13*NFAT_Pi_Act_C_Cyt); R8 is "NFAT Calcineurin complex phosphorylation";  // isVersionOf GO:0006468
  R9: NFAT_Pi_Act_C_Cyt -> Act_C_Cyt + NFAT_Pi_Cyt; cytosol*(k12*NFAT_Pi_Act_C_Cyt - k11*NFAT_Pi_Cyt*Act_C_Cyt); R9 is "Phosphorylated NFAT Calcineurin complex disassembly";  // isVersionOf GO:0043624
  Phosphorylated_NFAT_transport: NFAT_Pi_Cyt -> NFAT_Pi_Nuc; cytosol*k3*NFAT_Pi_Cyt - nucleus*k4*NFAT_Pi_Nuc;  // isVersionOf GO:0015031
  R11: NFAT_Act_C_Cyt -> Act_C_Cyt + NFAT_Cyt; cytosol*(k15*NFAT_Act_C_Cyt - k16*NFAT_Cyt*Act_C_Cyt); R11 is "NFAT Calcineurin complex disassembly";  // isVersionOf GO:0043624
  R17: NFAT_Pi_Act_C_Cyt -> NFAT_Pi_Act_C_Nuc; cytosol*k7*NFAT_Pi_Act_C_Cyt - nucleus*k8*NFAT_Pi_Act_C_Nuc; R17 is "Phosphorylated NFAT Calcineurin complex transport";  // isVersionOf GO:0015031
  R12: NFAT_Pi_Cyt + Act_C_Cyt -> Act_C_Cyt + NFAT_Cyt; cytosol*(k1*NFAT_Pi_Cyt - k2*NFAT_Cyt); R12 is "Calcineurin dpdnt NFAT dephosphorylation";  // ec-code:3.1.3.16 GO:0004723
  R13: 3 $Ca_Cyt + Inact_C_Cyt -> Act_C_Cyt; cytosol*(k19*Inact_C_Cyt*Ca_Cyt^3 - k20*Act_C_Cyt); R13 is "Calcineurin activation";  // isVersionOf GO:0032514
  R14: 3 $Ca_Nuc + Inact_C_Nuc -> Act_C_Nuc; nucleus*(k19*Inact_C_Nuc*Ca_Nuc^3 - k20*Act_C_Nuc); R14 is "Calcineurin activation";  // isVersionOf GO:0032514
  Inactive_Calcineurin_transport: Inact_C_Cyt -> Inact_C_Nuc; cytosol*k5*Inact_C_Cyt - nucleus*k6*Inact_C_Nuc;  // isVersionOf GO:0015031
  Calcium_transport: $Ca_Cyt -> $Ca_Nuc; cytosol*k21*Ca_Cyt - nucleus*k22*Ca_Nuc;  // isVersionOf GO:0006816

  // Events:
  event_0000001: at ((Time_in_Seconds - time <= 0) && (time < 1500)): Time_in_Seconds = Time_in_Seconds + 100, Ca_Cyt = 1, Ca_Nuc = 1;  // isVersionOf GO:0019722
  event_0000002: at ((Time_in_Seconds - time <= 90) && (time < 1500)): Ca_Cyt = 0.1, Ca_Nuc = 0.1;  // isVersionOf GO:0019722
  event_0000003: at (time >= 1500): Ca_Cyt = 0.1, Ca_Nuc = 0.1;  // isVersionOf GO:0019722

  // Unit definitions:
  unit substance = 1e-6 mole; substance is "micro mole";
end
