// SBML level 2 version 4

model Izhikevich2004_SpikingNeurons_resonator()
  // This a model from the article:
  // Which model to use for cortical spiking neurons?
  // Izhikevich EM. IEEE Trans Neural Netw. 2004 Sep;15(5):1063-70. 15484883 ,
  // Abstract:
  // We discuss the biological plausibility and computational efficiency of some of the most useful models of spiking and bursting neurons. We compare their applicability to large-scale simulations of cortical neural networks.
  // The model is according to the paper Which Model to Use for Cortical Spiking Neurons? Figure1(K) resonator has been reproduced by MathSBML. The ODE and the parameters values are taken from the a paper Simple Model of Spiking Neurons The original format of the models are encoded in the MATLAB format existed in the ModelDB with Accession number 39948
  // Figure1 are the simulation results of the same model with different choices of parameters and different stimulus function or events. a=0.1; b=0.26; c=-60; d=-1; V=-62; u=b*V;
  // This model originates from BioModels Database: A Database of Annotated Published Models. It is copyright (c) 2005-2010 The BioModels Team.
  // For more information see the terms of use .
  // To cite BioModels Database, please use Le Novère N., Bornstein B., Broicher A., Courtot M., Donizelli M., Dharuri H., Li L., Sauro H., Schilstra M., Shapiro B., Snoep J.L., Hucka M. (2006) BioModels Database: A Free, Centralized Database of Curated, Published, Quantitative Kinetic Models of Biochemical and Cellular Systems Nucleic Acids Res., 34: D689-D691.
  // biomodels.db:MODEL5571517474
  // biomodels.db:BIOMD0000000133
  // isDescribedBy pubmed:15484883
  // isVersionOf GO:0019228 GO:0001508 GO:0042391
  // occursIn taxonomy:40674

  // Compartments:
  compartment cell = 1;  // isVersionOf GO:0005623

  // Parameters:
  a = 0.1;
  b = 0.26;
  c = -60;
  d = -1;
  Vthresh = 30;
  i = 0;
  v = -62;
  u = -16.12;

  // Rate rules:
  u' = a*(b*v - u);
  v' = 0.04*v^2 + 5*v + 140 - u + i;

  // Events:
  event_0000001: at (v > Vthresh): v = c, u = u + d;
  event_0000002: at (((time > 40) && (time < 44)) && ((time > 60) && (time < 64))): i = 0.65;
  event_0000003: at (((time > 280) && (time < 284)) || ((time > 320) && (time < 324)) || ((time > 40) && (time < 44)) || ((time > 60) && (time < 64))): i = 0.65;
  event_0000004: at (((time >= 44) && (time <= 60)) || ((time >= 64) && (time <= 280))): i = 0;
  event_0000005: at (((time >= 284) && (time <= 320)) || (time >= 324)): i = 0;
end
