// SBML level 2 version 1

model Olsen2003_neutrophil_oscillatory_metabolism()
  // The model reproduces the time series of cytosolic and phagosomal species as depicted in Figure 2 of the paper. Model successfully reproduced using MathSBML and Jarnac
  // To the extent possible under law, all copyright and related or neighbouring rights to this encoded model have been dedicated to the public domain worldwide. Please refer to CC0 Public Domain Dedication for more information.
  // In summary, you are entitled to use this encoded model in absolutely any manner you deem suitable, verbatim, or with modification, alone or embedded it in a larger context, redistribute it, commercially or not, in a restricted way or not.
  // To cite BioModels Database, please use: Li C, Donizelli M, Rodriguez N, Dharuri H, Endler L, Chelliah V, Li L, He E, Henry A, Stefan MI, Snoep JL, Hucka M, Le Novère N, Laibe C (2010) BioModels Database: An enhanced, curated and annotated resource for published quantitative kinetic models. BMC Syst Biol., 4:92.
  // biomodels.db:MODEL5564211615
  // biomodels.db:BIOMD0000000143
  // isDescribedBy pubmed:12524266
  // occursIn taxonomy:40674
  // isVersionOf GO:0030186 GO:0016692

  // Compartments:
  compartment phagosome in cytoplasm = 1;  // isVersionOf GO:0032009
  compartment cytoplasm = 10;  // GO:0005737

  // Species:
  species H2O2_p in phagosome = 0;  // CHEBI:16240 kegg.compound:C00027
  species per3_p in phagosome = 300; per3_p is "Ferric peroxidase";  // isVersionOf interpro:IPR000823 pirsf:PIRSF000293
  species coI_p in phagosome = 0; coI_p is "compound I";  // isVersionOf interpro:IPR000823 pirsf:PIRSF000293
  species MLTH_p in phagosome = 300; MLTH_p is "Melatonin";  // isVersionOf CHEBI:16796 kegg.compound:C01598
  species coII_p in phagosome = 0; coII_p is "compound II";  // isVersionOf interpro:IPR000823 pirsf:PIRSF000293
  species MLT_p in phagosome = 0; MLT_p is "Melatonin free radical";  // isVersionOf CHEBI:16796 kegg.compound:C01598
  species O2minus_p in phagosome = 0; O2minus_p is "Superoxide";  // CHEBI:18421 kegg.compound:C00704
  species H_p in phagosome = 0; H_p is "Hydrogen";  // CHEBI:18276 kegg.compound:C00282
  species O2_p in phagosome = 0; O2_p is "Oxygen";  // CHEBI:15379 kegg.compound:C00007
  species NADPH_c in cytoplasm = 0;  // CHEBI:16474 kegg.compound:C00005
  species O2_c in cytoplasm = 0; O2_c is "Oxygen";  // CHEBI:15379 kegg.compound:C00007
  species NADPplus_c in cytoplasm = 0;  // CHEBI:18009 kegg.compound:C00006
  species H2O2_c in cytoplasm = 0;  // CHEBI:16240 kegg.compound:C00027
  species NADP_c in cytoplasm = 0;  // CHEBI:18009 kegg.compound:C00006
  species O2minus_c in cytoplasm = 0; O2minus_c is "Superoxide";  // CHEBI:18421 kegg.compound:C00704
  species H_c in cytoplasm = 0; H_c is "Hydrogen";  // CHEBI:18276 kegg.compound:C00282
  species MLT_c in cytoplasm = 0; MLT_c is "Melatonin free radical";  // isVersionOf CHEBI:16796 kegg.compound:C01598
  species MLTH_c in cytoplasm = 300; MLTH_c is "Melatonin";  // isVersionOf CHEBI:16796 kegg.compound:C01598
  species coIII_p in phagosome = 0; coIII_p is "compound III";  // isVersionOf interpro:IPR000823
  species NADP2_c in cytoplasm = 0;  // CHEBI:18009 kegg.compound:C00006

  // Parameters:
  Knadph = 60;
  k1 = 50;
  kminus1 = 58;
  k2 = 10;
  k3 = 0.004;
  k4 = 20;
  k5 = 10;
  k6 = 0.1;
  k7 = 1e-6;
  k8 = 50;
  k9 = 500;
  k10 = 10;
  k11 = 60;
  k12 = 25;
  k13 = 12.5;
  kminus13 = 0.045;
  k14 = 30;
  k15 = 30;
  k16 = 10;
  k17 = 10;
  k18 = 2;
  V = 288;
  L = 550;
  Ko = 1.5;

  // Reactions:
  Myeloperoxidase_reaction: per3_p + H2O2_p => coI_p; phagosome*(k1*H2O2_p*per3_p - kminus1*coI_p);
  Melatonin_compound_I_reaction: MLTH_p + coI_p => MLT_p + coII_p; phagosome*k2*coI_p*MLTH_p; Melatonin_compound_I_reaction is "Melatonin-compound I reaction";
  Melatonin_compound_II_reaction: MLTH_p + coII_p => MLT_p + per3_p; phagosome*k3*coII_p*MLTH_p; Melatonin_compound_II_reaction is "Melatonin-compound II reaction";
  compound_III_formation: O2minus_p + per3_p => coIII_p; phagosome*k4*per3_p*O2minus_p;
  R5: 2 O2minus_p + 2 H_p => O2_p + H2O2_p; phagosome*k5*O2minus_p^2; R5 is "H2O2 formation";  // isVersionOf ec-code:1.15.1.1; kegg.reaction:R00275
  compound_III_superoxide_reaction: O2minus_p + coIII_p => O2_p + coI_p; phagosome*k6*coIII_p*O2minus_p; compound_III_superoxide_reaction is "compound III-superoxide reaction";
  NADPH_autooxidation: O2_c + NADPH_c => H2O2_c + NADPplus_c; cytoplasm*k7*NADPH_c*O2_c;  // kegg.reaction:R07172; isVersionOf ec-code:1.6.3.1
  NADP_radical_Oxygen_reaction: O2_c + NADP_c => O2minus_c + NADPplus_c; cytoplasm*k8*NADP_c*O2_c; NADP_radical_Oxygen_reaction is "NADP radical-Oxygen reaction";
  R9: 2 O2minus_c + 2 H_c => O2_c + H2O2_c; cytoplasm*k9*O2minus_c^2; R9 is "H2O2 formation";  // isVersionOf ec-code:1.15.1.1; kegg.reaction:R00275
  NADP_free_radical_formation: NADPH_c + MLT_c => NADP_c + MLTH_c; cytoplasm*k10*MLT_c*NADPH_c;
  NADP_dimer_formation: 2 NADP_c => NADP2_c; cytoplasm*k11*NADP_c^2;
  NADPH_synthesis: => NADPH_c; cytoplasm*k12;
  R13a: => O2_c; cytoplasm*k13; R13a is "Oxygen diffusion";
  R13b: O2_c => ; cytoplasm*kminus13*O2_c; R13b is "Oxygen diffusion";
  R14: O2_p => O2_c; phagosome*(k14*O2_p - k14*O2_c); R14 is "Oxygen diffusion- phagosome/cytoplasm";
  R15: H2O2_p => H2O2_c; phagosome*(k15*H2O2_p - k15*H2O2_c); R15 is "H2O2 diffusion phagosome/cytoplasm";
  R16: MLTH_p => MLTH_c; phagosome*(k16*MLTH_p - k16*MLTH_c); R16 is "Melatonin diffusion phagosome/cytoplasm";
  R17: MLT_p => MLT_c; phagosome*(k17*MLT_p - k17*MLT_c); R17 is "Melatonin free radical diffusion phagosome/cytoplasm";
  R18: O2minus_p => O2minus_c; phagosome*(k18*O2minus_p - k18*O2minus_c); R18 is "Superoxide diffusion phagosome/cytoplasm";
  NADPH_oxidase_activity: 2 O2_p + NADPH_c => 2 O2minus_p + NADPplus_c; phagosome*(V*NADPH_c/Knadph*(1 + NADPH_c/Knadph)*O2_p/((L + (1 + NADPH_c/Knadph)^2)*(Ko + O2_p)));

  // Unit definitions:
  unit substance = 1e-6 mole; substance is "micro mole";
end
