// SBML level 2 version 1

model Kim2007_Wnt_ERK_Crosstalk()
  // The model reproduces Figure 6 (a,b,c) for normal wnt signaling. Model was successfully tested on MathSBML.
  // To the extent possible under law, all copyright and related or neighbouring rights to this encoded model have been dedicated to the public domain worldwide. Please refer to CC0 Public Domain Dedication for more information.
  // In summary, you are entitled to use this encoded model in absolutely any manner you deem suitable, verbatim, or with modification, alone or embedded it in a larger context, redistribute it, commercially or not, in a restricted way or not.
  // To cite BioModels Database, please use: Li C, Donizelli M, Rodriguez N, Dharuri H, Endler L, Chelliah V, Li L, He E, Henry A, Stefan MI, Snoep JL, Hucka M, Le Novère N, Laibe C (2010) BioModels Database: An enhanced, curated and annotated resource for published quantitative kinetic models. BMC Syst Biol., 4:92.
  // biomodels.db:MODEL4159212701
  // biomodels.db:BIOMD0000000149
  // isDescribedBy pubmed:17237813
  // occursIn taxonomy:40674
  // hasPart kegg.pathway:hsa04010 kegg.pathway:hsa04310
  // hasPart GO:0000165 GO:0016055

  // Compartments:
  compartment cytoplasm = 1;  // GO:0005737
  compartment nucleus in cytoplasm = 1;  // GO:0005634

  // Species:
  species Dshi in cytoplasm = 100;  // isVersionOf uniprot:Q5TA35
  species Dsha in cytoplasm = 0;  // isVersionOf uniprot:Q5TA35
  species APC_ast_Axin_ast_GSK3beta in cytoplasm = 0.0153; APC_ast_Axin_ast_GSK3beta is "APC_ast/Axin_ast/GSK3beta";  // GO:0030877; hasPart uniprot:P49841 uniprot:O15169 uniprot:O95996
  species APC_Axin_GSK3beta in cytoplasm = 0.0076; APC_Axin_GSK3beta is "APC/Axin/GSK3beta";  // GO:0030877; hasPart uniprot:P49841 uniprot:O15169 uniprot:O95996
  species X5 in cytoplasm = 49.1372; X5 is "GSK3beta";  // isVersionOf uniprot:P49841
  species APC_Axin in cytoplasm = 0.0015; APC_Axin is "APC/Axin";  // hasPart uniprot:O15169 uniprot:O95996
  species APC in cytoplasm = 96.6019;  // isVersionOf uniprot:O95996
  species X8 in cytoplasm = 0.002; X8 is "bCatenin/APC_Ast/Axin_ast/GSK3beta";  // GO:0030877; hasPart uniprot:P35222 uniprot:P49841 uniprot:O15169 uniprot:O95996
  species X9 in cytoplasm = 0.002; X9 is "bCatenin_ast/APC_ast/Axin_ast/GSK3beta";  // GO:0030877; hasPart uniprot:P35222 uniprot:P49841 uniprot:O15169 uniprot:O95996
  species bCatenin_ast in cytoplasm = 0.9881;  // isVersionOf uniprot:P35222
  species bCatenin in nucleus = 42.7224;  // isVersionOf uniprot:P35222
  species Axin in cytoplasm = 0.0008;  // isVersionOf uniprot:O15169
  species TCF in nucleus = 6.1879;  // isVersionOf uniprot:Q9UJU2
  species bCatenin_TCF in nucleus = 8.8121; bCatenin_TCF is "bCatenin/TCF";  // hasPart uniprot:Q9UJU2 uniprot:P35222
  species bCatenin_APC in cytoplasm = 3.4392; bCatenin_APC is "bCatenin/APC";  // hasPart uniprot:P35222 uniprot:O95996
  species Rasi in cytoplasm = 200;  // isVersionOf uniprot:P62070
  species Rasa in cytoplasm = 0;  // isVersionOf uniprot:P62070
  species Raf_1 in cytoplasm = 112.5585; Raf_1 is "Raf-1";  // isVersionOf uniprot:P04049
  species Raf_1_ast in cytoplasm = 6.486; Raf_1_ast is "Raf-1_ast";  // isVersionOf uniprot:P04049
  species MEK in cytoplasm = 296.1137;  // isVersionOf uniprot:Q02750
  species MEK_ast in cytoplasm = 3.8863;  // isVersionOf uniprot:Q02750
  species ERK in cytoplasm = 297.8897;  // isVersionOf uniprot:P28482
  species ERK_ast in cytoplasm = 2.1103;  // isVersionOf uniprot:P28482
  species Raf1_RKIP in cytoplasm = 180.9595; Raf1_RKIP is "Raf1/RKIP";  // hasPart uniprot:P30086 uniprot:P04049
  species RKIP in cytoplasm = 418.1788;  // isVersionOf uniprot:P30086
  species RKIP_ast in cytoplasm = 0.8619;  // isVersionOf uniprot:P30086
  species unknown_molecule_X in cytoplasm = 10.263;
  species X28 in cytoplasm = 0.85544; X28 is "GSK3beta";  // isVersionOf uniprot:P49841

  // Parameters:
  k1 = 0.182;
  W = 0;
  k2 = 0.0182;
  k3 = 0.05;
  k4 = 0.267;
  k5 = 0.133;
  k_plus6 = 0.0909;
  k_minus6 = 0.909;
  k_plus7 = 1;
  k_minus7 = 50;
  k_plus8 = 1;
  k_minus8 = 120;
  k9 = 206;
  k10 = 206;
  k11 = 0.417;
  V12 = 0.423;
  k13 = 0.000257;
  k14 = 8.22e-5;
  k21 = 1e-6;
  k15 = 0.167;
  k_plus16 = 1;
  k_minus16 = 30;
  k_plus17 = 1;
  k_minus17 = 1200;
  Vmax1 = 150;
  Km1 = 10;
  Ki = 9;
  Vmax2 = 15;
  Km2 = 8;
  kcat1 = 1.5;
  Km3 = 15;
  Vmax3 = 45;
  Km4 = 15;
  kcat2 = 1.5;
  Km5 = 15;
  Vmax4 = 45;
  Km6 = 15;
  kcat3 = 1.5;
  Km7 = 15;
  Vmax5 = 45;
  Km8 = 15;
  kcat4 = 1.5;
  Km9 = 9;
  k18 = 0.15;
  k19 = 39;
  Vmax6 = 45;
  Km10 = 12;
  kcat5 = 0.6;
  n1 = 2;
  Km11 = 15;
  k20 = 0.015;
  kcat6 = 1.5;
  Km12 = 15;
  kcat7 = 1.5;
  Km13 = 15;
  Vmax7 = 45;
  Km14 = 15;
  flag_for_wnt_signal = 0;

  // Assignment rules:
  X13X14 := TCF + bCatenin_TCF;

  // Reactions:
  Dishevelled_activation: Dshi => Dsha; cytoplasm*k1*Dshi*W;  // isVersionOf GO:0017147
  Dishevelled_inactivation: Dsha => Dshi; cytoplasm*k2*Dsha;  // isVersionOf GO:0030111
  R3: APC_Axin_GSK3beta => APC_Axin + X5; cytoplasm*k3*Dsha*APC_Axin_GSK3beta; R3 is "Dishevelled mediated GSK/Axin/APC complex disassembly";  // modifiers: Dsha; isVersionOf GO:0030177
  R4: APC_Axin_GSK3beta => APC_ast_Axin_ast_GSK3beta; cytoplasm*k4*APC_Axin_GSK3beta; R4 is "Activation of GSK/Axin/APC complex";  // ec-code:2.7.11.26; isVersionOf GO:0004674
  R5: APC_ast_Axin_ast_GSK3beta => APC_Axin_GSK3beta; cytoplasm*k5*APC_ast_Axin_ast_GSK3beta; R5 is "Inactivation of GSK/Axin/APC complex";  // isVersionOf GO:0016311
  GSK_Axin_APC_complex_reassembly: APC_Axin + X5 -> APC_Axin_GSK3beta; cytoplasm*(k_plus6*X5*APC_Axin - k_minus6*APC_Axin_GSK3beta); GSK_Axin_APC_complex_reassembly is "GSK/Axin/APC complex reassembly";  // isVersionOf GO:0043623
  Axin_APC_complex_formation: Axin + APC -> APC_Axin; cytoplasm*(k_plus7*APC*Axin - k_minus7*APC_Axin); Axin_APC_complex_formation is "Axin/APC complex formation";  // isVersionOf GO:0005515
  R8: bCatenin + APC_ast_Axin_ast_GSK3beta -> X8; cytoplasm*(k_plus8*APC_ast_Axin_ast_GSK3beta*bCatenin - k_minus8*X8); R8 is "bCatenin binding to GSK/Axin/APC complex";  // GO:0008013
  bCatenin_phosphorylation: X8 => X9; cytoplasm*k9*X8;  // ec-code:2.7.11.26 GO:0004674
  R10: X9 => APC_ast_Axin_ast_GSK3beta + bCatenin_ast; cytoplasm*k10*X9; R10 is "GSK.Axin/APC/bCatenin complex disassembly";  // isVersionOf GO:0043624
  R11: bCatenin_ast => ; cytoplasm*k11*bCatenin_ast; R11 is "Phosphorylated bCatenin degradation";  // isVersionOf GO:0030163
  bCatenin_synthesis: => bCatenin; cytoplasm*V12;  // isVersionOf GO:0006417
  R13: bCatenin => ; nucleus*k13*bCatenin; R13 is "Unphosphorylated bCatenin degradation";  // isVersionOf GO:0030163
  Axin_synthesis: => Axin; nucleus*(k14 + k21*(bCatenin + bCatenin_TCF));  // modifiers: bCatenin, bCatenin_TCF; isVersionOf GO:0045727
  Axin_degradation: Axin => ; cytoplasm*k15*Axin;  // isVersionOf GO:0030163
  bCatenin_TCF_complex_formation: TCF + bCatenin -> bCatenin_TCF; nucleus*(k_plus16*bCatenin*TCF - k_minus16*bCatenin_TCF); bCatenin_TCF_complex_formation is "bCatenin/TCF complex formation";  // isVersionOf GO:0008013 GO:0008134
  APC_bCatenin_complex_formation: bCatenin + APC -> bCatenin_APC; cytoplasm*(k_plus17*APC*bCatenin - k_minus17*bCatenin_APC); APC_bCatenin_complex_formation is "APC/bCatenin complex formation";  // isVersionOf GO:0005515
  Ras_activation: Rasi => Rasa; cytoplasm*(Vmax1*Rasi*W/(Km1 + Rasi))*(Ki/(Ki + ERK_ast));  // modifiers: ERK_ast; GO:0032856
  Ras_inactivation: Rasa => Rasi; cytoplasm*(Vmax2*Rasa/(Km2 + Rasa));  // isVersionOf GO:0032318
  Raf_activation: Raf_1 => Raf_1_ast; cytoplasm*(kcat1*Rasa*Raf_1/(Km3 + Raf_1));  // modifiers: Rasa; isVersionOf GO:0000185
  Raf_inactivation: Raf_1_ast => Raf_1; cytoplasm*Vmax3*Raf_1_ast/(Km4 + Raf_1_ast);  // isVersionOf GO:0051390
  MEK_activation: MEK => MEK_ast; cytoplasm*kcat2*Raf_1_ast*MEK/(Km5 + MEK);  // modifiers: Raf_1_ast; isVersionOf GO:0000186 GO:0004709; ec-code:2.7.11.1
  MEK_inactivation: MEK_ast => MEK; cytoplasm*Vmax4*MEK_ast/(Km6 + MEK_ast);  // isVersionOf GO:0051389
  ERK_activation: ERK => ERK_ast; cytoplasm*kcat3*MEK_ast*ERK/(Km7 + ERK);  // modifiers: MEK_ast; isVersionOf GO:0000187 GO:0004708; ec-code:2.7.12.2
  ERK_inactivation: ERK_ast => ERK; cytoplasm*Vmax5*ERK_ast/(Km8 + ERK_ast);  // isVersionOf GO:0000188
  Raf_RKIP_complex_disassembly: Raf1_RKIP => Raf_1 + RKIP_ast; cytoplasm*kcat4*ERK_ast*Raf1_RKIP/(Km9 + Raf1_RKIP); Raf_RKIP_complex_disassembly is "Raf/RKIP complex disassembly";  // modifiers: ERK_ast; isVersionOf GO:0043624
  Raf_RKIP_complex_formation: Raf_1 + RKIP -> Raf1_RKIP; cytoplasm*(k18*Raf_1*RKIP - k19*Raf1_RKIP); Raf_RKIP_complex_formation is "Raf-RKIP complex formation";  // isVersionOf GO:0005515
  RKIP_dephosphorylation: RKIP_ast => RKIP; cytoplasm*Vmax6*RKIP_ast/(Km10 + RKIP_ast);  // isVersionOf GO:0016311
  Unknown_factor_X_formation: => unknown_molecule_X; cytoplasm*(kcat5*bCatenin_TCF^n1/(Km11^n1 + bCatenin_TCF^n1)); Unknown_factor_X_formation is "Unknown factor-X formation";  // modifiers: bCatenin_TCF; isVersionOf GO:0045727
  Factor_X_degradation: unknown_molecule_X => ; cytoplasm*k20*unknown_molecule_X; Factor_X_degradation is "Factor-X degradation";  // isVersionOf GO:0030163
  Factor_X_mediated_Raf_activation: Raf_1 => Raf_1_ast; cytoplasm*(kcat6*unknown_molecule_X*Raf_1/(Km12 + Raf_1)); Factor_X_mediated_Raf_activation is "Factor-X mediated Raf activation";  // modifiers: unknown_molecule_X; isVersionOf GO:0000185
  R32: X5 => X28; cytoplasm*kcat7*ERK_ast*X5/(Km13 + X5); R32 is "ERK mediated GSK3beta phosphorylation";  // modifiers: ERK_ast; ec-code:2.7.11.24 GO:0004707 GO:0016310
  GSK3beta_dephosphorylation: X28 => X5; cytoplasm*Vmax7*X28/(Km14 + X28);  // isVersionOf GO:0016311

  // Events:
  // The two events are used to increase the value of wnt from 0 to 1 between time t=500minutes and t=1000minutes.
  event_0000001: at ((time >= 500) && (time <= 1000)): W = 1;
  event_0000002: at (time > 1000): W = 0;

  // Unit definitions:
  unit substance = 1e-9 mole; substance is "nanomole";
  unit time = 60 second; time is "minute";
end
