// SBML level 2 version 1

model model_0000001()
  // Leloup1998_CircClock_LD
  // Leloup and Goldbeter, 1998
  // This model was created after the article by Leloup and Goldbeter, J Biol Rhythms 1998, Vol:13(1),pp70-87, pubmedID: 9486845
  // A Model for Circadian Rhythms in Drosophila Incorporating the Formation of a Complex between the PER and TIM Proteins
  // The parameters and initial concentrations are taken to reproduce figs. 4 D,E,F in the publication.
  // For a simulation without light dependent degradation of TIM_pp, change the the parameter v_dT_fac to 1.
  // The light/dark phases length can be set using the parameter l_d .
  // To the extent possible under law, all copyright and related or neighbouring rights to this encoded model have been dedicated to the public domain worldwide. Please refer to CC0 Public Domain Dedication for more information.
  // In summary, you are entitled to use this encoded model in absolutely any manner you deem suitable, verbatim, or with modification, alone or embedded it in a larger context, redistribute it, commercially or not, in a restricted way or not.
  // To cite BioModels Database, please use: Li C, Donizelli M, Rodriguez N, Dharuri H, Endler L, Chelliah V, Li L, He E, Henry A, Stefan MI, Snoep JL, Hucka M, Le Novère N, Laibe C (2010) BioModels Database: An enhanced, curated and annotated resource for published quantitative kinetic models. BMC Syst Biol., 4:92.
  // biomodels.db:MODEL0243843132
  // biomodels.db:BIOMD0000000171
  // isDescribedBy pubmed:9486845
  // isDerivedFrom biomodels.db:BIOMD0000000016
  // occursIn taxonomy:7227
  // isPartOf kegg.pathway:dme04710

  // Compartments:
  compartment nucleus = 1 litre;  // GO:0005634
  compartment cytoplasm = 1 litre;  // GO:0005737

  // Species:
  species M_T in cytoplasm = 1.41; M_T is "tim mRNA";  // isVersionOf CHEBI:33699 kegg.compound:C02100
  species M_P in cytoplasm = 0.09; M_P is "per mRNA";  // isVersionOf CHEBI:33699 kegg.compound:C02100
  species T0 in cytoplasm = 0.54; T0 is "TIM";  // isVersionOf uniprot:P49021
  species T1 in cytoplasm = 0.79; T1 is "TIM-p";  // isVersionOf uniprot:P49021 kegg.compound:C00562
  species T2 in cytoplasm = 4.65; T2 is "TIM-pp";  // isVersionOf uniprot:P49021
  species PER in cytoplasm = 0.02;  // isVersionOf uniprot:P07663
  species PER_p in cytoplasm = 0.02; PER_p is "PER-p";  // isVersionOf uniprot:P07663 kegg.compound:C00562
  species PER_pp in cytoplasm = 0.01; PER_pp is "PER-pp";  // isVersionOf uniprot:P07663 kegg.compound:C00562
  species C in cytoplasm = 0.18; C is "PER_TIM complex cytoplasm";  // hasPart uniprot:P07663 uniprot:P49021; isVersionOf GO:0043234
  species CN in nucleus = 1.2; CN is "PER_TIM complex nuclear";  // hasPart uniprot:P07663 uniprot:P49021; isVersionOf GO:0043234
  species $Tt in cytoplasm; Tt is "total TIM";  // hasVersion uniprot:P49021
  species $Pt in cytoplasm; Pt is "total PER";  // hasVersion uniprot:P07663

  // Parameters:
  n = 4 dimensionless; n is "transkr_rep_hill_coefficient";
  kd = 0.01 perh; kd is "degradation_rate";
  v_dT has nMph; v_dT is "T2_lightdecay_rate";
  l_d = 12 time; l_d is "light_dark_period";
  v_dT_fac = 2 dimensionless; v_dT_fac is "v_dT_fold_incr_during_light";
  v_dT_dark = 2 nMph; v_dT_dark is "v_dT_value_darkness";

  // Assignment rules:
  Tt := T0 + T1 + T2 + C + CN*nucleus/cytoplasm;
  Pt := PER + PER_p + PER_pp + C + CN*nucleus/cytoplasm;
  v_dT := (1 + (v_dT_fac - 1)*ceil(sin(time/l_d*pi)*0.9))*v_dT_dark;

  // Reactions:
  per_trans: => M_P; v_sP*Ki_P^n/(Ki_P^n + CN^n); per_trans is "per transkription";  // modifiers: CN; isVersionOf GO:0009299
    v_sP = 0.8 nmph; Ki_P = 1 nM;
  tim_trans: => M_T; v_sT*Ki_T^n/(Ki_T^n + CN^n); tim_trans is "tim transkription";  // modifiers: CN; GO:0009299
    v_sT = 1 nmph; Ki_T = 1 nM;
  M_T_decay: M_T => ; (v_mT/(K_mT + M_T) + kd)*M_T*cytoplasm; M_T_decay is "tim mRNA decay";  // isVersionOf GO:0006402
    v_mT = 0.7 nMph; K_mT = 0.2 nM;
  M_P_decay: M_P => ; (v_mP/(K_mP + M_P) + kd)*M_P*cytoplasm; M_P_decay is "per mRNA decay";  // isVersionOf GO:0006402
    v_mP = 0.8 nMph; K_mP = 0.2 nM;
  PER_transl: => PER; k_sP*M_P*cytoplasm; PER_transl is "PER tranlation";  // modifiers: M_P; isVersionOf GO:0006412
    k_sP = 0.9 perh;
  TIM_transl: => T0; k_sT*M_T*cytoplasm; TIM_transl is "TIM translation";  // modifiers: M_T; isVersionOf GO:0006412
    k_sT = 0.9 perh;
  PO_decay: PER => ; kd*PER*cytoplasm; PO_decay is "PER decay";  // isVersionOf GO:0030163
  P1_decay: PER_p => ; kd*PER_p*cytoplasm; P1_decay is "PER-p decay";  // isVersionOf GO:0030163
  P2_decay: PER_pp => ; kd*PER_pp*cytoplasm; P2_decay is "PER-pp decay";  // isVersionOf GO:0030163
  T0_decay: T0 => ; kd*T0*cytoplasm; T0_decay is "TIM decay";  // isVersionOf GO:0030163
  T1_decay: T1 => ; kd*T1*cytoplasm; T1_decay is "TIM-p decay";  // isVersionOf GO:0030163
  T2_decay: T2 => ; kd*T2*cytoplasm; T2_decay is "TIM-pp decay";  // isVersionOf GO:0030163
  C_form: PER_pp + T2 => C; (k3*T2*PER_pp - k4*C)*cytoplasm; C_form is "Per_TIM complex formation";  // hasPart GO:0043241 GO:0006461
    k3 = 1.2 pnMph; k4 = 0.6 perh;
  C_decay: C => ; kd_C*C*cytoplasm; C_decay is "cytopl. PER_TIM compl. decay";  // isVersionOf GO:0030163
    kd_C = 0.01 perh;
  CN_decay: CN => ; kd_CN*CN*nucleus; CN_decay is "nuclear PER_TIM compl. decay";  // isVersionOf GO:0030163
    kd_CN = 0.01 perh;
  C_transp: C -> CN; k1*C*cytoplasm - k2*CN*nucleus; C_transp is "PER_TIM complex shuttling";  // hasPart GO:0006606 GO:0006611; isVersionOf GO:0006886
    k1 = 1.2 perh; k2 = 0.2 perh;
  P_pho: PER => PER_p; V_1P*PER/(K_1P + PER)*cytoplasm; P_pho is "PER phosphorylation";  // isVersionOf ec-code:2.7.11.1 kegg.reaction:R00162 GO:0006468
    V_1P = 8 nMph; K_1P = 2 nM;
  P1_pho: PER_p => PER_pp; V_3P*PER_p/(K_3P + PER_p)*cytoplasm; P1_pho is "PER-p phosphorylation";  // isVersionOf ec-code:2.7.11.1 kegg.reaction:R00162 GO:0006468
    V_3P = 8 nMph; K_3P = 2 nM;
  P1_depho: PER_p => PER; V_2P*PER_p/(K_2P + PER_p)*cytoplasm; P1_depho is "PER-p dephosphorylation";  // isVersionOf ec-code:3.1.3.16 GO:0006470
    K_2P = 2 nM; V_2P = 1 nMph;
  P2_depho: PER_pp => PER_p; V_4P*PER_pp/(K_4P + PER_pp)*cytoplasm; P2_depho is "PER-pp dephosphorylation";  // isVersionOf ec-code:3.1.3.16 GO:0006470
    V_4P = 1 nMph; K_4P = 2 nM;
  T_pho: T0 => T1; V_1T*T0/(K_1T + T0)*cytoplasm; T_pho is "TIM phosphorylation";  // isVersionOf ec-code:2.7.11.1 kegg.reaction:R00162 GO:0006468
    V_1T = 8 nMph; K_1T = 2 nM;
  T1_pho: T1 => T2; V_3T*T1/(K_3T + T1)*cytoplasm; T1_pho is "TIM-p phosphorylation";  // isVersionOf ec-code:2.7.11.1 kegg.reaction:R00162 GO:0006468
    V_3T = 8 nMph; K_3T = 2 nM;
  T1_depho: T1 => T0; V_2T*T1/(K_2T + T1)*cytoplasm; T1_depho is "TIM-p dephosphorylation";  // isVersionOf ec-code:3.1.3.16 GO:0006470
    K_2T = 2 nM; V_2T = 1 nMph;
  T2_depho: T2 => T1; V_4T*T2/(K_4T + T2)*cytoplasm; T2_depho is "TIM-pp dephosphorylation";  // isVersionOf ec-code:3.1.3.16 GO:0006470
    V_4T = 1 nMph; K_4T = 2 nM;
  T2_light_deact: T2 => ; v_dT*T2/(K_dT + T2)*cytoplasm; T2_light_deact is "TIM-pp light deactivation";  // isVersionOf GO:0030163
    K_dT = 0.2 nM;
  P2_light_deact: PER_pp => ; v_dP*PER_pp/(K_dP + PER_pp)*cytoplasm; P2_light_deact is "PER-pp light deactivation";  // isVersionOf GO:0030163
    v_dP = 2 nMph; K_dP = 0.2 nM;

  // Unit definitions:
  unit substance = 1e-9 mole; substance is "nanomolar";
  unit nM = 1e-9 mole / litre; nM is "nanomoleperlitre";
  unit time = 3600 second; time is "hours";
  unit nMph = 1e-9 mole / (3600 second * litre); nMph is "nanoMperHour";
  unit perh = 1 / (3600 second); perh is "perhour";
  unit pnMph = litre / (3600 second * 1e-9 mole); pnMph is "pernMperHour";
  unit nmph = 1e-9 mole / (3600 second); nmph is "nanomolperhour";
end
