// SBML level 2 version 3

model testid()
  // Santolini2001_nNOS_Mechanism_Regulation
  // This is a model of neuronal Nitric Oxide Synthase expressed in Escherichia coli based on Santolini J. et al. J Biol Chem. (2001) 276(2):1233-43 .
  // Differing from the article, oxygen explicitly included in the reaction 2, 5 and 10 (numbers as in scheme 1 in the article). In the article the assumed oxygen concentration of 140 uM was included in the pseudo first order rate constant.
  // Fig 2E in the article shows different time courses for citrulline and NO than the ones produced by this model. Dr. Santolini, one of the authors of the article, wrote that the legends in fig. 2E might be mixed up and should rather denote NO and NO3 instead of citrulline and NO.
  // This model originates from BioModels Database: A Database of Annotated Published Models. It is copyright (c) 2005-2009 The BioModels Team.
  // For more information see the terms of use .
  // To cite BioModels Database, please use Le Novère N., Bornstein B., Broicher A., Courtot M., Donizelli M., Dharuri H., Li L., Sauro H., Schilstra M., Shapiro B., Snoep J.L., Hucka M. (2006) BioModels Database: A Free, Centralized Database of Curated, Published, Quantitative Kinetic Models of Biochemical and Cellular Systems Nucleic Acids Res., 34: D689-D691.
  // biomodels.db:MODEL4734733125
  // biomodels.db:BIOMD0000000199
  // isDescribedBy pubmed:11038356
  // hasVersion omim:163731
  // isVersionOf GO:0004517 GO:0016709
  // occursIn taxonomy:10116

  // Compartments:
  compartment cytosol = 1;  // GO:0005829

  // Species:
  species FeIII in cytosol = 1;  // hasPart CHEBI:29034 CHEBI:17627 uniprot:P29476
  species FeII in cytosol = 0;  // hasPart CHEBI:17627 CHEBI:29033 uniprot:P29476
  species FeII_O2 in cytosol = 0;  // CHEBI:15379 CHEBI:29033 CHEBI:17627 uniprot:P29476
  species FeIII_star in cytosol = 0;  // hasPart CHEBI:17627 CHEBI:29034 uniprot:P29476
  species FeII_star in cytosol = 0;  // hasPart CHEBI:17627 CHEBI:29033 uniprot:P29476
  species FeII_star_O2 in cytosol = 0;  // hasPart CHEBI:15379 CHEBI:17627 CHEBI:29033 uniprot:P29476
  species FeIII_NO in cytosol = 0;  // hasPart CHEBI:16480 CHEBI:17627 CHEBI:29034 uniprot:P29476
  species FeII_NO in cytosol = 0;  // hasPart CHEBI:16480 CHEBI:17627 CHEBI:29033 uniprot:P29476
  species $NADPH in cytosol = 40;  // CHEBI:16474 kegg.compound:C00005
  species $O2 in cytosol = 140;  // CHEBI:15379 kegg.compound:C00007
  species $citrulline in cytosol = 0; citrulline is "citruline";  // CHEBI:16349 kegg.compound:C00327
  species $NO3 in cytosol = 0;  // CHEBI:17632 kegg.compound:C00244
  species $NO in cytosol = 0;  // CHEBI:16480 kegg.compound:C00533
  species $NADPplus in cytosol = 0;  // CHEBI:18009 kegg.compound:C00006
  species FeIII_t in cytosol;  // hasPart CHEBI:29034 CHEBI:17627 uniprot:P29476

  // Parameters:
  k1 = 2.6 persec;
  k2 = 0.9 peruMpersec;
  k3 = 26 persec;
  k4 = 2.6 persec;
  k5 = 0.9 peruMpersec;
  k6 = 26 persec;
  k7 = 5 persec;
  k8 = 2.6 persec;
  k9 = 0.0001 persec;
  k10 = 0.0013 peruMpersec;

  // Assignment rules:
  FeIII_t := FeIII + FeIII_star;

  // Reactions:
  r1: FeIII + $NADPH => FeII + $NADPplus; cytosol*k1*FeIII;  // isVersionOf GO:0016651
  r2: FeII + $O2 => FeII_O2; cytosol*k2*FeII*O2;
  r3: FeII_O2 => FeIII_star; cytosol*k3*FeII_O2;
  r4: FeIII_star + 0.5 $NADPH => FeII_star + 0.5 $NADPplus; cytosol*k4*FeIII_star;  // isVersionOf GO:0016651
  r5: FeII_star + $O2 => FeII_star_O2; cytosol*k5*FeII_star*O2;
  r6: FeII_star_O2 => FeIII_NO + $citrulline; cytosol*k6*FeII_star_O2;
  rF: FeIII_NO => FeIII + $NO; cytosol*k7*FeIII_NO;
  rG: FeIII_NO + 0.5 $NADPH => FeII_NO + 0.5 $NADPplus; cytosol*k8*FeIII_NO;  // isVersionOf GO:0016651
  r9: FeII_NO => FeII + $NO; cytosol*k9*FeII_NO;
  r10: FeII_NO + $O2 => FeIII + $NO3; cytosol*k10*FeII_NO*O2;

  // Unit definitions:
  unit substance = 1e-6 mole; substance is "micromole";
  unit peruMpersec = litre / (1e-6 mole * second);
  unit uM = 1e-6 mole / litre;
  unit persec = 1 / second;
end
