// SBML level 2 version 4

model InsEGFdiam_2008_10_03_debugged()
  // Borisov2009_EGF_Insulin_Crosstalk
  // described in: Systems-level interactions between insulin-EGF networks amplify mitogenic signaling.
  // Borisov N, Aksamitiene E, Kiyatkin A, Legewie S, Berkhout J, Maiwald T, Kaimachnikov NP, Timmer J, Hoek JB, Kholodenko BN.; Mol Syst Biol. 2009;5:256. Epub 2009 Apr 7. PMID: 19357636 ; doi: 10.1038/msb.2009.19
  // Abstract:
  // Crosstalk mechanisms have not been studied as thoroughly as individual signaling pathways. We exploit experimental and computational approaches to reveal how a concordant interplay between the insulin and epidermal growth factor (EGF) signaling networks can potentiate mitogenic signaling. In HEK293 cells, insulin is a poor activator of the Ras/ERK (extracellular signal-regulated kinase) cascade, yet it enhances ERK activation by low EGF doses. We find that major crosstalk mechanisms that amplify ERK signaling are localized upstream of Ras and at the Ras/Raf level. Computational modeling unveils how critical network nodes, the adaptor proteins GAB1 and insulin receptor substrate (IRS), Src kinase, and phosphatase SHP2, convert insulin-induced increase in the phosphatidylinositol-3,4,5-triphosphate (PIP(3)) concentration into enhanced Ras/ERK activity. The model predicts and experiments confirm that insulin-induced amplification of mitogenic signaling is abolished by disrupting PIP(3)-mediated positive feedback via GAB1 and IRS. We demonstrate that GAB1 behaves as a non-linear amplifier of mitogenic responses and insulin endows EGF signaling with robustness to GAB1 suppression. Our results show the feasibility of using computational models to identify key target combinations and predict complex cellular responses to a mixture of external cues.
  // An extracellular compartment with 34 times the volume of the cell was added and the association rate as well as the dissociation constants for Insulin and EGF binding were altered (k on '=34*k on , K D '=K D /34). This was done to allow using the concentrations for those species given in the article and retaining the same dynamics and Ligand depletion as in the matlab file the SBML file was exported from.
  // SBML model exported from PottersWheel on 2008-10-14 16:26:44.
  // This model originates from BioModels Database: A Database of Annotated Published Models (http://www.ebi.ac.uk/biomodels/). It is copyright (c) 2005-2011 The BioModels.net Team.
  // For more information see the terms of use .
  // To cite BioModels Database, please use: Li C, Donizelli M, Rodriguez N, Dharuri H, Endler L, Chelliah V, Li L, He E, Henry A, Stefan MI, Snoep JL, Hucka M, Le Novère N, Laibe C (2010) BioModels Database: An enhanced, curated and annotated resource for published quantitative kinetic models. BMC Syst Biol., 4:92.
  // biomodels.db:MODEL6194251662
  // biomodels.db:BIOMD0000000223
  // isDescribedBy pubmed:19357636
  // occursIn taxonomy:9606
  // hasVersion kegg.pathway:hsa04012 kegg.pathway:hsa04910
  // hasVersion reactome:REACT_9417 reactome:REACT_498

  // Compartments:
  compartment cell = 1;  // GO:0005623
  compartment extra = 34; extra is "extracellular space";

  // Species:
  species EGF in extra = 1;  // isVersionOf uniprot:P01133 reactome:REACT_9610
  species I in extra = 0;  // isVersionOf uniprot:P01308 reactome:REACT_5828
  species RE in cell = 0;  // hasPart uniprot:P00533 uniprot:P01133
  species Rd in cell = 0;  // isVersionOf uniprot:P01133 uniprot:P00533
  species Rp in cell = 0;  // isVersionOf uniprot:P01133 uniprot:P00533
  species GS in cell = 200;
  species Rp_GS in cell = 0;  // hasPart uniprot:P00533
  species Shc in cell = 270;
  species Rp_Shc in cell = 0;  // hasPart uniprot:P00533
  species Rp_pShc in cell = 0;
  species pShc in cell = 0;
  species Rp_pShc_GS in cell = 0;
  species PI3K in cell = 200;
  species Rp_PI3K in cell = 0;
  species RasGAP in cell = 50;
  species Rp_RasGAP in cell = 0;
  species IRL in cell = 0;
  species IRp in cell = 0;
  species IRp_PI3K in cell = 0;
  species IRp_RasGAP in cell = 0;
  species IRS in cell = 300;
  species IRp_IRS in cell = 0;
  species IRp_IRSp in cell = 0;
  species IRSp in cell = 0;
  species iSrc in cell = 518;
  species mIRS in cell = 0;
  species mIRSp in cell = 0;
  species mIRSp_GS in cell = 0;
  species mIRSp_PI3K in cell = 0;
  species SHP2 in cell = 300;
  species mIRSp_SHP2 in cell = 0;
  species GAB in cell = 225;
  species mGAB in cell = 0;
  species mGABp in cell = 0;
  species mGABp_GS in cell = 0;
  species mGABp_PI3K in cell = 0;
  species mGABp_SHP2 in cell = 0;
  species mGABp_pSHP2 in cell = 0;
  species PIP3 in cell = 0;
  species dRas in cell = 150;
  species Raf in cell = 100;
  species aRaf in cell = 0;
  species Mek in cell = 200;
  species Erk in cell = 400;
  species pErk in cell = 0;
  species PDK1 in cell = 100;
  species Akt in cell = 100;
  species pAkt in cell = 0;
  species mTOR in cell = 100;
  species Null in cell = 0;
  species aaRaf in cell = 0;
  species PKA in cell = 100;
  species pShc_GS in cell = 0;
  species ppMek in cell = 0;
  species mGABp_pSHP2_GS in cell = 0;
  species R in cell = 100;
  species ppErk in cell = 0;
  species IR in cell = 150;
  species mPDK1 in cell = 0;
  species tRas in cell = 0;
  species tRas_PI3K in cell = 0;
  species ppAkt in cell = 0;
  species mGABp_RasGAP in cell = 0;
  species amTOR in cell = 0;
  species iGS in cell = 0;
  species imGAB in cell = 0;
  species imIRS in cell = 0;
  species aSrc in cell = 0;
  species Ri in cell = 0;
  species IRi in cell = 0;
  species iPX in cell = 200;
  species aPX in cell = 0;
  species aPX_GS in cell = 0;
  species IRSp_PI3K in cell = 0;
  species IRSp_GS in cell = 0;
  species IRSp_SHP2 in cell = 0;
  species GABp in cell = 0;
  species GABp_PI3K in cell = 0;
  species GABp_GS in cell = 0;
  species GABp_RasGAP in cell = 0;
  species GABp_SHP2 in cell = 0;
  species GABp_pSHP2 in cell = 0;
  species GABp_pSHP2_GS in cell = 0;
  species imGABp in cell = 0;
  species bRasGAP in cell = 1e-5;
  species phosphorylated_Akt in cell;

  // Parameters:
  EGF_tot has nM;
  k1 = 0.068 per_nMs;
  Kd1 = 0.58824 nM;
  k2 = 0.033 per_nMs;
  Kd2 = 15 nM;
  k3 = 0.4 per_sec;
  k4 = 0.000666 per_nMs;
  Kd4 = 10 nM;
  Kd5 = 10 nM;
  k5 = 0.0133 per_nMs;
  k6 = 0.333 per_sec;
  k7 = 0.000666 per_nMs;
  Kd7 = 400 nM;
  V8 = 200 nM_per_s;
  Km8 = 100 nM;
  Kd9 = 10 nM;
  k9 = 0.00666 per_nMs;
  Kd10 = 400 nM;
  k10 = 0.0004 per_nMs;
  k11 has per_nMs;
  k12 = 0.00933 per_nMs;
  Kd12 = 12.45 nM;
  k13 = 6.66e-6 per_nMs;
  Kd13 = 200 nM;
  k17 = 0.000185 per_sec;
  k24 = 0.011322 per_nMs;
  Kd24 = 0.029412 nM;
  k25 = 1.66 per_sec;
  k26 = 0.00933 per_nMs;
  Kd26 = 124.5 nM;
  k27 = 6.66e-8 per_nMs;
  Kd27 = 2000000 nM;
  k28 = 0.1066 per_nMs;
  Kd28 = 3.75 nM;
  k29 = 0.66 per_sec;
  k30 = 0.0066 per_nMs;
  Kd30 = 10 nM;
  V31 = 333 nM_per_s;
  Km31 = 143.3 nM;
  kcat40 = 6.6 per_sec;
  Km40 = 110 nM;
  alpha40 = 0.00025 dimensionless;
  V41 = 6.66 nM_per_s;
  Km41 = 50 nM;
  k42 = 0.00666 per_nMs;
  Kd42 = 10 nM;
  kcat43 = 33.3 per_sec;
  Km43 = 150 nM;
  alpha43 = 0.05 dimensionless;
  Kd45 = 100000 nM;
  k45 = 0.000666 per_nMs;
  k46 = 0.00666 per_nMs;
  Kd46 = 1 nM;
  k47 = 0.000666 per_nMs;
  Kd47 = 1000 nM;
  k48 = 0.666 per_sec;
  k49 = 0.000666 per_nMs;
  Kd49 = 1 nM;
  kcat50 = 3333 per_sec;
  alpha50 = 0.0001 dimensionless;
  Km50 = 150 nM;
  V51 = 333 nM_per_s;
  Km51 = 130 nM;
  k52 = 0.002 per_nMs;
  Kd52 = 1 nM;
  k53 = 0.0133 per_nMs;
  Kd53 = 2.5 nM;
  k54 = 1e-5 per_nMs;
  Kd54 = 66666 nM;
  k55 = 0.000666 per_nMs;
  Kd55 = 100 nM;
  k56 = 0.666 per_sec;
  kcat57 = 0.133 per_sec;
  Km57 = 150 nM;
  V58 = 2 nM_per_s;
  Km58 = 130 nM;
  k59 = 0.01 per_nMs;
  Kd59 = 20 nM;
  k60 = 4.66 per_sec;
  k61 = 3.33 per_sec;
  kcat62 = 5.33 per_sec;
  Km62 = 50 nM;
  kcat63 = 20000 per_sec;
  Km63 = 50 nM;
  k64 = 0 per_nMs;
  k_64 = 2.5 per_sec;
  kcat65 = 0.1 per_sec;
  Km65 = 400 nM;
  kcat66 = 3.33 per_sec;
  Km66 = 10 nM;
  kcat67 = 0.666 per_sec;
  Km67 = 10000 nM;
  alpha67 = 1e-6 per_nMs;
  beta67 = 2 dimensionless;
  kcat68 = 0.133 per_sec;
  Km68 = 50 nM;
  V69 = 16.6 nM_per_s;
  Km69 = 675.299 nM;
  kcat70 = 0.333 per_sec;
  Km70 = 500 nM;
  kcat71 = 0.666 per_sec;
  Km71 = 500 nM;
  V72 = 33.3 nM_per_s;
  Km72 = 500 nM;
  V73 = 23.33 nM_per_s;
  Km73 = 500 nM;
  k74 = 0.00666 per_nMs;
  Kd74 = 100 nM;
  kcat75 = 4.66 per_sec;
  Km75 = 500 nM;
  V76 = 16.66 nM_per_s;
  Km76 = 1 nM;
  kcat77 = 0.666 per_sec;
  alpha77 = 0.5 dimensionless;
  Km77 = 100 nM;
  k_77 = 0.666 per_sec;
  kcat78 = 0.666 per_sec;
  Km78 = 100 nM;
  k_78 = 0.666 per_sec;
  kcat79 = 0.0466 per_sec;
  Km79 = 5000 nM;
  k_79 = 6.66e-5 per_sec;
  kcat80 = 0.04 per_sec;
  Km80 = 700 nM;
  k_80 = 6.66e-5 per_sec;
  kcat81 = 0.166 per_sec;
  Km81 = 300 nM;
  k_81 = 6.66e-5 per_sec;
  V_82 = 133 nM_per_s;
  Km82 = 50 nM;
  k83 = 0.0166 per_sec;
  V_84 = 333 nM_per_s;
  Km84 = 266 nM;
  k85 = 0.0166 per_sec;
  k111 = 0.0133 per_nMs;
  k118 = 0.001 per_sec;
  k_1 has per_sec;
  k_2 has per_sec;
  k_4 has per_sec;
  k_5 has per_sec;
  k_7 has per_sec;
  k_9 has per_sec;
  k_10 has per_sec;
  k_11 has per_sec;
  k_12 has per_sec;
  k_13 has per_sec;
  k_24 has per_sec;
  k_26 has per_sec;
  k_27 has per_sec;
  k_28 has per_sec;
  k_30 has per_sec;
  k_42 has per_sec;
  k_45 has per_sec;
  k_46 has per_sec;
  k_47 has per_sec;
  k_49 has per_sec;
  k_52 has per_sec;
  k_53 has per_sec;
  k_54 has per_sec;
  k_55 has per_sec;
  k_59 has per_sec;
  k_74 has per_sec;

  // Assignment rules:
  phosphorylated_Akt := pAkt + ppAkt;
  EGF_tot := EGF + (RE + 2*(Rd + Rp + Ri + Rp_GS + Rp_Shc + Rp_pShc + Rp_pShc_GS + Rp_PI3K + Rp_RasGAP))*(cell/extra);
  k_1 := Kd1*k1;
  k_2 := Kd2*k2;
  k_4 := Kd4*k4;
  k_5 := Kd5*k5;
  k_7 := Kd7*k7;
  k_9 := Kd9*k9;
  k_10 := Kd10*k10;
  k_11 := k_9;
  k11 := k9;
  k_12 := Kd12*k12;
  k_13 := Kd13*k13;
  k_24 := Kd24*k24;
  k_26 := Kd26*k26;
  k_27 := Kd27*k27;
  k_28 := Kd28*k28;
  k_30 := Kd30*k30;
  k_42 := Kd42*k42;
  k_45 := k45*Kd45;
  k_46 := Kd46*k46;
  k_47 := Kd47*k47;
  k_49 := Kd49*k49;
  k_52 := k52*Kd52;
  k_53 := Kd53*k53;
  k_54 := Kd54*k54;
  k_55 := Kd55*k55;
  k_59 := Kd59*k59;
  k_74 := k74*Kd74;

  // Reactions:
  reaction_1: R + EGF -> RE; (k1*R*EGF - k_1*RE)*cell;
  reaction_2: 2 RE -> Rd; (k2*RE*RE - k_2*Rd)*cell;
  reaction_3: Rd => Rp; k3*Rd*cell;
  reaction_4: Rp + GS -> Rp_GS; (k4*Rp*GS - k_4*Rp_GS)*cell;
  reaction_5: Rp + Shc -> Rp_Shc; (k5*Rp*Shc - k_5*Rp_Shc)*cell;
  reaction_6: Rp_Shc => Rp_pShc; k6*Rp_Shc*cell;
  reaction_7: Rp_pShc -> Rp + pShc; (k_7*Rp_pShc - k7*Rp*pShc)*cell;
  reaction_8: pShc => Shc; V8*pShc/(Km8 + pShc)*cell;
  reaction_9: GS + Rp_pShc -> Rp_pShc_GS; (k9*Rp_pShc*GS - k_9*Rp_pShc_GS)*cell;
  reaction_10: Rp_pShc_GS -> Rp + pShc_GS; (k_10*Rp_pShc_GS - k10*Rp*pShc_GS)*cell;
  reaction_11: pShc_GS -> GS + pShc; (k_11*pShc_GS - k11*pShc*GS)*cell;
  reaction_12: Rp + PI3K -> Rp_PI3K; (k12*Rp*PI3K - k_12*Rp_PI3K)*cell;
  reaction_13: Rp + RasGAP -> Rp_RasGAP; (k13*Rp*RasGAP - k_13*Rp_RasGAP)*cell;
  reaction_17: Rp => Null; k17*Rp*cell;
  reaction_18: Rp_GS => GS; k17*Rp_GS*cell;
  reaction_19: Rp_Shc => Shc; k17*Rp_Shc*cell;
  reaction_20: Rp_pShc => pShc; k17*Rp_pShc*cell;
  reaction_21: Rp_pShc_GS => pShc_GS; k17*Rp_pShc_GS*cell;
  reaction_22: Rp_PI3K => PI3K; k17*Rp_PI3K*cell;
  reaction_23: Rp_RasGAP => RasGAP; k17*Rp_RasGAP*cell;
  reaction_24: I + IR -> IRL; (k24*IR*I - k_24*IRL)*cell;
  reaction_25: IRL => IRp; k25*IRL*cell;
  reaction_26: PI3K + IRp -> IRp_PI3K; (k26*IRp*PI3K - k_26*IRp_PI3K)*cell;
  reaction_27: RasGAP + IRp -> IRp_RasGAP; (k27*IRp*RasGAP - k_27*IRp_RasGAP)*cell;
  reaction_28: IRp + IRS -> IRp_IRS; (k28*IRp*IRS - k_28*IRp_IRS)*cell;
  reaction_29: IRp_IRS => IRp_IRSp; k29*IRp_IRS*cell;
  reaction_30: IRp_IRSp -> IRp + IRSp; (k_30*IRp_IRSp - k30*IRp*IRSp)*cell;
  reaction_31: IRSp => IRS; V31*IRSp/(Km31 + IRSp)*cell;
  reaction_34: IRp => Null; k17*IRp*cell;
  reaction_35: IRp_PI3K => PI3K; k17*IRp_PI3K*cell;
  reaction_36: IRp_RasGAP => RasGAP; k17*IRp_RasGAP*cell;
  reaction_37: IRp_IRS => IRS; k17*IRp_IRS*cell;
  reaction_38: IRp_IRSp => IRSp; k17*IRp_IRSp*cell;
  reaction_40: iSrc => aSrc; kcat40*iSrc*(Rp + alpha40*IRp)/(Km40 + iSrc)*cell;  // modifiers: Rp, IRp
  reaction_41: aSrc => iSrc; V41*aSrc/(Km41 + aSrc)*cell;
  reaction_42: IRS + PIP3 -> mIRS; (k42*IRS*PIP3 - k_42*mIRS)*cell;
  reaction_43: mIRS => mIRSp; kcat43*mIRS*(IRp + alpha43*Rp)/(Km43 + mIRS)*cell;  // modifiers: Rp, IRp
  reaction_44: mIRSp => mIRS; V31*mIRSp/(Km31 + mIRSp)*cell;
  reaction_45: GS + mIRSp -> mIRSp_GS; (k45*mIRSp*GS - k_45*mIRSp_GS)*cell;
  reaction_46: PI3K + mIRSp -> mIRSp_PI3K; (k46*mIRSp*PI3K - k_46*mIRSp_PI3K)*cell;
  reaction_47: mIRSp + SHP2 -> mIRSp_SHP2; (k47*mIRSp*SHP2 - k_47*mIRSp_SHP2)*cell;
  reaction_48: mIRSp_SHP2 => mIRS + SHP2; k48*mIRSp_SHP2*cell;
  reaction_49: GAB + PIP3 -> mGAB; (k49*GAB*PIP3 - k_49*mGAB)*cell;
  reaction_50: mGAB => mGABp; kcat50*mGAB*(Rp + alpha50*aSrc)/(Km50 + mGAB)*cell;  // modifiers: Rp, aSrc
  reaction_51: mGABp => mGAB; V51*mGABp/(Km51 + mGABp)*cell;
  reaction_52: GS + mGABp -> mGABp_GS; (k52*mGABp*GS - k_52*mGABp_GS)*cell;
  reaction_53: PI3K + mGABp -> mGABp_PI3K; (k53*mGABp*PI3K - k_53*mGABp_PI3K)*cell;
  reaction_54: RasGAP + mGABp -> mGABp_RasGAP; (k54*mGABp*RasGAP - k_54*mGABp_RasGAP)*cell;
  reaction_55: SHP2 + mGABp -> mGABp_SHP2; (k55*mGABp*SHP2 - k_55*mGABp_SHP2)*cell;
  reaction_56: mGABp_SHP2 => SHP2 + mGAB; k56*mGABp_SHP2*cell;
  reaction_57: mGABp_SHP2 => mGABp_pSHP2; kcat57*mGABp_SHP2*(Rp + aSrc)/(Km57 + mGABp_SHP2)*cell;  // modifiers: Rp, aSrc
  reaction_58: mGABp_pSHP2 => mGABp_SHP2; V58*mGABp_pSHP2/(Km58 + mGABp_pSHP2)*cell;
  reaction_59: GS + mGABp_pSHP2 -> mGABp_pSHP2_GS; (k59*mGABp_pSHP2*GS - k_59*mGABp_pSHP2_GS)*cell;
  reaction_60: => PIP3; k60*(Rp_PI3K + IRp_PI3K + mIRSp_PI3K + mGABp_PI3K + tRas_PI3K)*cell;  // modifiers: Rp_PI3K, IRp_PI3K, mIRSp_PI3K, mGABp_PI3K, tRas_PI3K
  reaction_61: PIP3 => Null; k61*PIP3*cell;
  reaction_62: dRas => tRas; kcat62*dRas*(Rp_GS + Rp_pShc_GS + mIRSp_GS + mGABp_GS + mGABp_pSHP2_GS)/(Km62 + dRas)*cell;  // modifiers: Rp_GS, Rp_pShc_GS, mIRSp_GS, mGABp_GS, mGABp_pSHP2_GS
  reaction_63: tRas => dRas; kcat63*tRas*(bRasGAP + mGABp_RasGAP + Rp_RasGAP + IRp_RasGAP)/(Km63 + tRas)*cell;  // modifiers: Rp_RasGAP, IRp_RasGAP, mGABp_RasGAP, bRasGAP
  reaction_64: PI3K + tRas => tRas_PI3K; (k64*tRas*PI3K - k_64*tRas_PI3K)*cell;
  reaction_65: Raf => aRaf; kcat65*tRas*Raf/(Km65 + Raf)*cell;  // modifiers: tRas
  reaction_66: aRaf => aaRaf; kcat66*aSrc*aRaf/(Km66 + aRaf)*cell;  // modifiers: aSrc
  reaction_67: aaRaf => Raf; (kcat67*aaRaf*(PKA/(Km67 + aaRaf)) + alpha67*aaRaf*(pAkt + beta67*ppAkt))*cell;  // modifiers: pAkt, PKA, ppAkt
  reaction_68: Mek => ppMek; kcat68*aaRaf*Mek/(Km68 + Mek)*cell;  // modifiers: aaRaf
  reaction_69: ppMek => Mek; V69*ppMek/(Km69 + ppMek)*cell;
  reaction_70: Erk => pErk; kcat70*Erk*ppMek/(Km70 + Erk + pErk*(Km70/Km71))*cell;  // modifiers: ppMek
  reaction_71: pErk => ppErk; kcat71*pErk*ppMek/(Km71 + pErk + Erk*(Km71/Km70))*cell;  // modifiers: Erk, ppMek
  reaction_72: ppErk => pErk; V72*ppErk/(Km72 + ppErk + pErk*(Km72/Km73))*cell;
  reaction_73: pErk => Erk; V73*pErk/(Km73 + pErk + ppErk*(Km73/Km72))*cell;  // modifiers: ppErk
  reaction_74: PIP3 + PDK1 -> mPDK1; (k74*PDK1*PIP3 - k_74*mPDK1)*cell;
  reaction_75: Akt => pAkt; kcat75*mPDK1*Akt/(Km75 + Akt)*cell;  // modifiers: mPDK1
  reaction_76: pAkt => Akt; V76*pAkt/(Km76 + pAkt)*cell;
  reaction_77: mTOR -> amTOR; (kcat77*mTOR*((alpha77*pAkt + ppAkt)/(Km77 + mTOR)) - k_77*amTOR)*cell;  // modifiers: pAkt, ppAkt
  reaction_78: pAkt -> ppAkt; (kcat78*amTOR*(pAkt/(Km78 + pAkt)) - k_78*ppAkt)*cell;  // modifiers: amTOR
  reaction_79: GS -> iGS; (kcat79*ppErk*(GS/(Km79 + GS)) - k_79*iGS)*cell;  // modifiers: ppErk
  reaction_80: mGAB -> imGAB; (kcat80*mGAB*(ppErk/(Km80 + mGAB)) - k_80*imGAB)*cell;  // modifiers: ppErk
  reaction_81: mIRS -> imIRS; (kcat81*mIRS*(amTOR/(Km81 + mIRS)) - k_81*imIRS)*cell;  // modifiers: amTOR
  reaction_82: Rp => Ri; V_82*Rp/(Km82 + Rp)*cell;
  reaction_83: Ri => Rd; k83*Ri*cell;
  reaction_84: IRp => IRi; V_84*IRp/(Km84 + IRp)*cell;
  reaction_85: IRi => IRL; k85*IRi*cell;
  reaction_88: mIRSp -> IRSp + PIP3; (k_42*mIRSp - k42*PIP3*IRSp)*cell;
  reaction_89: mIRSp_PI3K -> PIP3 + IRSp_PI3K; (k_42*mIRSp_PI3K - k42*PIP3*IRSp_PI3K)*cell;
  reaction_90: mIRSp_GS -> PIP3 + IRSp_GS; (k_42*mIRSp_GS - k42*PIP3*IRSp_GS)*cell;
  reaction_91: mIRSp_SHP2 -> PIP3 + IRSp_SHP2; (k_42*mIRSp_SHP2 - k42*PIP3*IRSp_SHP2)*cell;
  reaction_92: mGABp -> PIP3 + GABp; (k_42*mGABp - k42*PIP3*GABp)*cell;
  reaction_93: mGABp_PI3K -> PIP3 + GABp_PI3K; (k_42*mGABp_PI3K - k42*PIP3*GABp_PI3K)*cell;
  reaction_94: mGABp_GS -> PIP3 + GABp_GS; (k_42*mGABp_GS - k42*PIP3*GABp_GS)*cell;
  reaction_95: mGABp_RasGAP -> PIP3 + GABp_RasGAP; (k_42*mGABp_RasGAP - k49*PIP3*GABp_RasGAP)*cell;
  reaction_96: mGABp_SHP2 -> PIP3 + GABp_SHP2; (k_42*mGABp_SHP2 - k42*PIP3*GABp_SHP2)*cell;
  reaction_97: mGABp_pSHP2 -> PIP3 + GABp_pSHP2; (k_42*mGABp_pSHP2 - k42*PIP3*GABp_pSHP2)*cell;
  reaction_98: mGABp_pSHP2_GS -> PIP3 + GABp_pSHP2_GS; (k_42*mGABp_pSHP2_GS - k42*PIP3*GABp_pSHP2_GS)*cell;
  reaction_99: IRSp_PI3K => PI3K + IRS; V31*IRSp_PI3K/(Km31 + IRSp_PI3K)*cell;
  reaction_100: IRSp_GS => GS + IRS; V31*IRSp_GS/(Km31 + IRSp_GS)*cell;
  reaction_101: IRSp_SHP2 => IRS + SHP2; k48*IRSp_SHP2*cell;
  reaction_102: mGABp_pSHP2 => SHP2 + mGAB; k56*mGABp_pSHP2*cell;
  reaction_103: mGABp_pSHP2_GS => GS + SHP2 + mGAB; k56*mGABp_pSHP2_GS*cell;
  reaction_104: GABp => GAB; V51*GABp/(Km51 + GABp)*cell;
  reaction_105: GABp_PI3K => PI3K + GAB; V51*GABp_PI3K/(Km51 + GABp_PI3K)*cell;
  reaction_106: GABp_GS => GS + GAB; V51*GABp_GS/(Km51 + GABp_GS)*cell;
  reaction_107: GABp_RasGAP => RasGAP + GAB; V51*GABp_RasGAP/(Km51 + GABp_RasGAP)*cell;
  reaction_108: GABp_SHP2 => SHP2 + GAB; k56*GABp_SHP2*cell;
  reaction_109: GABp_pSHP2 => SHP2 + GAB; k56*GABp_pSHP2*cell;
  reaction_110: GABp_pSHP2_GS => GS + SHP2 + GAB; k56*GABp_pSHP2_GS*cell;
  reaction_111: mGABp_RasGAP => RasGAP + mGAB; k111*(mGABp_SHP2 + mGABp_pSHP2 + mGABp_pSHP2_GS + mIRSp_SHP2)*mGABp_RasGAP*cell;  // modifiers: mIRSp_SHP2, mGABp_SHP2, mGABp_pSHP2, mGABp_pSHP2_GS
  reaction_112: Rp_RasGAP => Rp + RasGAP; k111*(mGABp_SHP2 + mGABp_pSHP2 + mGABp_pSHP2_GS)*Rp_RasGAP*cell;  // modifiers: mGABp_SHP2, mGABp_pSHP2, mGABp_pSHP2_GS
  reaction_113: IRp_RasGAP => RasGAP + IRp; k111*(mGABp_SHP2 + mGABp_pSHP2 + mGABp_pSHP2_GS)*IRp_RasGAP*cell;  // modifiers: mGABp_SHP2, mGABp_pSHP2, mGABp_pSHP2_GS
  reaction_114: Rp_RasGAP => Rp + RasGAP; k111*mIRSp_SHP2*Rp_RasGAP*cell;  // modifiers: mIRSp_SHP2
  reaction_115: IRp_RasGAP => RasGAP + IRp; k111*mIRSp_SHP2*IRp_RasGAP*cell;  // modifiers: mIRSp_SHP2
  reaction_117: mGABp -> imGABp; (2*kcat80*mGABp*ppErk/(Km80 + mGABp) - k_80*imGABp)*cell;  // modifiers: ppErk
  reaction_118: imGABp => imGAB; k118*imGABp*cell;

  // Unit definitions:
  unit substance = 1e-9 mole; substance is "nanomole";
  unit time = second; time is "seconds";
  unit nM = 1e-9 mole / litre;
  unit per_nM = litre / (1e-9 mole);
  unit per_sec = 1 / second; per_sec is "per second";
  unit nM_per_s = 1e-9 mole / (litre * second); nM_per_s is "nM per sec";
  unit per_nMs = litre / (1e-9 mole * second); per_nMs is "per nM per s";
end
