// SBML level 2 version 4

model Overgaard2007_PDmodel_IL21()
  // This a model from the article:
  // PKPD model of interleukin-21 effects on thermoregulation in monkeys--application and evaluation of stochastic differential equations.
  // Overgaard RV, Holford N, Rytved KA, Madsen H. Pharm Res. 2007 Feb;24(2):298-309. PUBMED ,
  // Abstract:
  // PURPOSE: To describe the pharmacodynamic effects of recombinant human interleukin-21 (IL-21) on core body temperature in cynomolgus monkeys using basic mechanisms of heat regulation. A major effort was devoted to compare the use of ordinary differential equations (ODEs) with stochastic differential equations (SDEs) in pharmacokinetic pharmacodynamic (PKPD) modelling. METHODS: A temperature model was formulated including circadian rhythm, metabolism, heat loss, and a thermoregulatory set-point. This model was formulated as a mixed-effects model based on SDEs using NONMEM. RESULTS: The effects of IL-21 were on the set-point and the circadian rhythm of metabolism. The model was able to describe a complex set of IL-21 induced phenomena, including 1) disappearance of the circadian rhythm, 2) no effect after first dose, and 3) high variability after second dose. SDEs provided a more realistic description with improved simulation properties, and further changed the model into one that could not be falsified by the autocorrelation function. CONCLUSIONS: The IL-21 induced effects on thermoregulation in cynomolgus monkeys are explained by a biologically plausible model. The quality of the model was improved by the use of SDEs.
  // This model originates from BioModels Database: A Database of Annotated Published Models. It is copyright (c) 2005-2010 The BioModels Team.
  // For more information see the terms of use .
  // To cite BioModels Database, please use Le Novère N., Bornstein B., Broicher A., Courtot M., Donizelli M., Dharuri H., Li L., Sauro H., Schilstra M., Shapiro B., Snoep J.L., Hucka M. (2006) BioModels Database: A Free, Centralized Database of Curated, Published, Quantitative Kinetic Models of Biochemical and Cellular Systems Nucleic Acids Res., 34: D689-D691.
  // biomodels.db:MODEL0911110000
  // biomodels.db:BIOMD0000000238
  // isDescribedBy pubmed:17009101
  // occursIn taxonomy:9541
  // isVersionOf GO:0060086
  // isVersionOf omim:605384 GO:0001659

  // Compartments:
  compartment COMpartment = 1;

  // Parameters:
  M = 3.5; M is "Metabolic rate";
  T = 38.785; T is "Temperature";
  BR = 0; BR is "Bound Receptor";
  var E_slow; E_slow is "Slow Effect";
  var E_fast; E_fast is "Fast Effect";
  var f_prime; f_prime is "Priming";
  T_a = 21; T_a is "ambient temperature";
  T_b = 38; T_b is "basiline temperature";
  delta_T = 1.57; delta_T is "temperature difference";
  kinc = 0.0258;
  tdose1 = 24;
  tdose2 = 72;
  tdose3 = 120;
  var M_c; M_c is "circadian rhythm";
  t_day = 17.5;
  t_night = 6.73;
  day_length = 86400;
  km = 1.1375; km is "rate constant Metabolism";
  c = 3.47; c is "specific heat constant";
  var k; k is "heat conductance";
  pEtot = 0.144;
  kR = 5.35;
  AMT_dose = 3;
  pEf1 = 1;
  pEs1 = 0.2;
  pEf2 = 3.57;
  pEs2 = 2.43;
  pEf3 = 8;
  pEs3 = 50;
  var kb; kb is "heat conductance baselinevalue";
  M_b = 3;
  t_prime = 45.12;
  alpha = 0.2229166;
  delta_high_dose = 1;
  Ns = 4; Ns is "No. of transit compartment (slow)";
  Nf = 4; Nf is "No. of transit compartment (fast)";
  Ts = 2.45; Ts is "mean total delay (slow)";
  Tf = 0.368; Tf is "mena total delay (fast)";

  // Assignment rules:
  tprime := time*3600*1 - floor(time*3600*1/day_length)*day_length;
  kb := M_b/(T_b - T_a);
  T_day := T_b + delta_T/2;
  M_day := (kb + kinc*(T_day - T_b))*(T_day - T_a);
  f_prime := delta_high_dose*(1 + exp(-alpha*(time - (tdose1 + t_prime))))^(-1);
  T_night := T_b - delta_T/2;
  M_night_baseline := (kb + kinc*(T_night - T_b))*(T_night - T_a);
  M_night := (1 - f_prime)*M_night_baseline + f_prime*M_day;
  M_c := piecewise(M_night, (tprime/3600 >= t_night) && (tprime/3600 < t_day), M_day);
  f2_drug := 0;
  k := kb + kinc*(T - T_b*(1 + pEtot*BR)) + f2_drug;
  X1 := (time - tdose1)/24;
  X2 := (time - tdose2)/24;
  X3 := (time - tdose3)/24;
  Kf := Nf/Tf;
  Ks := Ns/Ts;
  gNsTs1 := piecewise(Ks^Ns/6*exp(-Ks*X1)*X1^(Ns - 1), X1 > 0, 0);
  gNsTs2 := piecewise(Ks^Ns/6*exp(-Ks*X2)*X2^(Ns - 1), X2 > 0, 0);
  gNsTs3 := piecewise(Ks^Ns/6*exp(-Ks*X3)*X3^(Ns - 1), X3 > 0, 0);
  gNfTf1 := piecewise(Kf^Nf/6*exp(-Kf*X1)*X1^(Nf - 1), X1 > 0, 0);
  gNfTf2 := piecewise(Kf^Nf/6*exp(-Kf*X2)*X2^(Nf - 1), X2 > 0, 0);
  gNfTf3 := piecewise(Kf^Nf/6*exp(-Kf*X3)*X3^(Nf - 1), X3 > 0, 0);
  E_slow := AMT_dose*pEs2*(gNsTs1 + gNsTs2 + gNsTs3);
  E_fast := pEf2*(gNfTf1 + gNfTf2 + gNfTf3);

  // Rate rules:
  M' = -km*(M - M_c);
  T' = c^(-1)*(M - k*(T - T_a));
  BR' = f_prime*(E_slow + E_fast)*(1 - BR) - kR*BR;
end
