// SBML level 2 version 4

model vasalou2010()
  // Vasalou2010_Pacemaker_Neuron_SCN
  // This the single cell model from the article:
  // A multiscale model to investigate circadian rhythmicity of pacemaker neurons in the suprachiasmatic nucleus.
  // Vasalou C, Henson MA. PLoS Comput Biol 2010 Mar 12;6(3):e1000706. PMID: 20300645 , DOI: 10.1371/journal.pcbi.1000706 ;
  // Abstract:
  // The suprachiasmatic nucleus (SCN) of the hypothalamus is a multicellular system that drives daily rhythms in mammalian behavior and physiology. Although the gene regulatory network that produces daily oscillations within individual neurons is well characterized, less is known about the electrophysiology of the SCN cells and how firing rate correlates with circadian gene expression. We developed a firing rate code model to incorporate known electrophysiological properties of SCN pacemaker cells, including circadian dependent changes in membrane voltage and ion conductances. Calcium dynamics were included in the model as the putative link between electrical firing and gene expression. Individual ion currents exhibited oscillatory patterns matching experimental data both in current levels and phase relationships. VIP and GABA neurotransmitters, which encode synaptic signals across the SCN, were found to play critical roles in daily oscillations of membrane excitability and gene expression. Blocking various mechanisms of intracellular calcium accumulation by simulated pharmacological agents (nimodipine, IP3- and ryanodine-blockers) reproduced experimentally observed trends in firing rate dynamics and core-clock gene transcription. The intracellular calcium concentration was shown to regulate diverse circadian processes such as firing frequency, gene expression and system periodicity. The model predicted a direct relationship between firing frequency and gene expression amplitudes, demonstrated the importance of intracellular pathways for single cell behavior and provided a novel multiscale framework which captured characteristics of the SCN at both the electrophysiological and gene regulatory levels.
  // Originally created by libAntimony v1.3 (using libSBML 4.1.0-b1)
  // This model originates from BioModels Database: A Database of Annotated Published Models. It is copyright (c) 2005-2010 The BioModels Team.
  // For more information see the terms of use .
  // To cite BioModels Database, please use Le Novère N., Bornstein B., Broicher A., Courtot M., Donizelli M., Dharuri H., Li L., Sauro H., Schilstra M., Shapiro B., Snoep J.L., Hucka M. (2006) BioModels Database: A Free, Centralized Database of Curated, Published, Quantitative Kinetic Models of Biochemical and Cellular Systems Nucleic Acids Res., 34: D689-D691.
  // biomodels.db:MODEL1004080000
  // biomodels.db:BIOMD0000000246
  // isDescribedBy pubmed:20300645
  // occursIn taxonomy:40674 FMA:67883
  // isVersionOf GO:0042752

  // Compartments:
  compartment extra = 1;  // isVersionOf GO:0005615; isPartOf FMA:67883
  compartment cytoplasm = 1;  // isPartOf FMA:54527; GO:0005737
  compartment store = 1;  // isPartOf FMA:54527; hasPart GO:0005783 GO:0005739
  compartment nucleus = 1;  // isVersionOf GO:0005634; isPartOf FMA:54527

  // Species:
  species Ca_in in cytoplasm = 0.1;  // substance in umole; CHEBI:29108 kegg.compound:C00076
  species Ca_store in store = 0.1;  // substance in umole; CHEBI:29108 kegg.compound:C00076
  species Ca_ex in extra = 5;  // substance in umole; CHEBI:29108 kegg.compound:C00076
  species M_P in cytoplasm = 2.8;  // encodes uniprot:P56645 uniprot:O15055 uniprot:O15534; isVersionOf CHEBI:33699
  species M_C in cytoplasm = 2;  // encodes uniprot:Q49AN0 uniprot:Q16526; isVersionOf CHEBI:33699
  species M_B in cytoplasm = 7.94;  // isVersionOf uniprot:O00327; isVersionOf CHEBI:33699
  species P_C in cytoplasm = 0.4;  // hasVersion uniprot:P56645 uniprot:O15055 uniprot:O15534
  species C_C in cytoplasm = 12;  // hasVersion uniprot:Q49AN0 uniprot:Q16526
  species P_CP in cytoplasm = 0.13;  // hasVersion uniprot:P56645 uniprot:O15055 uniprot:O15534
  species C_CP in cytoplasm = 9;  // hasVersion uniprot:Q49AN0 uniprot:Q16526; isVersionOf kegg.compound:C00562
  species PC_C in cytoplasm = 1.26;  // hasPart uniprot:Q16526 uniprot:P56645; hasPart uniprot:Q16526 uniprot:O15534
  species PC_N in nucleus = 0.16;  // hasPart uniprot:Q49AN0 uniprot:P56645; hasPart uniprot:Q16526 uniprot:O15534
  species PC_CP in cytoplasm = 0.2;  // isVersionOf kegg.compound:C00562; hasPart uniprot:Q16526 uniprot:O15534; hasPart uniprot:Q16526 uniprot:P56645
  species PC_NP in nucleus = 0.091;  // hasPart uniprot:Q16526 uniprot:P56645; hasPart uniprot:Q16526 uniprot:O15055; hasPart uniprot:Q16526 uniprot:O15534
  species B_C in cytoplasm = 2.41;  // isVersionOf uniprot:O00327
  species B_CP in cytoplasm = 0.48;  // isVersionOf kegg.compound:C00562; isVersionOf uniprot:O00327
  species B_N in nucleus = 1.94;  // isVersionOf uniprot:O00327
  species B_NP in nucleus = 0.32;  // isVersionOf uniprot:O00327
  species I_N in nucleus = 0.05;
  species CB in cytoplasm = 0.12;  // isVersionOf uniprot:P16220
  species VIP in cytoplasm = 0;  // isHomologTo uniprot:P32241
  species Cl_ex in extra = 114.5;  // substance in mmole; CHEBI:17996 kegg.compound:C00698
  species Cl_o in cytoplasm = 1;  // substance in mmole; CHEBI:17996 kegg.compound:C00698
  species $GABA in cytoplasm;  // kegg.compound:C00334; CHEBI:16865
  species GABA_o in cytoplasm = 0.2;  // CHEBI:16865; kegg.compound:C00334
  species $K_in in cytoplasm;  // substance in mmole; CHEBI:29103 kegg.compound:C00238
  species K_ex in extra = 1;  // substance in mmole; CHEBI:29103 kegg.compound:C00238
  species $Na_in in cytoplasm;  // substance in mmole; CHEBI:9175 kegg.compound:C01330
  species Na_ex in extra = 145;  // substance in mmole; CHEBI:9175 kegg.compound:C01330

  // Parameters:
  v_vo = 0.09 uM_per_h;
  n_vo = 4.5 dimensionless;
  K_vo = 4.5 nM;
  v_kk = 3.3 per_uM_per_h;
  n_kk = 0.1 dimensionless;
  K_kk = 0.02 nM;
  n_kCa = 2 dimensionless;
  V_M1 = 0.0003 uM_per_h;
  beta_IP3 = 0.5 dimensionless;
  V_M2 = 149.5 uM_per_h;
  n_M2 = 2.2 dimensionless;
  K_2 = 5 uM;
  V_M3 = 400 uM_per_h;
  n_M3 = 6 dimensionless;
  K_R_Ca = 3 uM;
  p_A = 4.2 dimensionless;
  K_A = 0.67 uM;
  k_f = 0.001 per_h;
  v_sP0 = 1 nM_per_h;
  C_T = 1.6 nM_per_h;
  K_C = 0.15 nM;
  n_BN = 4 dimensionless;
  K_AP = 0.6 nM;
  v_mP = 1.1 nM_per_h;
  K_mP = 0.31 nM;
  kd_mP = 0.01 per_h;
  v_sC = 1.1 nM_per_h;
  K_sC = 0.6 nM;
  v_mC = 1 nM_per_h;
  K_mC = 0.4 nM;
  kd_mC = 0.01 per_h;
  v_sB = 1 nM_per_h;
  K_IB = 2.2 nM;
  m_BN = 2 dimensionless;
  v_mB = 0.8 nM_per_h;
  K_mB = 0.4 nM;
  kd_mB = 0.01 per_h;
  ks_P = 0.6 per_h;
  kd_n = 0.01 per_h;
  V1_P = V_phos; V1_P has nM_per_h;
  K_p = 0.1 nM;
  V2_P = 0.3 nM_per_h;
  K_dp = 0.1 nM;
  k3 = 0.4 per_nM_per_h;
  k4 = 0.2 per_h;
  ks_C = 1.6 per_h;
  kd_nc = 0.12 per_h;
  V1_C = 0.6 nM_per_h;
  V2_C = 0.1 nM_per_h;
  v_dPC = 0.7 per_nM_per_h;
  Kd = 0.3 nM;
  v_dCC = 0.7 nM_per_h;
  k1 = 0.45 per_h;
  k2 = 0.2 per_h;
  V1_PC = V_phos; V1_PC has nM_per_h;
  V2_PC = 0.1 nM_per_h;
  vd_PCC = 0.7 nM_per_h;
  V3_PC = V_phos; V3_PC has nM_per_h;
  V4_PC = 0.1 nM_per_h;
  vd_PCN = 0.7 nM_per_h;
  k7 = 0.5 per_nM_per_h;
  k8 = 0.1 per_h;
  vd_IN = 0.8 nM_per_h;
  ksB = 0.12;
  V1_B = 0.5 nM_per_h;
  V2_B = 0.1 nM_per_h;
  k5 = 0.4;
  k6 = 0.2;
  vd_BC = 0.5 nM_per_h;
  V3_B = 0.5 nM_per_h;
  V4_B = 0.2 nM_per_h;
  vd_BN = 0.6 nM_per_h;
  v_K has nM_per_h;
  K_1_CB = 0.01 nM;
  vP = 1 nM_per_h;
  K_2_CB = 0.01 nM;
  WT = 1 dimensionless;
  v_VIP = 0.5 nM_per_h;
  f_r has hertz;
  n_VIP = 1.9 dimensionless;
  K_VIP = 15;
  k_dVIP = 0.5;
  n_dVIP = 0.2 dimensionless;
  v_GABA = 19 nM;
  K_GABA = 3 nM;
  beta has dimensionless;
  K_D = 0.08;
  V_MK = 5;
  k_MK = 2.9;
  V_b = 2;
  k_b = 2;
  E_Na has mV;
  E_Na_0 = 45 mV;
  T = 37 kelvin;
  T_abs = 273.15 kelvin;
  T_room = 22 kelvin;
  E_K has mV;
  E_K_0 = -97 mV;
  E_L has mV;
  E_L_0 = -29 mV;
  E_Ca has mV;
  k_q = 8.75e-5;
  K_Cl1 = 4;
  v_Cl1 = 15.5;
  n_Cl = -0.2;
  K_Cl2 = 1;
  v_Cl2 = 19;
  E_inhib has mV;
  v_PK = 1.9;
  n_PK = -2;
  K_PK = 1;
  theta_Na has mV;
  theta_K has mV;
  P_Ca = 0.05;
  P_Na = 0.036;
  P_Cl = 0.3;
  V_rest has mV;
  R_g = 8.314;
  Faraday = 96485;
  theta has mV;
  V_theta = 20 mV;
  V_reset has mV;
  V_R = 0.41;
  K_R = 34 mV;
  I_Na has uA;
  g_Na = 36 nS;
  g_K has nS;
  g_K_0 = 9.7 nS;
  K_gk = 10 nM;
  v_gk = 10 nS;
  I_Na_abs has uA;
  g_ex has nS;
  V_ex1 = 105;
  n_ex1 = 2.5;
  K_ex1 = 574050000 uA;
  n_ex2 = -1;
  K_ex2 = 1 per_uM;
  V_ex2 = 4.4;
  v_Ca = 12.3;
  n_Ca = 2.2;
  K_Ca = 22;
  VK_Ca = 3;
  n_KCa = -1;
  K_KCa = 0.16;
  I_star has uA;
  g_inhib = 12.3 nS;
  E_ex = 0 mV;
  Cm = 5;
  PK_o = 1.1;
  V_phos = 0.4;

  // Assignment rules:
  GABA := GABA_o + v_GABA*VIP/(K_GABA + VIP);
  K_in := K_ex/theta_K;
  Na_in := Na_ex/theta_Na;
  v_K := V_MK*Ca_in/(k_MK + Ca_in) + V_b*beta/(k_b + beta);
  f_r := -1/(tau_m*ln((theta - R_star*I_star)/(V_reset - R_star*I_star)));
  beta := VIP/(VIP + K_D);
  v_sPc := v_sP0 + C_T*CB/(K_C + CB);
  E_Na := E_Na_0*(T + T_abs)/(T_room + T_abs);
  E_K := E_K_0*(T + T_abs)/(T_room + T_abs);
  E_L := E_L_0*(T + T_abs)/(T_room + T_abs);
  E_Ca := k_q*(T + T_abs)/2*ln(Ca_ex/Ca_in)*1000;
  Cl_in := Cl_o + M_P/(K_Cl1 + M_P)*v_Cl1 + GABA^n_Cl/(K_Cl2 + GABA^n_Cl)*v_Cl2;
  E_inhib := -k_q*(T + T_abs)*ln(Cl_ex/Cl_in)*1000;
  P_K := v_PK*B_C^n_PK/(K_PK + B_C^n_PK);
  theta_Na := exp(E_Na/(k_q*(T + T_abs)*1000));
  theta_K := exp(E_K/(k_q*(T + T_abs)*1000));
  alpha := 4*P_Ca*Ca_in*10^(-3) + P_K*K_in + P_Na*Na_in + P_Cl*Cl_ex;
  beta_a := P_K*K_in - P_K*K_ex + P_Na*Na_in - P_Na*Na_ex + P_Cl*Cl_ex - P_Cl*Cl_in;
  c := -(4*P_Ca*Ca_ex*10^(-3) + P_K*K_ex + P_Na*Na_ex + P_Cl*Cl_in);
  psi := (sqrt(beta_a^2 - 4*alpha*c) - beta_a)/(2*alpha);
  V_rest := R_g*(T + T_abs)/Faraday*ln(psi)*1000;
  theta := V_rest + V_theta;
  V_reset := V_rest + 4;
  R := V_R*V_rest/(K_R + V_rest);
  I_Na := g_Na*(V_rest - E_Na);
  g_K := g_K_0 + M_P/(K_gk + M_P)*v_gk;
  I_Na_abs := sqrt(I_Na^2);
  g_ex := V_ex1*I_Na_abs^n_ex1/(K_ex1 + I_Na_abs^n_ex1) + Ca_in^n_ex2/(K_ex2 + Ca_in^n_ex2)*V_ex2;
  g_L := 1/R;
  g_Ca := v_Ca*(M_P^n_Ca/(K_Ca + M_P^n_Ca));
  gK_Ca := VK_Ca*(C_C^n_KCa/(K_KCa + C_C^n_KCa));
  I_star := g_Na*E_Na + g_Ca*E_Ca + g_K*E_K + g_L*E_L + gK_Ca*E_K - g_inhib*E_inhib - g_ex*E_ex;
  R_star := 1/(g_Na + g_K + g_L + g_Ca + gK_Ca - g_inhib - g_ex);
  tau_m := Cm*R_star;

  // Reactions:
  vo: -> 0.001 Ca_in; 1000*cytoplasm*(v_vo*B_C^n_vo/(K_vo + B_C^n_vo));  // modifiers: B_C; isVersionOf GO:0070588
  v_ca_out: 0.001 Ca_in -> ; 1000*cytoplasm*v_kk*C_C^n_kk/(K_kk + C_C^n_kk)*Ca_in^n_kCa;  // modifiers: C_C; isVersionOf GO:0060401
  v1: -> 0.001 Ca_in; 1000*cytoplasm*V_M1*beta_IP3;  // isVersionOf GO:0005220
  v2: 0.001 Ca_in -> 0.001 Ca_store; 1000*cytoplasm*V_M2*Ca_in^n_M2/(K_2^n_M2 + Ca_in^n_M2);  // isVersionOf GO:0051208
  v3: 0.001 Ca_store -> 0.001 Ca_in; 1000*store*(V_M3*Ca_store^n_M3/(K_R_Ca^n_M3 + Ca_store^n_M3))*Ca_in^p_A/(K_A^p_A + Ca_in^p_A);  // isVersionOf GO:0051209
  v_Ca_leak: 0.001 Ca_store -> 0.001 Ca_in; 1000*store*k_f*Ca_store;  // isVersionOf GO:0051209
  MP_transcription: -> M_P; cytoplasm*(v_sP0 + C_T*CB/(K_C + CB))*B_N^n_BN/(K_AP^n_BN + B_N^n_BN);  // modifiers: CB, B_N; isVersionOf GO:0009299
  MP_decay: M_P -> ; cytoplasm*(v_mP*M_P/(K_mP + M_P) + kd_mP*M_P);  // isVersionOf GO:0006402
  MC_transcription: -> M_C; cytoplasm*v_sC*B_N^n_BN/(K_sC^n_BN + B_N^n_BN);  // modifiers: B_N; isVersionOf GO:0009299
  MC_decay: M_C -> ; cytoplasm*(v_mC*M_C/(K_mC + M_C) + kd_mC*M_C);  // isVersionOf GO:0006402
  MB_transcription: -> M_B; cytoplasm*(v_sB*K_IB^m_BN/(K_IB^m_BN + B_N^m_BN));  // modifiers: B_N; isVersionOf GO:0009299
  MB_decay: M_B -> ; cytoplasm*(v_mB*M_B/(K_mB + M_B) + kd_mB*M_B);  // isVersionOf GO:0006402
  PC_translation: -> P_C; cytoplasm*ks_P*M_P;  // modifiers: M_P; isVersionOf GO:0006412
  PC_degradation: P_C -> ; cytoplasm*kd_n*P_C;
  PC_phosphorylation: P_C -> P_CP; cytoplasm*(V1_P*P_C/(K_p + P_C) - V2_P*P_CP/(K_dp + P_CP));
  PCC_formation: P_C + C_C -> PC_C; cytoplasm*(k3*P_C*C_C - k4*PC_C);  // isVersionOf GO:0006461
  CC_translation: -> C_C; cytoplasm*ks_C*M_C;  // modifiers: M_C; isVersionOf GO:0006412
  CC_degradation: C_C -> ; cytoplasm*kd_nc*C_C;  // isVersionOf GO:0030163
  CC_phosphorylation: C_C -> C_CP; cytoplasm*(V1_C*C_C/(K_p + C_C) - V2_C*C_CP/(K_dp + C_CP));
  PCP_degradation: P_CP -> ; cytoplasm*(v_dPC*P_CP/(Kd + P_CP) + kd_n*P_CP);  // isVersionOf GO:0030163
  CCP_degradation: C_CP -> ; cytoplasm*(v_dCC*C_CP/(Kd + C_CP) + kd_n*C_CP);  // isVersionOf GO:0030163
  PCC_shuttling: PC_C -> PC_N; cytoplasm*k1*PC_C - nucleus*k2*PC_N;
  PCC_phosphorylation: PC_C -> PC_CP; cytoplasm*(V1_PC*PC_C/(K_p + PC_C) - V2_PC*PC_CP/(K_dp + PC_CP));  // isVersionOf GO:0006468
  PCC_degradation: PC_C -> ; cytoplasm*kd_n*PC_C;  // isVersionOf GO:0030163
  PCCP_degradation: PC_CP -> ; cytoplasm*(vd_PCC*PC_CP/(Kd + PC_CP) + kd_n*PC_CP);  // isVersionOf GO:0030163
  PCN_phosphorylation: PC_N -> PC_NP; nucleus*(V3_PC*PC_N/(K_p + PC_N) - V4_PC*PC_NP/(K_dp + PC_NP));  // isVersionOf GO:0006468
  PCN_degradation: PC_N -> ; nucleus*kd_n*PC_N;  // isVersionOf GO:0030163
  PCNP_degradation: PC_NP -> ; nucleus*(vd_PCN*PC_NP/(Kd + PC_NP) + kd_n*PC_NP);  // isVersionOf GO:0030163
  IN_formation: B_N + PC_N -> I_N; cytoplasm*(k7*B_N*PC_N - k8*I_N);  // isVersionOf GO:0006461
  IN_degradation: I_N -> ; nucleus*(vd_IN*I_N/(Kd + I_N) + kd_n*I_N);  // isVersionOf GO:0030163
  BC_translation: -> B_C; cytoplasm*ksB*M_B;  // modifiers: M_B; isVersionOf GO:0006412
  BC_phosphorylation: B_C -> B_CP; cytoplasm*(V1_B*B_C/(K_p + B_C) - V2_B*B_CP/(K_dp + B_CP));  // isVersionOf GO:0006468
  BC_shuttling: B_C -> B_N; cytoplasm*k5*B_C - nucleus*k6*B_N;
  BC_degradation: B_C -> ; cytoplasm*kd_n*B_C;  // isVersionOf GO:0030163
  BCP_degradation: B_CP -> ; cytoplasm*(vd_BC*B_CP/(Kd + B_CP) + kd_n*B_CP);  // isVersionOf GO:0030163
  BN_phosphorylation: B_N -> B_NP; nucleus*(V3_B*B_N/(K_p + B_N) - V4_B*B_NP/(K_dp + B_NP));  // isVersionOf GO:0006468
  BN_degradation: B_N -> ; nucleus*kd_n*B_N;  // isVersionOf GO:0030163
  BNP_degradation: B_NP -> ; nucleus*(vd_BN*B_NP/(Kd + B_NP) + kd_n*B_NP);  // isVersionOf GO:0030163
  CB_activation: -> CB; cytoplasm*(v_K*(1 - CB)/(K_1_CB + 1 - CB) - vP*CB/(K_2_CB + CB))/WT;  // isVersionOf GO:0032793
  VIP_accumulation: -> VIP; cytoplasm*v_VIP*f_r^n_VIP/(K_VIP + f_r^n_VIP);  // isVersionOf GO:0004999 GO:0032800
  VIP_depletion: VIP -> ; cytoplasm*k_dVIP*VIP^n_dVIP;  // isVersionOf GO:0004999 GO:0032801

  // Unit definitions:
  unit substance = 1e-9 mole; substance is "nmole";
  unit umole = 1e-6 mole; umole is "micromole";
  unit mmole = 1e-3 mole; mmole is "millimole";
  unit time = 3600 second; time is "hour";
  unit mV = 1e-3 volt; mV is "milliVolt";
  unit nS = 1e-9 sievert; nS is "nanoSievert";
  unit uA = 1e-6 ampere; uA is "microAmpere";
  unit nF = 1e-9 farad; nF is "nanoFarrad";
  unit nM = 1e-9 mole / litre;
  unit per_nM = litre / (1e-9 mole);
  unit per_nM_2 = litre / (1e-9 mole)^2;
  unit per_uM = litre / (1e-6 mole);
  unit mM = 1e-3 mole / litre;
  unit uM = 1e-6 mole / litre;
  unit per_h = 1 / (3600 second);
  unit uM_per_h = 1e-6 mole / (litre * 3600 second);
  unit nM_per_h = 1e-9 mole / (litre * 3600 second);
  unit per_uM_per_h = litre / (1e-6 mole * 3600 second);
  unit per_nM_per_h = litre / (1e-9 mole * 3600 second);
end
