// SBML level 2 version 4

model Komarova2005_PTHaction_OsteoclastOsteoblastCoupling()
  // This a model from the article:
  // Mathematical model of paracrine interactions between osteoclasts and osteoblasts predicts anabolic action of parathyroid hormone on bone.
  // Komarova SV. Endocrinology. 2005 Aug;146(8):3589-95. 15860557 ,
  // Abstract:
  // To restore falling plasma calcium levels, PTH promotes calcium liberation from bone. PTH targets bone-forming cells, osteoblasts, to increase expression of the cytokine receptor activator of nuclear factor kappaB ligand (RANKL), which then stimulates osteoclastic bone resorption. Intriguingly, whereas continuous administration of PTH decreases bone mass, intermittent PTH has an anabolic effect on bone, which was proposed to arise from direct effects of PTH on osteoblastic bone formation. However, antiresorptive therapies impair the ability of PTH to increase bone mass, indicating a complex role for osteoclasts in the process. We developed a mathematical model that describes the actions of PTH at a single site of bone remodeling, where osteoclasts and osteoblasts are regulated by local autocrine and paracrine factors. It was assumed that PTH acts only to increase the production of RANKL by osteoblasts. As a result, PTH stimulated osteoclasts upon application, followed by compensatory osteoblast activation due to the coupling of osteoblasts to osteoclasts through local paracrine factors. Continuous PTH administration resulted in net bone loss, because bone resorption preceded bone formation at all times. In contrast, over a wide range of model parameters, short application of PTH resulted in a net increase in bone mass, because osteoclasts were rapidly removed upon PTH withdrawal, enabling osteoblasts to rebuild the bone. In excellent agreement with experimental findings, increase in the rate of osteoclast death abolished the anabolic effect of PTH on bone. This study presents an original concept for the regulation of bone remodeling by PTH, currently the only approved anabolic treatment for osteoporosis.
  // The model reproduces Figures 1B and 2A of the reference publication. To obtain the figures 1B, the parameter g21 needs changes. To obtain the figures 1A, the parameters g21, g12 and k2 need to changed. For details look at the curation tab.
  // The initial concentration of Osteoclasts (x1) is corrected to 1.06066 from 10.06066.
  // This model was taken from the CellML repository and automatically converted to SBML.
  // The original model was: CellMLdetails
  // The original CellML model was created by:
  // Lloyd, Catherine, May
  // c.lloyd@auckland.ac.nz
  // The University of Auckland
  // The Bioengineering Institute
  // This model originates from BioModels Database: A Database of Annotated Published Models (http://www.ebi.ac.uk/biomodels/). It is copyright (c) 2005-2011 The BioModels.net Team.
  // For more information see the terms of use .
  // To cite BioModels Database, please use: Li C, Donizelli M, Rodriguez N, Dharuri H, Endler L, Chelliah V, Li L, He E, Henry A, Stefan MI, Snoep JL, Hucka M, Le Novère N, Laibe C (2010) BioModels Database: An enhanced, curated and annotated resource for published quantitative kinetic models. BMC Syst Biol., 4:92.
  // biomodels.db:MODEL1011230000
  // biomodels.db:BIOMD0000000279
  // isDescribedBy pubmed:15860557
  // isVersionOf GO:0046849 GO:0071107
  // isDerivedFrom biomodels.db:BIOMD0000000148
  // occursIn taxonomy:7711

  // Compartments:
  compartment Compartment = 1;  // isVersionOf BTO:0000140

  // Species:
  species Osteoclasts in Compartment = 1.06066;  // isVersionOf BTO:0000968
  species Osteoblasts in Compartment = 212.132;  // isVersionOf BTO:0001593
  species z in Compartment = 100; z is "BoneMass";  // isVersionOf PATO:0000125

  // Parameters:
  alpha1 = 3;
  beta1 = 0.2;
  alpha2 = 4;
  beta2 = 0.02;
  k1 = 0.24;
  k2 = 0.0017;
  g11 = 0.5;
  g21 = -0.5;
  g12 = 1;
  g22 = 0;

  // Assignment rules:
  y1 := piecewise(Osteoclasts - x1_bar, Osteoclasts > x1_bar, 0);
  y2 := piecewise(Osteoblasts - x2_bar, Osteoblasts > x2_bar, 0);
  x1_bar := (beta1/alpha1)^((1 - g22)/gamma)*(beta2/alpha2)^(g21/gamma);
  x2_bar := (beta1/alpha1)^(g12/gamma)*(beta2/alpha2)^((1 - g11)/gamma);
  gamma := g12*g21 - (1 - g11)*(1 - g22);

  // Rate rules:
  Osteoclasts' = alpha1*Osteoclasts^g11*Osteoblasts^g21 - beta1*Osteoclasts;
  Osteoblasts' = alpha2*Osteoclasts^g12*Osteoblasts^g22 - beta2*Osteoblasts;
  z' = k2*y2 - k1*y1;
end
