// SBML level 2 version 4

model Tang2010_PolyGlutamate()
  // This a model from the article:
  // Experimental and computational analysis of polyglutamine-mediated cytotoxicity.
  // Tang MY, Proctor CJ, Woulfe J, Gray DA. PLoS Comput Biol. 2010 Sep 23;6(9). 20885783 ,
  // Abstract:
  // Expanded polyglutamine (polyQ) proteins are known to be the causative agents of a number of human neurodegenerative diseases but the molecular basis of their cytoxicity is still poorly understood. PolyQ tracts may impede the activity of the proteasome, and evidence from single cell imaging suggests that the sequestration of polyQ into inclusion bodies can reduce the proteasomal burden and promote cell survival, at least in the short term. The presence of misfolded protein also leads to activation of stress kinases such as p38MAPK, which can be cytotoxic. The relationships of these systems are not well understood. We have used fluorescent reporter systems imaged in living cells, and stochastic computer modeling to explore the relationships of polyQ, p38MAPK activation, generation of reactive oxygen species (ROS), proteasome inhibition, and inclusion body formation. In cells expressing a polyQ protein inclusion, body formation was preceded by proteasome inhibition but cytotoxicity was greatly reduced by administration of a p38MAPK inhibitor. Computer simulations suggested that without the generation of ROS, the proteasome inhibition and activation of p38MAPK would have significantly reduced toxicity. Our data suggest a vicious cycle of stress kinase activation and proteasome inhibition that is ultimately lethal to cells. There was close agreement between experimental data and the predictions of a stochastic computer model, supporting a central role for proteasome inhibition and p38MAPK activation in inclusion body formation and ROS-mediated cell death.
  // This model originates from BioModels Database: A Database of Annotated Published Models (http://www.ebi.ac.uk/biomodels/). It is copyright (c) 2005-2010 The BioModels.net Team.
  // For more information see the terms of use .
  // To cite BioModels Database, please use: Li C, Donizelli M, Rodriguez N, Dharuri H, Endler L, Chelliah V, Li L, He E, Henry A, Stefan MI, Snoep JL, Hucka M, Le Novère N, Laibe C (2010) BioModels Database: An enhanced, curated and annotated resource for published quantitative kinetic models. BMC Syst Biol., 4:92.
  // biomodels.db:MODEL1002250000
  // biomodels.db:BIOMD0000000285
  // isDescribedBy pubmed:20885783
  // occursIn taxonomy:40674
  // isVersionOf GO:0009405 GO:0018095

  // Compartments:
  compartment cytosol = 1;

  // Species:
  substanceOnly species PolyQ in cytosol = 1000;  // isVersionOf uniprot:P42858
  substanceOnly species Proteasome in cytosol = 1000;  // isVersionOf GO:0000502
  substanceOnly species NatP in cytosol = 19500;
  substanceOnly species MisP in cytosol = 0;
  substanceOnly species MisP_Proteasome in cytosol = 0;
  substanceOnly species AggP1 in cytosol = 0;
  substanceOnly species AggP2 in cytosol = 0;
  substanceOnly species AggP3 in cytosol = 0;
  substanceOnly species AggP4 in cytosol = 0;
  substanceOnly species AggP5 in cytosol = 0;
  substanceOnly species AggPolyQ1 in cytosol = 0;
  substanceOnly species AggPolyQ2 in cytosol = 0;
  substanceOnly species AggPolyQ3 in cytosol = 0;
  substanceOnly species AggPolyQ4 in cytosol = 0;
  substanceOnly species AggPolyQ5 in cytosol = 0;
  substanceOnly species SeqAggP in cytosol = 0;
  substanceOnly species AggP_Proteasome in cytosol = 0;
  substanceOnly species mRFPu in cytosol = 300;
  substanceOnly species mRFPu_Proteasome in cytosol = 0;
  substanceOnly species PolyQ_Proteasome in cytosol = 0;
  substanceOnly species ROS in cytosol = 10;
  substanceOnly species p38_P in cytosol = 0;
  substanceOnly species p38 in cytosol = 100;
  substanceOnly species $Source in cytosol = 1;
  substanceOnly species $Sink in cytosol = 1;
  substanceOnly species p38death in cytosol = 0;
  substanceOnly species PIdeath in cytosol = 0;

  // Parameters:
  kaggPolyQ = 5e-8;
  kdisaggPolyQ1 = 5e-7;
  kdisaggPolyQ2 = 4e-7;
  kdisaggPolyQ3 = 3e-7;
  kdisaggPolyQ4 = 2e-7;
  kdisaggPolyQ5 = 1e-7;
  kseqPolyQ = 8e-7;
  kinhprot = 5e-9;
  kaggMisP = 1e-11;
  kagg2MisP = 1e-10;
  kdisaggMisP1 = 5e-7;
  kdisaggMisP2 = 4e-7;
  kdisaggMisP3 = 3e-7;
  kdisaggMisP4 = 2e-7;
  kdisaggMisP5 = 1e-7;
  ksynmRFPu = 0.138;
  kbinmRFPu = 5e-7;
  krelmRFPu = 1e-8;
  kdegmRFPu = 0.005;
  ksynPolyQ = 0.007;
  kbinPolyQ = 5e-8;
  krelPolyQ = 1e-9;
  kdegPolyQ = 0.0025;
  kgenROS = 0.0017;
  kremROS = 0.0002;
  kgenROSAggP = 5e-6;
  kgenROSSeqAggP = 1e-7;
  kactp38 = 5e-6;
  kinactp38 = 0.002;
  kseqMisP = 1e-9;
  kseqAggPProt = 5e-7;
  kseqPolyQProt = 5e-7;
  kseqMisPProt = 5e-7;
  kseqmRFPuProt = 5e-7;
  kseqmRFPu = 1e-10;
  ksynNatP = 2.4;
  kmisfold = 2e-6;
  krefold = 8e-5;
  kbinMisPProt = 5e-8;
  krelMisPProt = 1e-8;
  kdegMisP = 0.01;
  kgenROSp38 = 0.0007;
  kp38act = 1;
  kp38death = 9e-8;
  kPIdeath = 2.5e-8;
  kproteff = 1;
  kalive = 1;

  // Assignment rules:
  oligomers := AggPolyQ1 + AggPolyQ2 + AggPolyQ3 + AggPolyQ4 + AggPolyQ5;

  // Reactions:
  polyQSynthesis: $Source => PolyQ; ksynPolyQ*Source*kalive;
  polyqProteasomeBinding: PolyQ + Proteasome => PolyQ_Proteasome; kbinPolyQ*PolyQ*Proteasome*kalive;
  polyqProteasomeRelease: PolyQ_Proteasome => PolyQ + Proteasome; krelPolyQ*PolyQ_Proteasome*kalive;
  PolyQDegradation: PolyQ_Proteasome => Proteasome; kdegPolyQ*PolyQ_Proteasome*kalive*kproteff;
  mRFPuSynthesis: $Source => mRFPu; ksynmRFPu*Source*kalive;
  mRFPuProteasomeBinding: mRFPu + Proteasome => mRFPu_Proteasome; kbinmRFPu*mRFPu*Proteasome*kalive;
  mRFPuProteasomeRelease: mRFPu_Proteasome => mRFPu + Proteasome; krelmRFPu*mRFPu_Proteasome*kalive;
  mRFPuDegradation: mRFPu_Proteasome => Proteasome; kdegmRFPu*mRFPu_Proteasome*kalive*kproteff;
  PolyQAggregation1: 2 PolyQ + ROS => AggPolyQ1 + ROS; kaggPolyQ*PolyQ*(PolyQ - 1)*0.5*(ROS^2/(10^2 + ROS^2))*kalive;
  PolyQAggregation2: PolyQ + AggPolyQ1 + ROS => AggPolyQ2 + ROS; kaggPolyQ*PolyQ*AggPolyQ1*(ROS^2/(10^2 + ROS^2))*kalive;
  PolyQAggregation3: PolyQ + AggPolyQ2 + ROS => AggPolyQ3 + ROS; kaggPolyQ*PolyQ*AggPolyQ2*(ROS^2/(10^2 + ROS^2))*kalive;
  PolyQAggregation4: PolyQ + AggPolyQ3 + ROS => AggPolyQ4 + ROS; kaggPolyQ*PolyQ*AggPolyQ3*(ROS^2/(10^2 + ROS^2))*kalive;
  PolyQAggregation5: PolyQ + AggPolyQ4 + ROS => AggPolyQ5 + ROS; kaggPolyQ*PolyQ*AggPolyQ4*(ROS^2/(10^2 + ROS^2))*kalive;
  PolyQDisaggregation5: AggPolyQ5 => PolyQ + AggPolyQ4; kdisaggPolyQ5*AggPolyQ5*kalive;
  PolyQDisaggregation4: AggPolyQ4 => PolyQ + AggPolyQ3; kdisaggPolyQ4*AggPolyQ4*kalive;
  PolyQDisaggregation3: AggPolyQ3 => PolyQ + AggPolyQ2; kdisaggPolyQ3*AggPolyQ3*kalive;
  PolyQDisaggregation2: AggPolyQ2 => PolyQ + AggPolyQ1; kdisaggPolyQ2*AggPolyQ2*kalive;
  PolyQDisaggregation1: AggPolyQ1 => 2 PolyQ; kdisaggPolyQ1*AggPolyQ1*kalive;
  PolyQInclusionFormation: PolyQ + AggPolyQ5 => 7 SeqAggP; kaggPolyQ*PolyQ*AggPolyQ5*kalive;
  PolyQInclusionGrowth: PolyQ + SeqAggP => 2 SeqAggP; kseqPolyQ*PolyQ*SeqAggP*kalive;
  ProteasomeInhibition1: AggPolyQ1 + Proteasome => AggP_Proteasome; kinhprot*AggPolyQ1*Proteasome*kalive;
  ProteasomeInhibition2: AggPolyQ2 + Proteasome => AggP_Proteasome; kinhprot*AggPolyQ2*Proteasome*kalive;
  ProteasomeInhibition3: AggPolyQ3 + Proteasome => AggP_Proteasome; kinhprot*AggPolyQ3*Proteasome*kalive;
  ProteasomeInhibition4: AggPolyQ4 + Proteasome => AggP_Proteasome; kinhprot*AggPolyQ4*Proteasome*kalive;
  ProteasomeInhibition5: AggPolyQ5 + Proteasome => AggP_Proteasome; kinhprot*AggPolyQ5*Proteasome*kalive;
  mRFPuProteasomeSequestering: mRFPu_Proteasome + SeqAggP => 2 SeqAggP; kseqmRFPuProt*mRFPu_Proteasome*SeqAggP*kalive;
  mRFPuSequestering: mRFPu + SeqAggP => 2 SeqAggP; kseqmRFPu*mRFPu*SeqAggP*kalive;
  ROSgenerationBasal: $Source => ROS; kgenROS*Source*kalive;
  ROSgenerationSmallAggPolyQ1: AggPolyQ1 => AggPolyQ1 + ROS; kgenROSAggP*AggPolyQ1*kalive;
  ROSgenerationSmallAggPolyQ2: AggPolyQ2 => AggPolyQ2 + ROS; kgenROSAggP*AggPolyQ2*kalive;
  ROSgenerationSmallAggPolyQ3: AggPolyQ3 => AggPolyQ3 + ROS; kgenROSAggP*AggPolyQ3*kalive;
  ROSgenerationSmallAggPolyQ4: AggPolyQ4 => AggPolyQ4 + ROS; kgenROSAggP*AggPolyQ4*kalive;
  ROSgenerationSmallAggPolyQ5: AggPolyQ5 => AggPolyQ5 + ROS; kgenROSAggP*AggPolyQ5*kalive;
  ROSgenerationAggPProteasome: AggP_Proteasome => AggP_Proteasome + ROS; kgenROSAggP*AggP_Proteasome*kalive;
  ROSremoval: ROS => $Sink; kremROS*ROS*kalive;
  p38activation: ROS + p38 => ROS + p38_P; kactp38*ROS*p38*kalive;
  p38inactivation: p38_P => p38; kinactp38*p38_P*kalive;
  AggP_ProteasomeSequestering: AggP_Proteasome + SeqAggP => 2 SeqAggP; kseqAggPProt*AggP_Proteasome*SeqAggP*kalive;
  PolyQ_ProteasomeSequestering: PolyQ_Proteasome + SeqAggP => 2 SeqAggP; kseqPolyQProt*PolyQ_Proteasome*SeqAggP*kalive;
  MisP_ProteasomeSequestering: MisP_Proteasome + SeqAggP => 2 SeqAggP; kseqMisPProt*MisP_Proteasome*SeqAggP*kalive;
  ProteinSynthesis: $Source => NatP; ksynNatP*Source*kalive;
  Misfolding: NatP + ROS => MisP + ROS; kmisfold*NatP*ROS*kalive;
  Refolding: MisP => NatP; krefold*MisP*kalive;
  MisP_ProteasomeBinding: MisP + Proteasome => MisP_Proteasome; kbinMisPProt*MisP*Proteasome*kalive;
  MisP_ProteasomeRelease: MisP_Proteasome => MisP + Proteasome; krelMisPProt*MisP_Proteasome*kalive;
  MisP_Degradation: MisP_Proteasome => Proteasome; kdegMisP*MisP_Proteasome*kalive*kproteff;
  MisP_Aggregation1: 2 MisP => AggP1; kaggMisP*MisP*(MisP - 1)*0.5*kalive;
  MisP_Aggregation2: MisP + AggP1 => AggP2; kagg2MisP*MisP*AggP1*kalive;
  MisP_Aggregation3: MisP + AggP2 => AggP3; kagg2MisP*MisP*AggP2*kalive;
  MisP_Aggregation4: MisP + AggP3 => AggP4; kagg2MisP*MisP*AggP3*kalive;
  MisP_Aggregation5: MisP + AggP4 => AggP5; kagg2MisP*MisP*AggP4*kalive;
  MisP_Disaggregation1: AggP1 => 2 MisP; kdisaggMisP1*AggP1*kalive;
  MisP_Disaggregation2: AggP2 => MisP + AggP1; kdisaggMisP2*AggP2*kalive;
  MisP_Disaggregation3: AggP3 => MisP + AggP2; kdisaggMisP3*AggP3*kalive;
  MisP_Disaggregation4: AggP4 => MisP + AggP3; kdisaggMisP4*AggP4*kalive;
  MisP_Disaggregation5: AggP5 => MisP + AggP4; kdisaggMisP5*AggP5*kalive;
  MisP_InclusionFormation: MisP + AggP5 => 7 SeqAggP; kagg2MisP*MisP*AggP5*kalive;
  MisPInclusionGrowth: MisP + SeqAggP => 2 SeqAggP; kseqMisP*MisP*SeqAggP*kalive;
  ProteasomeInhibitionAggP1: AggP1 + Proteasome => AggP_Proteasome; kinhprot*AggP1*Proteasome*kalive;
  ProteasomeInhibitionAggP2: AggP2 + Proteasome => AggP_Proteasome; kinhprot*AggP2*Proteasome*kalive;
  ProteasomeInhibitionAggP3: AggP3 + Proteasome => AggP_Proteasome; kinhprot*AggP3*Proteasome*kalive;
  ProteasomeInhibitionAggP4: AggP4 + Proteasome => AggP_Proteasome; kinhprot*AggP4*Proteasome*kalive;
  ProteasomeInhibitionAggP5: AggP5 + Proteasome => AggP_Proteasome; kinhprot*AggP5*Proteasome*kalive;
  ROSgenerationSmallAggP1: AggP1 => AggP1 + ROS; kgenROSAggP*AggP1*kalive;
  ROSgenerationSmallAggP2: AggP2 => AggP2 + ROS; kgenROSAggP*AggP2*kalive;
  ROSgenerationSmallAggP3: AggP3 => AggP3 + ROS; kgenROSAggP*AggP3*kalive;
  ROSgenerationSmallAggP4: AggP4 => AggP4 + ROS; kgenROSAggP*AggP4*kalive;
  ROSgenerationSmallAggP5: AggP5 => AggP5 + ROS; kgenROSAggP*AggP5*kalive;
  p38_P_ROS_Generation: p38_P => p38_P + ROS; kgenROSp38*p38_P*kp38act*kalive;
  ROSgenerationSeqAggP: SeqAggP => SeqAggP + ROS; kgenROSSeqAggP*SeqAggP*kalive;
  P38DeathPathway: p38_P => p38_P + p38death; kp38death*p38_P*kalive*kp38act;
  PIDeathPathway: AggP_Proteasome => AggP_Proteasome + PIdeath; kPIdeath*AggP_Proteasome*kalive;

  // Events:
  PIcellDeath: at (PIdeath > 0): kalive = 0;
  p38cellDeath: at (p38death > 0): kalive = 0;

  // Unit definitions:
  unit substance = item;
end
