// SBML level 2 version 4

model Proctor2010_GSK3_p53_AlzheimerDisease()
  // This is the model described the article:
  // GSK3 and p53 - is there a link in Alzheimer's disease?
  // Carole J Proctor and Douglas A Gray Molecular Neurodegeneration 2010, 5:7; doi: 10.1186/1750-1326-5-7
  // Abstract:
  // Background: Recent evidence suggests that glycogen synthase kinase-3beta (GSK3beta) is implicated in both sporadic and familial forms of Alzheimer's disease. The transcription factor, p53 also plays a role and has been linked to an increase in tau hyperphosphorylation although the effect is indirect. There is also evidence that GSK3beta and p53 interact and that the activity of both proteins is increased as a result of this interaction. Under normal cellular conditions, p53 is kept at low levels by Mdm2 but when cells are stressed, p53 is stabilised and may then interact with GSK3beta. We propose that this interaction has an important contribution to cellular outcomes and to test this hypothesis we developed a stochastic simulation model.
  // Results: The model predicts that high levels of DNA damage leads to increased activity of p53 and GSK3beta and low levels of aggregation but if DNA damage is repaired, the aggregates are eventually cleared. The model also shows that over long periods of time, aggregates may start to form due to stochastic events leading to increased levels of ROS and damaged DNA. This is followed by increased activity of p53 and GSK3beta and a vicious cycle ensues.
  // Conclusions: Since p53 and GSK3beta are both involved in the apoptotic pathway, and GSK3beta overactivity leads to increased levels of plaques and tangles, our model might explain the link between protein aggregation and neuronal loss in neurodegeneration.
  // Notes: The original model submitted by the author had events in it. Since, this model is intended for Stochastic Simulation run and Copasi cannot handle events in Stochastic run, I have replaced the events with piecewise assignment rule. -Viji
  // This model is an extension of Proctor_p53_Mdm2_ATM ( BIOMD0000000188> ).
  // This model originates from BioModels Database: A Database of Annotated Published Models (http://www.ebi.ac.uk/biomodels/). It is copyright (c) 2005-2010 The BioModels.net Team.
  // For more information see the terms of use .
  // To cite BioModels Database, please use: Li C, Donizelli M, Rodriguez N, Dharuri H, Endler L, Chelliah V, Li L, He E, Henry A, Stefan MI, Snoep JL, Hucka M, Le Novère N, Laibe C (2010) BioModels Database: An enhanced, curated and annotated resource for published quantitative kinetic models. BMC Syst Biol., 4:92.
  // biomodels.db:MODEL0910130002
  // biomodels.db:BIOMD0000000286
  // isDescribedBy pubmed:20181016
  // occursIn taxonomy:40674
  // isPartOf kegg.pathway:ko05010
  // isVersionOf GO:0030330 DOID:10652

  // Compartments:
  compartment cell = 1;  // isVersionOf GO:0005623

  // Species:
  substanceOnly species Mdm2 in cell = 5;  // isVersionOf uniprot:Q00987
  substanceOnly species p53 in cell = 5;  // isVersionOf uniprot:P04637
  substanceOnly species Mdm2_p53 in cell = 95;  // hasPart uniprot:Q00987 uniprot:P04637
  substanceOnly species Mdm2_mRNA in cell = 10;  // encodes uniprot:Q00987
  substanceOnly species p53_mRNA in cell = 10;  // encodes uniprot:P04637
  substanceOnly species ATMA in cell = 0;  // isVersionOf uniprot:Q13315
  substanceOnly species ATMI in cell = 200;  // isVersionOf uniprot:Q13315
  substanceOnly species p53_P in cell = 0;  // isVersionOf uniprot:P04637
  substanceOnly species Mdm2_P in cell = 0;  // isVersionOf uniprot:Q00987
  species IR in cell;
  substanceOnly species ROS in cell = 0;  // isVersionOf CHEBI:26523
  substanceOnly species basalROS in cell = 10;  // isVersionOf CHEBI:26523
  substanceOnly species damDNA in cell = 0;  // isVersionOf CHEBI:16991
  substanceOnly species E1 in cell = 100;  // isVersionOf interpro:IPR000011
  substanceOnly species E2 in cell = 100;  // isVersionOf interpro:IPR000608
  substanceOnly species E1_Ub in cell = 0;  // hasPart uniprot:P62988 interpro:IPR000011
  substanceOnly species E2_Ub in cell = 0;  // hasPart uniprot:P62988 interpro:IPR000608
  substanceOnly species Proteasome in cell = 500;  // isVersionOf GO:0000502
  substanceOnly species Ub in cell = 4000;  // isVersionOf uniprot:P62988
  substanceOnly species p53DUB in cell = 200;  // isPartOf interpro:IPR001394
  substanceOnly species Mdm2DUB in cell = 200;  // isVersionOf interpro:IPR001394
  substanceOnly species DUB in cell = 200;  // isVersionOf interpro:IPR001394
  substanceOnly species Mdm2_p53_Ub in cell = 0;  // hasPart uniprot:Q00987 uniprot:P04637 uniprot:P62988
  substanceOnly species Mdm2_p53_Ub2 in cell = 0;  // hasPart uniprot:Q00987 uniprot:P04637 uniprot:P62988
  substanceOnly species Mdm2_p53_Ub3 in cell = 0;  // hasPart uniprot:Q00987 uniprot:P04637 uniprot:P62988
  substanceOnly species Mdm2_p53_Ub4 in cell = 0;  // hasPart uniprot:Q00987 uniprot:P04637 uniprot:P62988
  substanceOnly species Mdm2_P1_p53_Ub4 in cell = 0;  // hasPart uniprot:Q00987 uniprot:P04637 uniprot:P62988
  substanceOnly species Mdm2_Ub in cell = 0;  // hasPart uniprot:Q00987 uniprot:P62988
  substanceOnly species Mdm2_Ub2 in cell = 0;  // hasPart uniprot:Q00987 uniprot:P62988
  substanceOnly species Mdm2_Ub3 in cell = 0;  // hasPart uniprot:Q00987 uniprot:P62988
  substanceOnly species Mdm2_Ub4 in cell = 0;  // hasPart uniprot:Q00987 uniprot:P62988
  substanceOnly species Mdm2_P_Ub in cell = 0;  // hasPart uniprot:Q00987 uniprot:P62988
  substanceOnly species Mdm2_P_Ub2 in cell = 0;  // hasPart uniprot:Q00987 uniprot:P62988
  substanceOnly species Mdm2_P_Ub3 in cell = 0;  // hasPart uniprot:Q00987 uniprot:P62988
  substanceOnly species Mdm2_P_Ub4 in cell = 0;  // hasPart uniprot:Q00987 uniprot:P62988
  substanceOnly species p53_Ub4_Proteasome in cell = 0;  // hasPart uniprot:P04637 uniprot:P62988 GO:0000502
  substanceOnly species Mdm2_Ub4_Proteasome in cell = 0;  // hasPart uniprot:Q00987 uniprot:P62988 GO:0000502
  substanceOnly species Mdm2_P_Ub4_Proteasome in cell = 0;  // hasPart uniprot:Q00987 uniprot:P62988 GO:0000502
  substanceOnly species GSK3b in cell = 500;  // isVersionOf uniprot:P49841
  substanceOnly species GSK3b_p53 in cell = 0;  // hasPart uniprot:P49841 uniprot:P04637
  substanceOnly species GSK3b_p53_P in cell = 0;  // hasPart uniprot:P49841 uniprot:P04637
  substanceOnly species Abeta in cell = 0;  // isVersionOf uniprot:P05067
  substanceOnly species AggAbeta_Proteasome in cell = 0;  // isVersionOf uniprot:P05067 GO:0000502
  substanceOnly species AggAbeta in cell = 0;  // isVersionOf uniprot:P05067
  substanceOnly species AbetaPlaque in cell = 0;  // isVersionOf uniprot:P05067
  substanceOnly species Tau in cell = 0;  // isVersionOf interpro:IPR002955
  substanceOnly species Tau_P1 in cell = 0;  // isVersionOf interpro:IPR002955
  substanceOnly species Tau_P2 in cell = 0;  // isVersionOf interpro:IPR002955
  substanceOnly species MT_Tau in cell = 100;  // isVersionOf interpro:IPR015562
  substanceOnly species AggTau in cell = 0;  // isVersionOf interpro:IPR002955
  substanceOnly species AggTau_Proteasome in cell = 0;  // hasPart interpro:IPR002955 GO:0000502
  substanceOnly species Proteasome_Tau in cell = 0;  // hasPart interpro:IPR002955 GO:0000502
  substanceOnly species PP1 in cell = 50;  // isVersionOf uniprot:P62136
  substanceOnly species NFT in cell = 0;  // isVersionOf interpro:IPR002955
  substanceOnly species $ATP in cell = 10000;  // isVersionOf CHEBI:15422
  substanceOnly species $ADP in cell = 1000;  // isVersionOf CHEBI:16761
  substanceOnly species $AMP in cell = 1000;  // isVersionOf CHEBI:16027 kegg.compound:C00020
  substanceOnly species $Source in cell = 1;
  substanceOnly species $Sink in cell = 0;

  // Parameters:
  ksynp53mRNA = 0.001;
  kdegp53mRNA = 0.0001;
  ksynMdm2mRNA = 0.0005;
  kdegMdm2mRNA = 0.0005;
  ksynMdm2mRNAGSK3bp53 = 0.0007;
  ksynp53 = 0.007;
  kdegp53 = 0.005;
  kbinMdm2p53 = 0.001155;
  krelMdm2p53 = 1.155e-5;
  kbinGSK3bp53 = 2e-6;
  krelGSK3bp53 = 0.002;
  ksynMdm2 = 0.000495;
  kdegMdm2 = 0.01;
  kbinE1Ub = 0.0002;
  kbinE2Ub = 0.001;
  kp53Ub = 5e-5;
  kp53PolyUb = 0.01;
  kbinProt = 2e-6;
  kactDUBp53 = 1e-7;
  kactDUBProtp53 = 0.0001;
  kactDUBMdm2 = 1e-7;
  kMdm2Ub = 4.56e-6;
  kMdm2PUb = 6.84e-6;
  kMdm2PolyUb = 0.00456;
  kdam = 0.08;
  krepair = 2e-5;
  kactATM = 0.0001;
  kinactATM = 0.0005;
  kphosp53 = 0.0002;
  kdephosp53 = 0.5;
  kphosMdm2 = 2;
  kdephosMdm2 = 0.5;
  kphosMdm2GSK3b = 0.005;
  kphosMdm2GSK3bp53 = 0.5;
  kphospTauGSK3bp53 = 0.1;
  kphospTauGSK3b = 0.0002;
  kdephospTau = 0.01;
  kbinMTTau = 0.1;
  krelMTTau = 0.0001;
  ksynTau = 8e-5;
  kbinTauProt = 1.925e-7;
  kdegTau20SProt = 0.01;
  kaggTau = 1e-8;
  kaggTauP1 = 1e-8;
  kaggTauP2 = 1e-7;
  ktangfor = 0.001;
  kprodAbeta = 5e-5;
  kinhibprot = 1e-5;
  kdegAbeta = 0.0001;
  kaggAbeta = 1e-8;
  kpf = 0.001;
  ksynp53mRNAAbeta = 1e-5;
  kdamROS = 1e-5;
  kdamBasalROS = 1e-9;
  kgenROSAbeta = 1e-5;
  kproteff = 1;

  // Assignment rules:
  IR := piecewise(25, (time >= 3600) && (time <= 3660), 0);
  tot_mdm2 := Mdm2 + Mdm2_p53 + Mdm2_P + Mdm2_p53_Ub + Mdm2_p53_Ub2 + Mdm2_p53_Ub3 + Mdm2_p53_Ub4 + Mdm2_P1_p53_Ub4 + Mdm2_Ub + Mdm2_Ub2 + Mdm2_Ub3 + Mdm2_Ub4 + Mdm2_P_Ub + Mdm2_P_Ub2 + Mdm2_P_Ub3 + Mdm2_P_Ub4 + Mdm2_Ub4_Proteasome + Mdm2_P_Ub4_Proteasome;
  tot_p53 := p53 + Mdm2_p53 + p53_P + Mdm2_p53_Ub + Mdm2_p53_Ub2 + Mdm2_p53_Ub3 + Mdm2_p53_Ub4 + Mdm2_P1_p53_Ub4 + p53_Ub4_Proteasome;

  // Reactions:
  p53mRNASynthesis: $Source => p53_mRNA; ksynp53mRNA*Source;  // isVersionOf GO:0006351
  p53mRNADegradation: p53_mRNA => $Sink; kdegp53mRNA*p53_mRNA;  // isVersionOf GO:0009056
  Mdm2Synthesis: Mdm2_mRNA => Mdm2_mRNA + Mdm2; ksynMdm2*Mdm2_mRNA;  // isVersionOf GO:0006412
  Mdm2mRNASynthesis1: p53 => p53 + Mdm2_mRNA; ksynMdm2mRNA*p53;  // isVersionOf GO:0006351
  Mdm2mRNASynthesis2: p53_P => p53_P + Mdm2_mRNA; ksynMdm2mRNA*p53_P;  // isVersionOf GO:0006351
  Mdm2mRNASynthesis3: GSK3b_p53 => GSK3b_p53 + Mdm2_mRNA; ksynMdm2mRNAGSK3bp53*GSK3b_p53;  // isVersionOf GO:0006351
  Mdm2mRNASynthesis4: GSK3b_p53_P => GSK3b_p53_P + Mdm2_mRNA; ksynMdm2mRNAGSK3bp53*GSK3b_p53_P;  // isVersionOf GO:0006351
  Mdm2mRNADegradation: Mdm2_mRNA => $Sink; kdegMdm2mRNA*Mdm2_mRNA;  // isVersionOf GO:0009056
  P53Mdm2Binding: p53 + Mdm2 => Mdm2_p53; kbinMdm2p53*p53*Mdm2;  // isVersionOf GO:0006461
  P53Mdm2Release: Mdm2_p53 => p53 + Mdm2; krelMdm2p53*Mdm2_p53;  // isVersionOf GO:0043241
  GSK3p53Binding: GSK3b + p53 => GSK3b_p53; kbinGSK3bp53*GSK3b*p53;  // isVersionOf GO:0006461
  GSK3p53Release: GSK3b_p53 => GSK3b + p53; krelGSK3bp53*GSK3b_p53;  // isVersionOf GO:0043241
  GSK3p53PBinding: GSK3b + p53_P => GSK3b_p53_P; kbinGSK3bp53*GSK3b*p53_P;  // isVersionOf GO:0006461
  GSK3_p53PRelease: GSK3b_p53_P => GSK3b + p53_P; krelGSK3bp53*GSK3b_p53_P;  // isVersionOf GO:0043241
  E1UbBinding: E1 + Ub + $ATP => E1_Ub + $AMP; kbinE1Ub*E1*Ub*ATP/(5000 + ATP);  // isVersionOf GO:0006461
  E2UbBinding: E2 + E1_Ub => E2_Ub + E1; kbinE2Ub*E2*E1_Ub;  // isVersionOf GO:0006461
  Mdm2Ubiquitination: Mdm2 + E2_Ub => Mdm2_Ub + E2; kMdm2Ub*Mdm2*E2_Ub;  // isVersionOf GO:0016567
  Mdm2polyUbiquitination1: Mdm2_Ub + E2_Ub => Mdm2_Ub2 + E2; kMdm2PolyUb*Mdm2_Ub*E2_Ub;  // isVersionOf GO:0016567
  Mdm2polyUbiquitination2: Mdm2_Ub2 + E2_Ub => Mdm2_Ub3 + E2; kMdm2PolyUb*Mdm2_Ub2*E2_Ub;  // isVersionOf GO:0016567
  Mdm2polyUbiquitination3: Mdm2_Ub3 + E2_Ub => Mdm2_Ub4 + E2; kMdm2PolyUb*Mdm2_Ub3*E2_Ub;  // isVersionOf GO:0016567
  Mdm2Deubiquitination4: Mdm2_Ub4 + Mdm2DUB => Mdm2_Ub3 + Mdm2DUB + Ub; kactDUBMdm2*Mdm2_Ub4*Mdm2DUB;  // isVersionOf GO:0016567
  Mdm2Deubiquitination3: Mdm2_Ub3 + Mdm2DUB => Mdm2_Ub2 + Mdm2DUB + Ub; kactDUBMdm2*Mdm2_Ub3*Mdm2DUB;  // isVersionOf GO:0016567
  Mdm2Deubiquitination2: Mdm2_Ub2 + Mdm2DUB => Mdm2_Ub + Mdm2DUB + Ub; kactDUBMdm2*Mdm2_Ub2*Mdm2DUB;  // isVersionOf GO:0016567
  Mdm2Deubiquitination1: Mdm2_Ub + Mdm2DUB => Mdm2 + Mdm2DUB + Ub; kactDUBMdm2*Mdm2_Ub*Mdm2DUB;  // isVersionOf GO:0016567
  Mdm2ProteasomeBinding1: Mdm2_Ub4 + Proteasome => Mdm2_Ub4_Proteasome; kbinProt*Mdm2_Ub4*Proteasome;  // isVersionOf GO:0070628
  Mdm2Degradation: Mdm2_Ub4_Proteasome => Proteasome + 4 Ub; kdegMdm2*Mdm2_Ub4_Proteasome*kproteff;  // isVersionOf GO:0009056
  p53Synthesis: p53_mRNA => p53 + p53_mRNA; ksynp53*p53_mRNA;  // isVersionOf GO:0006412
  p53Monoubiquitination: E2_Ub + Mdm2_p53 => Mdm2_p53_Ub + E2; kp53Ub*E2_Ub*Mdm2_p53;  // isVersionOf GO:0016567
  p53Polyubiquitination1: Mdm2_p53_Ub + E2_Ub => Mdm2_p53_Ub2 + E2; kp53PolyUb*Mdm2_p53_Ub*E2_Ub;  // isPartOf GO:0016567
  p53Polyubiquitination2: Mdm2_p53_Ub2 + E2_Ub => Mdm2_p53_Ub3 + E2; kp53PolyUb*Mdm2_p53_Ub2*E2_Ub;  // isVersionOf GO:0016567
  p53Polyubiquitination3: Mdm2_p53_Ub3 + E2_Ub => Mdm2_p53_Ub4 + E2; kp53PolyUb*Mdm2_p53_Ub3*E2_Ub;  // isVersionOf GO:0016567
  p53Deubiqutination4: Mdm2_p53_Ub4 + p53DUB => Mdm2_p53_Ub3 + p53DUB + Ub; kactDUBp53*Mdm2_p53_Ub4*p53DUB;  // isVersionOf GO:0016567
  p53Deubiquitination3: Mdm2_p53_Ub3 + p53DUB => Mdm2_p53_Ub2 + p53DUB + Ub; kactDUBp53*Mdm2_p53_Ub3*p53DUB;  // isVersionOf GO:0016567
  p53Deubiquitination2: Mdm2_p53_Ub2 + p53DUB => Mdm2_p53_Ub + p53DUB + Ub; kactDUBp53*Mdm2_p53_Ub2*p53DUB;  // isVersionOf GO:0016567
  p53Deubiquitination1: Mdm2_p53_Ub + p53DUB => Mdm2_p53 + p53DUB + Ub; kactDUBp53*Mdm2_p53_Ub*p53DUB;  // isVersionOf GO:0016567
  Mdm2GSK3phosphorylation1: Mdm2_p53_Ub4 + GSK3b => Mdm2_P1_p53_Ub4 + GSK3b; kphosMdm2GSK3b*Mdm2_p53_Ub4*GSK3b;  // isVersionOf GO:0016310
  Mdm2GSK3phosphorylation2: Mdm2_p53_Ub4 + GSK3b_p53 => Mdm2_P1_p53_Ub4 + GSK3b_p53; kphosMdm2GSK3bp53*Mdm2_p53_Ub4*GSK3b_p53;  // isVersionOf GO:0016310
  Mdm2GSK3phosphorylation3: Mdm2_p53_Ub4 + GSK3b_p53_P => Mdm2_P1_p53_Ub4 + GSK3b_p53_P; kphosMdm2GSK3bp53*Mdm2_p53_Ub4*GSK3b_p53_P;  // isVersionOf GO:0016310
  p53ProteasomeBinding1: Mdm2_P1_p53_Ub4 + Proteasome => p53_Ub4_Proteasome + Mdm2; kbinProt*Mdm2_P1_p53_Ub4*Proteasome;  // isVersionOf GO:0070628
  Degradationp53_Ub4: p53_Ub4_Proteasome + $ATP => 4 Ub + Proteasome + $ADP; kdegp53*kproteff*p53_Ub4_Proteasome*ATP/(5000 + ATP);  // isVersionOf GO:0030163
  TauMTbinding: Tau => MT_Tau; kbinMTTau*Tau;  // isVersionOf GO:0048156 GO:0008017
  TauMTrelease: MT_Tau => Tau; krelMTTau*MT_Tau;  // isVersionOf GO:0043241
  Tauphosphorylation1: GSK3b_p53 + Tau => GSK3b_p53 + Tau_P1; kphospTauGSK3bp53*GSK3b_p53*Tau;  // isVersionOf GO:0016310
  Tauphosphorylation2: GSK3b_p53 + Tau_P1 => GSK3b_p53 + Tau_P2; kphospTauGSK3bp53*GSK3b_p53*Tau_P1;  // isVersionOf GO:0016310
  Tauphosphorylation3: GSK3b_p53_P + Tau => GSK3b_p53_P + Tau_P1; kphospTauGSK3bp53*GSK3b_p53_P*Tau;  // isVersionOf GO:0016310
  Tauphosphorylation4: GSK3b_p53_P + Tau_P1 => GSK3b_p53_P + Tau_P2; kphospTauGSK3bp53*GSK3b_p53_P*Tau_P1;  // isVersionOf GO:0016310
  Tauphosphorylation5: GSK3b + Tau => GSK3b + Tau_P1; kphospTauGSK3b*GSK3b*Tau;  // isVersionOf GO:0016310
  Tauphosphorylation6: GSK3b + Tau_P1 => GSK3b + Tau_P2; kphospTauGSK3b*GSK3b*Tau_P1;  // isVersionOf GO:0016310
  Taudephosphorylation1: Tau_P2 + PP1 => Tau_P1 + PP1; kdephospTau*Tau_P2*PP1;  // isVersionOf GO:0016310
  Taudephosphorylation2: Tau_P1 + PP1 => Tau + PP1; kdephospTau*Tau_P1*PP1;  // isVersionOf GO:0016310
  TauP1Aggregation1: 2 Tau_P1 => 2 AggTau; kaggTauP1*Tau_P1*(Tau_P1 - 1)*0.5;  // isVersionOf GO:0070841
  TauP1Aggregation2: Tau_P1 + AggTau => 2 AggTau; kaggTauP1*Tau_P1*AggTau;  // isVersionOf GO:0070841
  TauP2Aggregation1: 2 Tau_P2 => 2 AggTau; kaggTauP2*Tau_P2*(Tau_P2 - 1)*0.5;  // isVersionOf GO:0070841
  TauP2Aggregation2: Tau_P2 + AggTau => 2 AggTau; kaggTauP2*Tau_P2*AggTau;  // isVersionOf GO:0070841
  TauAggregation1: 2 Tau => 2 AggTau; kaggTau*Tau*(Tau - 1)*0.5;  // isVersionOf GO:0070841
  TauAggregation2: Tau + AggTau => 2 AggTau; kaggTau*Tau*AggTau;  // isVersionOf GO:0070841
  TangleFormation1: 2 AggTau => 2 NFT; ktangfor*AggTau*(AggTau - 1)*0.5;  // isVersionOf GO:0051787
  TangleFormation2: AggTau + NFT => 2 NFT; ktangfor*AggTau*NFT;  // isVersionOf GO:0051787
  ProteasomeInhibitionAggTau: AggTau + Proteasome => AggTau_Proteasome; kinhibprot*AggTau*Proteasome;  // isVersionOf GO:0008539
  Abetaproduction1: GSK3b_p53 => Abeta + GSK3b_p53; kprodAbeta*GSK3b_p53;  // isVersionOf GO:0034205
  Abetaproduction2: GSK3b_p53_P => Abeta + GSK3b_p53_P; kprodAbeta*GSK3b_p53_P;  // isVersionOf GO:0034205
  ProteasomeInhibitionAbeta: AggAbeta + Proteasome => AggAbeta_Proteasome; kinhibprot*AggAbeta*Proteasome;  // isVersionOf GO:0008539
  AbetaDegradation: Abeta => $Sink; kdegAbeta*Abeta;  // isVersionOf GO:0009056
  AbetaAggregation1: 2 Abeta => AggAbeta; kaggAbeta*Abeta*(Abeta - 1)*0.5;  // isVersionOf GO:0051787
  AbetaAggregation2: Abeta + AggAbeta => 2 AggAbeta; kaggAbeta*Abeta*AggAbeta;  // isVersionOf GO:0051787
  AbetaPlaqueFormation1: 2 AggAbeta => 2 AbetaPlaque; kpf*AggAbeta*(AggAbeta - 1)*0.5;  // isVersionOf GO:0005914
  AbetaPlaqueFormation2: AggAbeta + AbetaPlaque => 2 AbetaPlaque; kpf*AggAbeta*AbetaPlaque;  // isVersionOf GO:0005914
  p53transcriptionViaAbeta: Abeta => p53_mRNA + Abeta; ksynp53mRNAAbeta*Abeta;  // isPartOf GO:0006351
  DNAdamage: => damDNA; kdam*IR;  // modifiers: IR; isVersionOf GO:0006950
  DNArepair: damDNA => $Sink; krepair*damDNA;  // isVersionOf GO:0006281
  ATMactivation: damDNA + ATMI => damDNA + ATMA; kactATM*damDNA*ATMI;  // isVersionOf GO:0006974
  p53phosphorylation: p53 + ATMA => p53_P + ATMA; kphosp53*p53*ATMA;  // isVersionOf GO:0016310
  p53dephosphorylation: p53_P => p53; kdephosp53*p53_P;  // isVersionOf GO:0016310
  Mdm2phosphorylation: Mdm2 + ATMA => Mdm2_P + ATMA; kphosMdm2*Mdm2*ATMA;  // isVersionOf GO:0016310
  Mdm2dephosphorylation: Mdm2_P => Mdm2; kdephosMdm2*Mdm2_P;  // isVersionOf GO:0016310
  Mdm2PUbiquitination: Mdm2_P + E2_Ub => Mdm2_P_Ub + E2; kMdm2PUb*Mdm2_P*E2_Ub;  // isVersionOf GO:0016567
  Mdm2PpolyUbiquitination1: Mdm2_P_Ub + E2_Ub => Mdm2_P_Ub2 + E2; kMdm2PolyUb*Mdm2_P_Ub*E2_Ub;  // isVersionOf GO:0016567
  Mdm2PpolyUbiquitination2: Mdm2_P_Ub2 + E2_Ub => Mdm2_P_Ub3 + E2; kMdm2PolyUb*Mdm2_P_Ub2*E2_Ub;  // isVersionOf GO:0016567
  Mdm2PpolyUbiquitination3: Mdm2_P_Ub3 + E2_Ub => Mdm2_P_Ub4 + E2; kMdm2PolyUb*Mdm2_P_Ub3*E2_Ub;  // isVersionOf GO:0016567
  Mdm2PDeubiquitination4: Mdm2_P_Ub4 + Mdm2DUB => Mdm2_P_Ub3 + Mdm2DUB + Ub; kactDUBMdm2*Mdm2_P_Ub4*Mdm2DUB;  // isVersionOf GO:0016579
  Mdm2PDeubiquitination3: Mdm2_P_Ub3 + Mdm2DUB => Mdm2_P_Ub2 + Mdm2DUB + Ub; kactDUBMdm2*Mdm2_P_Ub3*Mdm2DUB;  // isVersionOf GO:0016579
  Mdm2PDeubiquitination2: Mdm2_P_Ub2 + Mdm2DUB => Mdm2_P_Ub + Mdm2DUB + Ub; kactDUBMdm2*Mdm2_P_Ub2*Mdm2DUB;  // isVersionOf GO:0016579
  Mdm2PDeubiquitination1: Mdm2_P_Ub + Mdm2DUB => Mdm2_P + Mdm2DUB + Ub; kactDUBMdm2*Mdm2_P_Ub*Mdm2DUB;  // isVersionOf GO:0016579
  Mdm2PProteasomeBinding1: Mdm2_P_Ub4 + Proteasome => Mdm2_P_Ub4_Proteasome; kbinProt*Mdm2_P_Ub4*Proteasome;  // isVersionOf GO:0070628
  Mdm2PDegradation: Mdm2_P_Ub4_Proteasome => Proteasome + 4 Ub; kdegMdm2*Mdm2_P_Ub4_Proteasome*kproteff;  // isVersionOf GO:0009056
  ATMInactivation: ATMA => ATMI; kinactATM*ATMA;  // isVersionOf GO:0006464
  AggAbetaROSproduction1: AggAbeta => AggAbeta + ROS; kgenROSAbeta*AggAbeta;  // isVersionOf GO:0052064
  AggAbetaROSproduction2: AggAbeta_Proteasome => AggAbeta_Proteasome + ROS; kgenROSAbeta*AggAbeta_Proteasome;  // isVersionOf GO:0052064
  ROSDNAdamage: ROS => ROS + damDNA; kdamROS*ROS;  // isVersionOf GO:0034614
  basalROSDNAdamage: basalROS => basalROS + damDNA; kdamBasalROS*basalROS;  // isVersionOf GO:0034614
  TauSynthesis: $Source => Tau; ksynTau*Source;  // isVersionOf GO:0006412
  TauProteasomeBinding: Tau + Proteasome => Proteasome_Tau; kbinTauProt*Tau*Proteasome;  // isPartOf GO:0070628
  Tau20SProteasomeDegradation: Proteasome_Tau => Proteasome; kdegTau20SProt*Proteasome_Tau;  // isVersionOf GO:0009056

  // Unit definitions:
  unit substance = item;
end
