// SBML level 2 version 4

model Nikolaev2005_AlbuminBilirubinAdsorption()
  // This a model from the article:
  // Mathematical model of binding of albumin-bilirubin complex to the surface of carbon pyropolymer.
  // Nikolaev AV, Rozhilo YA, Starozhilova TK, Sarnatskaya VV, Yushko LA, Mikhailovskii SV, Kholodov AS, Lobanov AI. Bull Exp Biol Med 2005 Sep;140(3):365-9. 16307060 ,
  // Abstract:
  // We proposed a mathematical model and estimated the parameters of adsorption of albumin-bilirubin complex to the surface of carbon pyropolymer. Design data corresponded to the results of experimental studies. Our findings indicate that modeling of this process should take into account fractal properties of the surface of carbon pyropolymer.
  // This model originates from BioModels Database: A Database of Annotated Published Models (http://www.ebi.ac.uk/biomodels/). It is copyright (c) 2005-2011 The BioModels.net Team.
  // For more information see the terms of use .
  // To cite BioModels Database, please use: Li C, Donizelli M, Rodriguez N, Dharuri H, Endler L, Chelliah V, Li L, He E, Henry A, Stefan MI, Snoep JL, Hucka M, Le Novère N, Laibe C (2010) BioModels Database: An enhanced, curated and annotated resource for published quantitative kinetic models. BMC Syst Biol., 4:92.
  // biomodels.db:MODEL1101060000
  // biomodels.db:BIOMD0000000291
  // isDescribedBy pubmed:16307060
  // isVersionOf GO:0006789
  // isPartOf kegg.pathway:ko00860
  // occursIn taxonomy:2759

  // Compartments:
  compartment compartment = 1;

  // Species:
  species AlB in compartment = 0;  // isPartOf uniprot:P02768 kegg.compound:C00486
  species BC in compartment = 0;  // isPartOf CHEBI:33839 CHEBI:27594 kegg.compound:C00486
  species AlCn in compartment = 0;  // isPartOf CHEBI:33839 CHEBI:27594 uniprot:P02768
  species AlB2 in compartment = 0;  // isPartOf uniprot:P02768 kegg.compound:C00486
  species Al in compartment;  // isVersionOf uniprot:P02768
  species B in compartment;  // isVersionOf CHEBI:16990 kegg.compound:C00486
  species C in compartment;  // isVersionOf CHEBI:33839 CHEBI:27594
  species $A0 in compartment = 0.4615385;  // isVersionOf uniprot:P02768
  species $B0 in compartment = 0.1754386;  // isVersionOf CHEBI:16990 kegg.compound:C00486
  species $C0 in compartment = 1.174;  // isVersionOf CHEBI:27594 CHEBI:33839

  // Parameters:
  k1 = 0.484;
  k2 = 0.07958;
  k3 = 5.095e-6;
  k4 = 2.656e-5;
  k5 = 0.005489;
  k6 = 3.226e-7;
  k7 = 0.00301;
  k8 = 1.011e-7;
  k9 = 0.01685;
  k10 = 0.1325;
  K_AlB = 95000;
  K_AlB2 = 3000;
  n = 1;

  // Assignment rules:
  Al := A0 - AlB - AlCn - AlB2;
  B := B0 - AlB - BC - 2*AlB2;
  C := C0 - BC - n*AlCn;

  // Rate rules:
  AlB' = K_AlB*k3*Al*B - K_AlB2*k4*AlB*B - k3*AlB - k9*AlB*C^(n + 1) + k4*AlB2 + k10*AlB2*C;
  BC' = k6*C*B - k8*BC + k9*AlB*C^(n + 1) + k10*AlB2*C;
  AlCn' = k5*C^n*Al - k7*AlCn + k9*AlB*C^(n + 1);
  AlB2' = K_AlB2*k4*AlB*B - k4*AlB2 - k10*AlB2*C;
end
