// SBML level 2 version 4

model Tyson2003_Perfect_Adaption()
  // This is an SBML implementation the model of the perfect adaptor (figure 1d) described in the article:
  // Sniffers, buzzers, toggles and blinkers: dynamics of regulatory and signaling pathways in the cell.
  // Tyson JJ, Chen KC, Novak B. Curr Opin Cell Biol. 2003 Apr;15(2):221-31. PubmedID: 12648679 ; DOI: 10.1016/S0955-0674(03)00017-6 ;
  // Abstract:
  // The physiological responses of cells to external and internal stimuli are governed by genes and proteins interacting in complex networks whose dynamical properties are impossible to understand by intuitive reasoning alone. Recent advances by theoretical biologists have demonstrated that molecular regulatory networks can be accurately modeled in mathematical terms. These models shed light on the design principles of biological control systems and make predictions that have been verified experimentally.
  // Originally created by libAntimony v1.4 (using libSBML 3.4.1)
  // This model originates from BioModels Database: A Database of Annotated Published Models (http://www.ebi.ac.uk/biomodels/). It is copyright (c) 2005-2011 The BioModels.net Team.
  // For more information see the terms of use .
  // To cite BioModels Database, please use: Li C, Donizelli M, Rodriguez N, Dharuri H, Endler L, Chelliah V, Li L, He E, Henry A, Stefan MI, Snoep JL, Hucka M, Le Novère N, Laibe C (2010) BioModels Database: An enhanced, curated and annotated resource for published quantitative kinetic models. BMC Syst Biol., 4:92.
  // biomodels.db:MODEL1102100000
  // biomodels.db:BIOMD0000000312
  // isDescribedBy pubmed:12648679
  // isVersionOf GO:0065007 GO:0050896
  // isPartOf GO:0023052
  // occursIn taxonomy:131567

  // Compartments:
  compartment env = 1;  // isVersionOf GO:0005623

  // Species:
  species R in env = k1*k4/(k2*k3);  // isVersionOf CHEBI:36080
  species X in env = 0;  // isVersionOf CHEBI:36080
  species $S in env;

  // Parameters:
  k1 = 2 per_s;
  k2 = 2 per_M_per_s;
  k3 = 1 per_s;
  k4 = 1 per_s;
  tau = 4 time;

  // Assignment rules:
  S := 1*floor(time/tau);

  // Reactions:
  r1: => R; env*k1*S;  // modifiers: S; isVersionOf GO:0009058
  r2: R => ; env*k2*R*X;  // modifiers: X; isVersionOf GO:0009056
  r3: => X; env*k3*S;  // modifiers: S; isVersionOf GO:0009058
  r4: X => ; env*k4*X;  // isVersionOf GO:0009056

  // Unit definitions:
  unit time = second; time is "s";
  unit substance = mole; substance is "mole";
  unit per_s = 1 / second;
  unit M_per_s = mole / (second * litre);
  unit M = mole / litre;
  unit per_M_per_s = litre / (mole * second);
end
