// SBML level 2 version 4

function F(X, T)
  piecewise(1, X >= T, 0);
end

model shenorr02()
  // Shen-Orr2002_Single_Input_Module
  // This is the single input module, SIM, described in the article:
  // Network motifs in the transcriptional regulation network of Escherichia coli
  // Shai S. Shen-Orr, Ron Milo, Shmoolik Mangan, Uri Alon, Nat Genet 2002 31:64-68; PMID: 11967538 ; DOI: 10.1038/ng881 ;
  // Abstract:
  // Little is known about the design principles of transcriptional regulation networks that control gene expression in cells. Recent advances in data collection and analysis, however, are generating unprecedented amounts of information about gene regulation networks. To understand these complex wiring diagrams, we sought to break down such networks into basic building blocks. We generalize the notion of motifs, widely used for sequence analysis, to the level of networks. We define 'network motifs' as patterns of interconnections that recur in many different parts of a network at frequencies much higher than those found in randomized networks. We applied new algorithms for systematically detecting network motifs to one of the best-characterized regulation networks, that of direct transcriptional interactions in Escherichia coli. We find that much of the network is composed of repeated appearances of three highly significant motifs. Each network motif has a specific function in determining gene expression, such as generating temporal expression programs and governing the responses to fluctuating external signals. The motif structure also allows an easily interpretable view of the entire known transcriptional network of the organism. This approach may help define the basic computational elements of other biological networks.
  // This model reproduces the SIM timecourse presented in Figure 2b. All species and parameters in the model are dimensionless.
  // biomodels.db:MODEL1102140001
  // biomodels.db:BIOMD0000000317
  // isDescribedBy pubmed:11967538
  // occursIn taxonomy:562
  // isVersionOf GO:0010468
  // hasVersion GO:0010628 GO:0016563

  // Compartments:
  compartment cell = 1;  // GO:0005622

  // Species:
  species $X in cell = 0;  // isVersionOf CHEBI:36080; hasProperty GO:0016563
  species Z1 in cell = 0;  // isVersionOf CHEBI:36080
  species Z2 in cell = 0;  // isVersionOf CHEBI:36080
  species Z3 in cell = 0;  // isVersionOf CHEBI:36080

  // Parameters:
  FX = 0 dimensionless;

  // Rate rules:
  X' = FX - X;

  // Reactions:
  r1: -> Z1; F(X, T1);  // modifiers: X; isVersionOf GO:0010467; hasVersion GO:0045893
    T1 = 0.1 dimensionless;
  r2: Z1 -> ; r2_a*Z1;  // isVersionOf GO:0030163
    r2_a = 1 dimensionless;
  r3: -> Z2; F(X, T2);  // modifiers: X; isVersionOf GO:0010467; hasVersion GO:0045893
    T2 = 0.5 dimensionless;
  r4: Z2 -> ; r4_a*Z2;  // isVersionOf GO:0030163
    r4_a = 1 dimensionless;
  r5: -> Z3; F(X, T3);  // modifiers: X; hasVersion GO:0045893; isVersionOf GO:0010467
    T3 = 0.8 dimensionless;
  r6: Z3 -> ; r6_a*Z3;  // isVersionOf GO:0030163
    r6_a = 1 dimensionless;

  // Events:
  e1: at (time >= 1): FX = 1;
  e2: at (time >= 6): FX = 0;

  // Unit definitions:
  unit substance = dimensionless;
  unit time = dimensionless;
  unit volume = dimensionless;
end
