// SBML level 2 version 4

model Morris1981_MuscleFibre_Voltage()
  // Morris1981_MuscleFibre_Voltage_full
  // This is the full model (eq. 1 and 2) of the voltage oscillations in barnacle muscle fibers described in the article:
  // Voltage oscillations in the barnacle giant muscle fiber.
  // Morris C, Lecar H. Biophys J. 1981 Jul;35(1):193-213. PubmedID: 7260316 ; DOI: 10.1016/S0006-3495(81)84782-0
  // Abstract:
  // Barnacle muscle fibers subjected to constant current stimulation produce a variety of types of oscillatory behavior when the internal medium contains the Ca++ chelator EGTA. Oscillations are abolished if Ca++ is removed from the external medium, or if the K+ conductance is blocked. Available voltage-clamp data indicate that the cell's active conductance systems are exceptionally simple. Given the complexity of barnacle fiber voltage behavior, this seems paradoxical. This paper presents an analysis of the possible modes of behavior available to a system of two noninactivating conductance mechanisms, and indicates a good correspondence to the types of behavior exhibited by barnacle fiber. The differential equations of a simple equivalent circuit for the fiber are dealt with by means of some of the mathematical techniques of nonlinear mechanics. General features of the system are (a) a propensity to produce damped or sustained oscillations over a rather broad parameter range, and (b) considerable latitude in the shape of the oscillatory potentials. It is concluded that for cells subject to changeable parameters (either from cell to cell or with time during cellular activity), a system dominated by two noninactivating conductances can exhibit varied oscillatory and bistable behavior.
  // The model consists of the differential equations (1) and (2) given on pages 195 and 196 of the article. There is one typo in the equation for I in (1), g L (V L ) should be g L (V - V L ). This was changed in the SBML file. As there are no current values given, for reproducing the time courses in figure 6 an applied current of 50 uA was assumed. The legend for the broken and the full line in this figure seems to be confounded in the article.
  // Originally created by libAntimony v1.4 (using libSBML 3.4.1)
  // biomodels.db:MODEL1011230001
  // biomodels.db:BIOMD0000000324
  // isDescribedBy pubmed:7260316
  // occursIn taxonomy:6678
  // isVersionOf GO:0042391
  // hasVersion GO:0005245 GO:0005249

  // Compartments:
  compartment musclefibre = 1;  // isVersionOf FMA:30316

  // Parameters:
  Minf has dimensionless;
  V = -50 mV;
  V1 = 0 mV;
  V2 = 15 mV;
  Ninf has dimensionless;
  V3 = 10 mV;
  V4 = 10 mV;
  lambdaN has per_ms;
  lambdaN_bar = 0.1 per_ms;
  lambdaM has per_ms;
  lambdaM_bar = 1 per_ms;
  Iapp = 50 uA_per_cm2;
  gL = 2 mS_per_cm2;
  VL = -50 mV;
  gCa = 4 mS_per_cm2;
  VCa = 100 mV;
  gK = 8 mS_per_cm2;
  N = (1 + tanh((V - V3)/V4))/2; N has dimensionless;
  VK = -70 mV;
  C = 20 uF_per_cm2;
  M = (1 + tanh((V - V1)/V2))/2; M has dimensionless;

  // Assignment rules:
  Minf := (1 + tanh((V - V1)/V2))/2;
  Ninf := (1 + tanh((V - V3)/V4))/2;
  lambdaN := lambdaN_bar*cosh((V - V3)/(2*V4));
  lambdaM := lambdaM_bar*cosh((V - V1)/(2*V2));

  // Rate rules:
  V' = (Iapp - gL*(V - VL) - gCa*M*(V - VCa) - gK*N*(V - VK))/C;
  N' = lambdaN*(Ninf - N);
  M' = lambdaM*(Minf - M);

  // Unit definitions:
  unit time = 1e-3 second; time is "ms";
  unit per_ms = 1 / (1e-3 second);
  unit mV = 1e-3 volt;
  unit mS_per_cm2 = 1e-3 siemens / (0.01 metre)^2;
  unit uA_per_cm2 = 1e-6 ampere / (0.01 metre)^2; uA_per_cm2 is "microA_per_cm2";
  unit uF_per_cm2 = 1e-6 farad / (0.01 metre)^2; uF_per_cm2 is "microF per cm2";
end
