// SBML level 2 version 4

function Constant_flux_irreversible(v)
  v;
end
Constant_flux_irreversible is "Constant flux (irreversible)";

function Factor_production(initial, degradation)
  initial*degradation;
end

function Hyperbolic_rate_law(v, substrate, enzyme, k)
  v*substrate*enzyme/(k + enzyme);
end

function VKH2mediated_factor_production(d_factor, factor_initial, VKH2, VKH2_initial)
  d_factor*factor_initial*VKH2/VKH2_initial;
end
VKH2mediated_factor_production is "VKH2-mediated factor production";

function Irreversible_association(s1, s2, c)
  s1*s2/c;
end

function Warfarin_inhibited_first_order_kinetics(Imax, Cwarf, IC50, substrate, degradation)
  degradation*substrate*(1 - Imax*Cwarf/(IC50 + Cwarf));
end

model Model_1()
  // Wajima2009_BloodCoagulation_warfarin_heparin
  // This model is from the article:
  // A comprehensive model for the humoral coagulation network in humans.
  // Wajima T, Isbister GK, Duffull SB. Clinical Pharmacology and therapeutics Volume 86, Issue 3, 10 June 2009, EPub 19516255 ,
  // Abstract:
  // Coagulation is an important process in hemostasis and comprises a complicated interaction of multiple enzymes and proteins. We have developed a mechanistic quantitative model of the coagulation network. The model accurately describes the time courses of coagulation factors following in vivo activation as well as in vitro blood coagulation tests of prothrombin time (PT, often reported as international normalized ratio (INR)) and activated partial thromboplastin time (aPTT). The model predicts the concentration-time and time-effect profiles of warfarin, heparins, and vitamin K in humans. The model can be applied to predict the time courses of coagulation kinetics in clinical situations (e.g., hemophilia) and for biomarker identification during drug development. The model developed in this study is the first quantitative description of the comprehensive coagulation network.
  // biomodels.db:MODEL1107010002
  // biomodels.db:BIOMD0000000340
  // isDescribedBy pubmed:19516255
  // encodes GO:0030193
  // occursIn taxonomy:2759

  // Compartments:
  compartment compartment_1 = 1;

  // Species:
  species IIa in compartment_1 = 0;  // isVersionOf uniprot:P00734
  species VIII in compartment_1 = VIII0;  // uniprot:P00451
  species VIIIa in compartment_1 = 0;  // isVersionOf uniprot:P00451
  species APC_PS in compartment_1 = 0;  // hasPart uniprot:P04070 uniprot:P07225
  species IX in compartment_1 = IX0;  // uniprot:P00740
  species IXa in compartment_1 = 0;  // isVersionOf uniprot:P00740
  species XIa in compartment_1 = 0;  // isVersionOf uniprot:P03951
  species XI in compartment_1 = XI0;  // uniprot:P03951
  species XIIa in compartment_1 = 0;  // isVersionOf uniprot:P00748
  species VII in compartment_1 = VII0;  // uniprot:P08709
  species VIIa in compartment_1 = 0;  // isVersionOf uniprot:P08709
  species X in compartment_1 = X_0;  // uniprot:P00742
  species Xa in compartment_1 = 0;  // isVersionOf uniprot:P00742
  species IXa_VIIIa in compartment_1 = 0;  // hasPart uniprot:P00740 uniprot:P00451
  species V in compartment_1 = V_0;  // uniprot:P12259
  species Va in compartment_1 = 0;  // isVersionOf uniprot:P12259
  species II in compartment_1 = II0;  // uniprot:P00734
  species F in compartment_1 = 0;  // hasPart uniprot:P02671 uniprot:P02679 uniprot:P02675
  species Fg in compartment_1 = Fg0;  // hasPart uniprot:P02671 uniprot:P02679 uniprot:P02675
  species $DP in compartment_1;
  species P in compartment_1 = 0;  // isVersionOf uniprot:P00747
  species XF in compartment_1 = 0;  // hasPart uniprot:P02671 uniprot:P02679 uniprot:P02675
  species XIII in compartment_1 = XIII0;  // hasPart uniprot:P00488 uniprot:P05160
  species Pg in compartment_1 = Pg0;  // uniprot:P00747
  species APC in compartment_1 = 0;  // isVersionOf uniprot:P04070
  species IIa_Tmod in compartment_1 = 0;  // hasPart uniprot:P07204 uniprot:P00734
  species PC in compartment_1 = PC0;  // uniprot:P04070
  species Tmod in compartment_1 = Tmod0;  // uniprot:P07204
  species TF in compartment_1 = 0;  // uniprot:P13726
  species VIIa_TF in compartment_1 = 0;  // hasPart uniprot:P13726 uniprot:P08709
  species VII_TF in compartment_1 = 0;  // hasPart uniprot:P13726 uniprot:P08709
  species Xa_TFPI in compartment_1 = 0;  // hasPart uniprot:P00742 uniprot:P10646
  species TFPI in compartment_1 = TFPI0;  // uniprot:P10646
  species PS in compartment_1 = PS0;  // uniprot:P07225
  species VKH2 in compartment_1 = VKH20;  // isVersionOf CHEBI:28384
  species Va_Xa in compartment_1 = 0;  // hasPart uniprot:P12259 uniprot:P00742
  species CA in compartment_1 = 0;
  species XII in compartment_1 = XII0;  // uniprot:P00748
  species K in compartment_1 = 0;  // isVersionOf uniprot:P03952
  species ATIII_Heparin in compartment_1 = heparin_bolus;  // hasPart CHEBI:28304 uniprot:P01008
  species Xa_ATIII_Heparin in compartment_1 = 0;  // hasPart CHEBI:28304 uniprot:P00742 uniprot:P01008
  species VK in compartment_1 = VK0;  // CHEBI:28384
  species $C_warf in compartment_1 = 0;  // CHEBI:10033
  species VKO in compartment_1 = VKO0;  // isVersionOf CHEBI:28384
  species Pk in compartment_1 = Pk0;  // uniprot:P03952
  species FDP in compartment_1 = 0;  // hasPart uniprot:P02671 uniprot:P02679 uniprot:P02675
  species D in compartment_1 = 0;
  species TAT in compartment_1 = 0;  // hasPart uniprot:P00734 uniprot:P01008
  species VIIa_TF_Xa_TFPI in compartment_1 = 0;  // hasPart uniprot:P13726 uniprot:P00742 uniprot:P08709 uniprot:P10646
  species XIIIa in compartment_1 = 0;  // hasVersion uniprot:P00488
  species IIa_ATIII_Heparin in compartment_1 = 0;  // hasPart CHEBI:28304 uniprot:P01008 uniprot:P00734
  species IXa_ATIII_Heparin in compartment_1 = 0;  // hasPart CHEBI:28304 uniprot:P00740 uniprot:P01008
  species $A_warf in compartment_1 = 0;  // CHEBI:10033
  species VK_p in compartment_1 = VK0*vitaminK_k12/vitaminK_k21_Vc;  // CHEBI:28384

  // Parameters:
  I_max = 1;
  IC50 = 0.34;
  II0 = 1394.4; II0 is "II(0)";
  VII0 = 10; VII0 is "VII(0)";
  IX0 = 89.6; IX0 is "IX(0)";
  X_0 = 174.3; X_0 is "X(0)";
  PC0 = 60; PC0 is "PC(0)";
  PS0 = 300; PS0 is "PS(0)";
  VKH20 = 0.1; VKH20 is "VKH2(0)";
  d_II = 0.01;
  d_VII = 0.12;
  d_IX = 0.029;
  d_X = 0.018;
  d_PC = 0.05;
  d_PS = 0.0165;
  vitaminK_Vc = 24;
  d_VK2 = 0.0228;
  d_VKH2 = d_VK2*VK0/VKH20;
  d_VKO = d_VK2*VK0/VKO0;
  VK0 = 1; VK0 is "VK(0)";
  VKO0 = 0.1; VKO0 is "VKO(0)";
  vitaminK_k21_Vc = 0.0122/vitaminK_Vc; vitaminK_k21_Vc is "vitaminK_k21/Vc";
  vitaminK_k12 = 0.0587;
  heparin_ke = 0.693;
  warfarin_ka = 1;
  warfarin_Vd = 10;
  warfarin_CL = 0.2;
  warfarin_ke = warfarin_CL/warfarin_Vd;
  d_XII = 0.012;
  d_VIII = 0.058;
  d_XI = 0.1;
  d_V = 0.043;
  d_Fg = 0.032;
  d_XIII = 0.0036;
  d_Pg = 0.05;
  d_Tmod = 0.05;
  d_TFPI = 20;
  d_Pk = 0.05;
  XII0 = 375; XII0 is "XII(0)";
  VIII0 = 0.7; VIII0 is "VIII(0)";
  XI0 = 30.6; XI0 is "XI(0)";
  V_0 = 26.7; V_0 is "V(0)";
  Fg0 = 8945.5; Fg0 is "Fg(0)";
  XIII0 = 70.3; XIII0 is "XIII(0)";
  Pg0 = 2154.3; Pg0 is "Pg(0)";
  Tmod0 = 50; Tmod0 is "Tmod(0)";
  TFPI0 = 2.5; TFPI0 is "TFPI(0)";
  Pk0 = 450; Pk0 is "Pk(0)";
  R1 = 0.1408451;
  R2 = 1;
  c44 = c45*R1;
  c45 = 0.85;
  c46 = c45*R2;
  d_VK = 0.2052;
  warfarin_daily_dose = 4;
  heparin_infusion = 0;
  heparin_bolus = 0;
  heparin_infusion_duration_hr = 24; heparin_infusion_duration_hr is "heparin_infusion_duration [hr]";

  // Assignment rules:
  DP := FDP + D;

  // Rate rules:
  C_warf' = warfarin_ka*A_warf/warfarin_Vd - warfarin_ke*C_warf;
  A_warf' = -warfarin_ka*A_warf;

  // Reactions:
  r1_: VIII => VIIIa; compartment_1*Hyperbolic_rate_law(r1__v, VIII, IIa, r1__k);  // modifiers: IIa
    r1__v = 50000; r1__k = 1e-6;
  r2_: VIIIa => ; compartment_1*Hyperbolic_rate_law(r2__v, VIIIa, APC_PS, r2__k);  // modifiers: APC_PS
    r2__v = 50; r2__k = 1;
  r3_: IX => IXa; compartment_1*Hyperbolic_rate_law(r3__v, IX, XIa, r3__k);  // modifiers: XIa
    r3__v = 7; r3__k = 10;
  r4_: XI => XIa; compartment_1*Hyperbolic_rate_law(r4__v, XI, XIIa, r4__k);  // modifiers: XIIa
    r4__v = 7; r4__k = 1;
  r5_: XI => XIa; compartment_1*Hyperbolic_rate_law(r5__v, XI, IIa, r5__k);  // modifiers: IIa
    r5__v = 10; r5__k = 10;
  r6_: VII => VIIa; compartment_1*Hyperbolic_rate_law(r6__v, VII, IIa, r6__k);  // modifiers: IIa
    r6__v = 0.1; r6__k = 10;
  r7_: X => Xa; compartment_1*Hyperbolic_rate_law(r7__v, X, IXa, r7__k);  // modifiers: IXa
    r7__v = 0.02; r7__k = 10;
  r8_: X => Xa; compartment_1*Hyperbolic_rate_law(r8__v, X, IXa_VIIIa, r8__k);  // modifiers: IXa_VIIIa
    r8__v = 2; r8__k = 0.1;
  r9_: X => Xa; compartment_1*Hyperbolic_rate_law(r9__v, X, VIIa, r9__k);  // modifiers: VIIa
    r9__v = 1e-9; r9__k = 10;
  r10: V => Va; compartment_1*Hyperbolic_rate_law(r10_v, V, IIa, r10_k);  // modifiers: IIa
    r10_v = 50000; r10_k = 10;
  r11: Va => ; compartment_1*Hyperbolic_rate_law(r11_v, Va, APC_PS, r11_k);  // modifiers: APC_PS
    r11_v = 50; r11_k = 1;
  r12: II => IIa; compartment_1*Hyperbolic_rate_law(r12_v, II, Va_Xa, r12_k);  // modifiers: Va_Xa
    r12_v = 100; r12_k = 10;
  r13: II => IIa; compartment_1*Hyperbolic_rate_law(r13_v, II, Xa, r13_k);  // modifiers: Xa
    r13_v = 9; r13_k = 500;
  r14: Fg => F; compartment_1*Hyperbolic_rate_law(r14_v, Fg, IIa, r14_k);  // modifiers: IIa
    r14_v = 20000; r14_k = 0.5;
  r15: Fg => FDP; compartment_1*Hyperbolic_rate_law(r15_v, Fg, P, r15_k);  // modifiers: P
    r15_v = 500; r15_k = 500;
  r16: F => XF; compartment_1*Hyperbolic_rate_law(r16_v, F, XIIIa, r16_k);  // modifiers: XIIIa
    r16_v = 7; r16_k = 10;
  r17: F => FDP; compartment_1*Hyperbolic_rate_law(r17_v, F, P, r17_k);  // modifiers: P
    r17_v = 7; r17_k = 10;
  r18: XF => D; compartment_1*Hyperbolic_rate_law(r18_v, XF, P, r18_k);  // modifiers: P
    r18_v = 7; r18_k = 100;
  r19: XF => D; compartment_1*Hyperbolic_rate_law(r19_v, XF, APC_PS, r19_k);  // modifiers: APC_PS
    r19_v = 1; r19_k = 1;
  r20: XIII => XIIIa; compartment_1*Hyperbolic_rate_law(r20_v, XIII, IIa, r20_k);  // modifiers: IIa
    r20_v = 7; r20_k = 1;
  r21: Pg => P; compartment_1*Hyperbolic_rate_law(r21_v, Pg, IIa, r21_k);  // modifiers: IIa
    r21_v = 7; r21_k = 5000;
  r22: Pg => P; compartment_1*Hyperbolic_rate_law(r22_v, Pg, F, r22_k);  // modifiers: F
    r22_v = 5; r22_k = 10000;
  r23: Pg => P; compartment_1*Hyperbolic_rate_law(r23_v, Pg, APC_PS, r23_k);  // modifiers: APC_PS
    r23_v = 2; r23_k = 1;
  r24: PC => APC; compartment_1*Hyperbolic_rate_law(r24_v, PC, IIa_Tmod, r24_k);  // modifiers: IIa_Tmod
    r24_v = 7; r24_k = 1;
  r25: Va_Xa => ; compartment_1*Hyperbolic_rate_law(r25_v, Va_Xa, APC_PS, r25_k);  // modifiers: APC_PS
    r25_v = 2; r25_k = 1;
  r26: IXa + VIIIa => IXa_VIIIa; compartment_1*Irreversible_association(IXa, VIIIa, r26_c);
    r26_c = 0.01;
  r27: Va + Xa => Va_Xa; compartment_1*Irreversible_association(Va, Xa, r27_c);
    r27_c = 0.5;
  r28: IIa + Tmod => IIa_Tmod; compartment_1*Irreversible_association(IIa, Tmod, r28_c);
    r28_c = 0.5;
  r29: VIIa + TF => VIIa_TF; compartment_1*Irreversible_association(VIIa, TF, r29_c);
    r29_c = 0.5;
  r30: VII + TF => VII_TF; compartment_1*Irreversible_association(VII, TF, r30_c);
    r30_c = 0.1;
  r31: VIIa_TF + Xa_TFPI => VIIa_TF_Xa_TFPI; compartment_1*Irreversible_association(VIIa_TF, Xa_TFPI, r31_c);
    r31_c = 0.5;
  r32: Xa + TFPI => Xa_TFPI; compartment_1*Irreversible_association(Xa, TFPI, r32_c);
    r32_c = 0.5;
  r33: VII_TF => VIIa_TF; compartment_1*Hyperbolic_rate_law(r33_v, VII_TF, Xa, r33_k);  // modifiers: Xa
    r33_v = 70; r33_k = 1;
  r34: X => Xa; compartment_1*Hyperbolic_rate_law(r34_v, X, VIIa_TF, r34_k);  // modifiers: VIIa_TF
    r34_v = 900; r34_k = 200;
  r35: IX => IXa; compartment_1*Hyperbolic_rate_law(r35_v, IX, VIIa_TF, r35_k);  // modifiers: VIIa_TF
    r35_v = 70; r35_k = 1;
  r36: VII_TF => VIIa_TF; compartment_1*Hyperbolic_rate_law(r36_v, VII_TF, TF, r36_k);  // modifiers: TF
    r36_v = 1000; r36_k = 1;
  r37: APC + PS => APC_PS; compartment_1*Irreversible_association(APC, PS, r37_c);
    r37_c = 0.5;
  r38: VII => VIIa; compartment_1*Hyperbolic_rate_law(r38_v, VII, Xa, r38_k);  // modifiers: Xa
    r38_v = 1; r38_k = 10;
  r39: VII => VIIa; compartment_1*Hyperbolic_rate_law(r39_v, VII, VIIa_TF, r39_k);  // modifiers: VIIa_TF
    r39_v = 1; r39_k = 10;
  r40: VII => VIIa; compartment_1*Hyperbolic_rate_law(r40_v, VII, IXa, r40_k);  // modifiers: IXa
    r40_v = 0.2; r40_k = 10;
  r41: XII => XIIa; compartment_1*Hyperbolic_rate_law(r41_v, XII, CA, r41_k);  // modifiers: CA
    r41_v = 7; r41_k = 1;
  r42: XII => XIIa; compartment_1*Hyperbolic_rate_law(r42_v, XII, K, r42_k);  // modifiers: K
    r42_v = 70; r42_k = 1;
  r43: Pk => K; compartment_1*Hyperbolic_rate_law(r43_v, Pk, XIIa, r43_k);  // modifiers: XIIa
    r43_v = 7; r43_k = 1;
  r44: IIa + ATIII_Heparin => IIa_ATIII_Heparin; compartment_1*Irreversible_association(IIa, ATIII_Heparin, c44);
  r45: Xa + ATIII_Heparin => Xa_ATIII_Heparin; compartment_1*Irreversible_association(Xa, ATIII_Heparin, c45);
  r46: IXa + ATIII_Heparin => IXa_ATIII_Heparin; compartment_1*Irreversible_association(IXa, ATIII_Heparin, c46);
  r47: VK => VKH2; compartment_1*Warfarin_inhibited_first_order_kinetics(I_max, C_warf, IC50, VK, d_VK2);  // modifiers: C_warf
  r48: VKO => VK; compartment_1*Warfarin_inhibited_first_order_kinetics(I_max, C_warf, IC50, VKO, d_VKO);  // modifiers: C_warf
  pII_VKH2: => II; compartment_1*VKH2mediated_factor_production(d_II, II0, VKH2, VKH20);  // modifiers: VKH2
  pVII_VKH2: => VII; compartment_1*VKH2mediated_factor_production(d_VII, VII0, VKH2, VKH20);  // modifiers: VKH2
  pIX_VKH2: => IX; compartment_1*VKH2mediated_factor_production(d_IX, IX0, VKH2, VKH20);  // modifiers: VKH2
  pX_VKH2: => X; compartment_1*VKH2mediated_factor_production(d_X, X_0, VKH2, VKH20);  // modifiers: VKH2
  pPC_VKH2: => PC; compartment_1*VKH2mediated_factor_production(d_PC, PC0, VKH2, VKH20);  // modifiers: VKH2
  pPS_VKH2: => PS; compartment_1*VKH2mediated_factor_production(d_PS, PS0, VKH2, VKH20);  // modifiers: VKH2
  dFg: Fg => FDP; compartment_1*d_Fg*Fg;
  dF: F => FDP; compartment_1*dF_k1*F;
    dF_k1 = 0.05;
  dXF: XF => D; compartment_1*dXF_k1*XF;
    dXF_k1 = 0.05;
  dII: II => ; compartment_1*d_II*II;
  dIIa: IIa => TAT; compartment_1*dIIa_k1*IIa;
    dIIa_k1 = 67.4;
  dTF: TF => ; compartment_1*dTF_k1*TF;
    dTF_k1 = 0.05;
  dV: V => ; compartment_1*d_V*V;
  dVa: Va => ; compartment_1*dVa_k1*Va;
    dVa_k1 = 20;
  dVII: VII => ; compartment_1*d_VII*VII;
  dVIIa: VIIa => ; compartment_1*dVIIa_k1*VIIa;
    dVIIa_k1 = 20;
  dVIII: VIII => ; compartment_1*d_VIII*VIII;
  dVIIIa: VIIIa => ; compartment_1*dVIIIa_k1*VIIIa;
    dVIIIa_k1 = 20;
  dX: X => ; compartment_1*d_X*X;
  dXa: Xa => ; compartment_1*dXa_k1*Xa;
    dXa_k1 = 20;
  dIX: IX => ; compartment_1*d_IX*IX;
  dIXa: IXa => ; compartment_1*dIXa_k1*IXa;
    dIXa_k1 = 20;
  dXII: XII => ; compartment_1*d_XII*XII;
  dXIIa: XIIa => ; compartment_1*dXIIa_k1*XIIa;
    dXIIa_k1 = 20;
  dXIII: XIII => ; compartment_1*d_XIII*XIII;
  dXIIIa: XIIIa => ; compartment_1*dXIIIa_k1*XIIIa;
    dXIIIa_k1 = 0.69;
  dPk: Pk => ; compartment_1*d_Pk*Pk;
  dK: K => ; compartment_1*dK_k1*K;
    dK_k1 = 20;
  dPg: Pg => ; compartment_1*d_Pg*Pg;
  dP: P => ; compartment_1*dP_k1*P;
    dP_k1 = 20;
  dPC: PC => ; compartment_1*d_PC*PC;
  dAPC: APC => ; compartment_1*dAPC_k1*APC;
    dAPC_k1 = 20.4;
  dPS: PS => ; compartment_1*d_PS*PS;
  dFDP: FDP => ; compartment_1*dFDP_k1*FDP;
    dFDP_k1 = 3.5;
  dD: D => ; compartment_1*dD_k1*D;
    dD_k1 = 0.1;
  dTFPI: TFPI => ; compartment_1*d_TFPI*TFPI;
  dVIIa_TF: VIIa_TF => ; compartment_1*dVIIa_TF_k1*VIIa_TF;
    dVIIa_TF_k1 = 20;
  dVII_TF: VII_TF => ; compartment_1*dVII_TF_k1*VII_TF;
    dVII_TF_k1 = 0.7;
  dAPC_PS: APC_PS => ; compartment_1*dAPC_PS_k1*APC_PS;
    dAPC_PS_k1 = 20;
  dVa_Xa: Va_Xa => ; compartment_1*dVa_Xa_k1*Va_Xa;
    dVa_Xa_k1 = 20;
  dIXa_VIIIa: IXa_VIIIa => ; compartment_1*dIXa_VIIIa_k1*IXa_VIIIa;
    dIXa_VIIIa_k1 = 20;
  dTmod: Tmod => ; compartment_1*d_Tmod*Tmod;
  dIIa_Tmod: IIa_Tmod => ; compartment_1*dIIa_Tmod_k1*IIa_Tmod;
    dIIa_Tmod_k1 = 20;
  dXa_TFPI: Xa_TFPI => ; compartment_1*dXa_TFPI_k1*Xa_TFPI;
    dXa_TFPI_k1 = 20;
  dVIIa_TF_Xa_TFPI: VIIa_TF_Xa_TFPI => ; compartment_1*dVIIa_TF_Xa_TFPI_k1*VIIa_TF_Xa_TFPI;
    dVIIa_TF_Xa_TFPI_k1 = 20;
  dTAT: TAT => ; compartment_1*dTAT_k1*TAT;
    dTAT_k1 = 0.2;
  dCA: CA => ; compartment_1*dCA_k1*CA;
    dCA_k1 = 0.05;
  dXIa: XIa => ; compartment_1*dXIa_k1*XIa;
    dXIa_k1 = 20;
  dVKH2: VKH2 => VKO; compartment_1*d_VKH2*VKH2;
  VK_transport: VK -> VK_p; compartment_1*(vitaminK_k12*VK - vitaminK_k21_Vc*VK_p);
  eHeparin: ATIII_Heparin => ; compartment_1*heparin_ke*ATIII_Heparin;
  eHeparinXa: Xa_ATIII_Heparin => ; compartment_1*heparin_ke*Xa_ATIII_Heparin;
  eHeparinIXa: IXa_ATIII_Heparin => ; compartment_1*heparin_ke*IXa_ATIII_Heparin;
  eHeparinIIa: IIa_ATIII_Heparin => ; compartment_1*heparin_ke*IIa_ATIII_Heparin;
  dXI: XI => ; compartment_1*dXI_k1*XI;
    dXI_k1 = 0.1;
  pXII: => XII; compartment_1*Factor_production(XII0, d_XII);
  pVIII: => VIII; compartment_1*Factor_production(VIII0, d_VIII);
  pXI: => XI; compartment_1*Factor_production(XI0, d_XI);
  pV: => V; compartment_1*Factor_production(V_0, d_V);
  pFg: => Fg; compartment_1*Factor_production(Fg0, d_Fg);
  pXIII: => XIII; compartment_1*Factor_production(XIII0, d_XIII);
  pPg: => Pg; compartment_1*Factor_production(Pg0, d_Pg);
  pTmod: => Tmod; compartment_1*Factor_production(Tmod0, d_Tmod);
  pTFPI: => TFPI; compartment_1*Factor_production(TFPI0, d_TFPI);
  pPk: => Pk; compartment_1*Factor_production(Pk0, d_Pk);
  pVK: => VK; compartment_1*Factor_production(VK0, d_VK);
  dVK: VK => ; compartment_1*d_VK*VK;
  pHeparin: => ATIII_Heparin; compartment_1*Constant_flux_irreversible(heparin_infusion);

  // Events:
  warfarin_administration: at (piecewise(time - 24*ceil(time/24), xor(time < 0, 24 < 0), time - 24*floor(time/24)) > 1): A_warf = A_warf + warfarin_daily_dose;
  heparin_administration: at (time > heparin_infusion_duration_hr): heparin_infusion = 0;

  // Unit definitions:
  unit time = 3600 second;
  unit substance = 1e-9 mole;
end
