// SBML level 2 version 4

model Zi2011_TGFbeta_Pathway()
  // Zi2011_TGF-beta_Pathway
  // This model is from the article:
  // Quantitative analysis of transient and sustained transforming growth factor-β signaling dynamics.
  // Zhike Zi, Zipei Feng, Douglas A Chapnick, Markus Dahl, Difan Deng, Edda Klipp, Aristidis Moustakas & Xuedong Liu Molecular Systems Biology 2011 May 24;7:492. 21613981 ,
  // Abstract:
  // Mammalian cells can decode the concentration of extracellular transforming growth factor-β (TGF-β) and transduce this cue into appropriate cell fate decisions. How variable TGF-β ligand doses quantitatively control intracellular signaling dynamics and how continuous ligand doses are translated into discontinuous cellular fate decisions remain poorly understood. Using a combined experimental and mathematical modeling approach, we discovered that cells respond differently to continuous and pulsating TGF-β stimulation. The TGF-β pathway elicits a transient signaling response to a single pulse of TGF-β stimulation, whereas it is capable of integrating repeated pulses of ligand stimulation at short time interval, resulting in sustained phospho-Smad2 and transcriptional responses. Additionally, the TGF-β pathway displays different sensitivities to ligand doses at different time scales. While ligand-induced short-term Smad2 phosphorylation is graded, long-term Smad2 phosphorylation is switch-like to a small change in TGF-β levels. Correspondingly, the short-term Smad7 gene expression is graded, while long-term PAI-1 gene expression is switch-like, as is the long-term growth inhibitory response. Our results suggest that long-term switch-like signaling responses in the TGF-β pathway might be critical for cell fate determination.
  // Developer of the model: Zhike Zi
  // Reference: Zi Z. et al., Quantitative Analysis of Transient and Sustained Transforming Growth Factor-beta Signaling Dynamics, Molecular Systems Biology, 2011
  // 1. The global parameter that set the type of stimulation
  // (a) for sustained TGF-beta stimulation: set stimulation_type = 1.
  // (b) for single pulse of TGF-beta stimulation: set stimulation_type = 2.
  // parameter "single_pulse_duration" is for the duration of stimulation, for example,
  // single_pulse_duration = 0.5, for 0.5 min (30 seconds) of TGF-beta stimulation.
  // *Note: make sure that the time course cover the time point when the event is triggered.
  // (c) for single pulse of TGF-beta stimulation in COPASI
  // change the trigger of event "single_pulse_TGF_beta_washout"
  // from
  // "and(eq(stimulation_type, 2), eq(time, single_pulse_duration))" (for SBML-SAT)
  // to
  // "and(eq(stimulation_type, 2), gt(time, single_pulse_duration))" (for COPASI)
  // 2. Notes for TGF-beta dose in terms of molecules per cell
  // (a) The following equation applies for conversion of TGF-beta dose in molecules per cell
  // TGF_beta_dose_mol_per_cell = initial TGF_beta_ex*1e-9*Vmed*6e23
  // (b) for standard experimental setup 1e6 cells in 2 mL medium
  // 0.001 nM initial TGF_beta_ex is approximately equal to the dose of 1200 TGF-beta molecules/cell
  // 0.050 nM initial TGF_beta_ex is approximately equal to the dose of 60000 TGF-beta molecules/cell
  // (c) For 1e6 cells in 10 mL medium, please change the initial compartment size of Vmed and the corresponding assignment rule for Vmed.
  // initial Vmed = 1e-8 (1e6 cells in 10 mL medium)
  // Vmed = 0.010/(1e6*exp(log(1.45)*time/1440)) (1e6 cells in 10 mL medium)
  // 3. Please note that this model contains events and the medium compartment size is varied.
  // 4. For the model simulation in SBML-SAT, please remove initialAssignments and save it as SBML Level 2 Verion 1 file.
  // biomodels.db:MODEL1104050000
  // biomodels.db:BIOMD0000000342
  // isDescribedBy pubmed:21613981
  // occursIn taxonomy:9606 BTO:0000312
  // isPartOf kegg.pathway:map04350 reactome:REACT_6844
  // isVersionOf GO:0007179

  // Compartments:
  compartment default = 1 volume;
  compartment Vmed in default; Vmed has volume; Vmed is "Medium";  // isVersionOf BTO:0000316
  compartment Vcyt in Vmed = 2.3e-12 volume; Vcyt is "Cytoplasm";  // isVersionOf GO:0005737
  compartment Vnuc in Vcyt = 1e-12 volume; Vnuc is "Nucleus";  // isVersionOf GO:0005634

  // Species:
  species TGF_beta_ex in Vmed = 0.05;  // substance in nM; isVersionOf uniprot:P01137; occursIn BTO:0000316
  species T1R_surf in Vcyt = (k_T1R*kdeg_T1R + k_T1R*kr)/(kdeg_T1R*ki);  // substance in nM; isVersionOf uniprot:P36897; occursIn GO:0009986
  species T1R_endo in Vcyt = k_T1R/kdeg_T1R;  // substance in nM; isVersionOf uniprot:P36897; occursIn GO:0005769
  species T2R_surf in Vcyt = (k_T2R*kdeg_T2R + k_T2R*kr)/(kdeg_T2R*ki);  // substance in nM; isVersionOf uniprot:P37173; occursIn GO:0009986
  species T2R_endo in Vcyt = k_T2R/kdeg_T2R;  // substance in nM; isVersionOf uniprot:P37173; encodes GO:0005769
  species LRC_surf in Vcyt = 0;  // substance in nM; occursIn GO:0009986; isVersionOf GO:0043235; hasPart uniprot:P01137 uniprot:P36897; hasPart uniprot:P01137 uniprot:P37173
  species LRC_endo in Vcyt = 0;  // substance in nM; occursIn GO:0005769; isVersionOf GO:0043235; hasPart uniprot:P01137 uniprot:P36897; hasPart uniprot:P01137 uniprot:P37173
  species Smad2c in Vcyt = 60.6;  // substance in nM; isVersionOf uniprot:Q15796
  species Smad2n in Vnuc = 28.5;  // substance in nM; isVersionOf uniprot:Q15796
  species Smad4c in Vcyt = 50.8;  // substance in nM; isVersionOf uniprot:Q13485
  species Smad4n in Vnuc = 50.8;  // substance in nM; isVersionOf uniprot:Q13485
  species PSmad2c in Vcyt = 0;  // substance in nM; isVersionOf uniprot:Q15796 kegg.compound:C00562
  species PSmad2_PSmad2_c in Vcyt = 0;  // substance in nM; hasPart uniprot:Q15796; isVersionOf kegg.compound:C00562
  species PSmad2_Smad4_c in Vcyt = 0;  // substance in nM; hasPart uniprot:Q15796 uniprot:Q13485; isVersionOf kegg.compound:C00562
  species PSmad2n in Vnuc = 0;  // substance in nM; isVersionOf uniprot:Q15796 kegg.compound:C00562
  species PSmad2_PSmad2_n in Vnuc = 0;  // substance in nM; hasPart uniprot:Q15796; isVersionOf kegg.compound:C00562
  species PSmad2_Smad4_n in Vnuc = 0;  // substance in nM; hasPart uniprot:Q15796 uniprot:Q13485; hasVersion kegg.compound:C00562
  species TGF_beta_endo in Vcyt = 0;  // substance in nM; isVersionOf uniprot:P01137; occursIn GO:0005769
  species TGF_beta_ns in Vmed = 0;  // substance in nM; isVersionOf uniprot:P01137
  species $AA in Vcyt = 0;  // substance in nM
  species $empty_degraded in Vcyt = 0;  // substance in nM

  // Parameters:
  stimulation_type = 1 dimensionless;
  single_pulse_duration = 0.5 min;
  totalNumT1R has molecules_per_cell;
  totalNumT2R has molecules_per_cell;
  totalNumLRC has molecules_per_cell;
  totalNumPSmad2 has molecules_per_cell;
  totalNuclearPSmad2 has nM;
  totalSmad2c has nM;
  totalSmad2n has nM;
  medium_TGF_beta_amount has molecules_per_cell;
  TGF_beta_dose_mol_per_cell = TGF_beta_ex*1e-9*Vmed*6e23; TGF_beta_dose_mol_per_cell has molecules_per_cell;
  ki = 0.333 per_min;
  kr = 0.0333 per_min;
  k_T1R = 0.0167 nM_per_min;
  k_T2R = 0.0190076 nM_per_min;
  kdeg_T1R = 0.00256 per_min;
  kdeg_T2R = 0.0132 per_min;
  kdeg_LRC = 0.00256 per_min;
  kdeg_TGF_beta = 0.347 per_min;
  klid = 0.0233678 per_min;
  ka_LRC = 117.897 third_order;
  kdiss_LRC = 0.0438111 per_min;
  kimp_Smad2 = 0.156 per_min;
  kexp_Smad2 = 0.763 per_min;
  kimp_Smad4 = 0.156 per_min;
  kexp_Smad4 = 0.359 per_min;
  kpho_Smad2 = 0.0488268 second_order;
  kon_Smads = 0.198472 second_order;
  koff_Smads = 1 per_min;
  kimp_Smads = 0.889 per_min;
  kdepho_Smad2 = 0.394 per_min;
  kon_ns = 0.0505413 per_min;
  koff_ns has per_min;
  KD_ns = 40.2257 dimensionless;

  // Assignment rules:
  Vmed := 2e-3/(1e6*exp(ln(1.45)*time/1440));
  totalNumPSmad2 := (PSmad2c + PSmad2_PSmad2_c*2 + PSmad2_Smad4_c)*2.3*602 + (PSmad2n + PSmad2_PSmad2_n*2 + PSmad2_Smad4_n)*602;
  totalNuclearPSmad2 := PSmad2n + 2*PSmad2_PSmad2_n + PSmad2_Smad4_n;
  totalNumT1R := (T1R_surf + T1R_endo + LRC_surf + LRC_endo)*2.3*602;
  totalNumT2R := (T2R_surf + T2R_endo + LRC_surf + LRC_endo)*2.3*602;
  totalNumLRC := (LRC_surf + LRC_endo)*2.3*602;
  totalSmad2c := Smad2c + PSmad2c + 2*PSmad2_PSmad2_c + PSmad2_Smad4_c;
  totalSmad2n := Smad2n + PSmad2n + 2*PSmad2_PSmad2_n + PSmad2_Smad4_n;
  koff_ns := kon_ns*KD_ns;
  medium_TGF_beta_amount := TGF_beta_ex*1e-9*Vmed*6e23;

  // Reactions:
  T1R_production: $AA => T1R_surf; Vcyt*k_T1R;  // isVersionOf GO:0032800
  re2: T1R_surf => T1R_endo; Vcyt*ki*T1R_surf; re2 is "T1R internalization to early endosome";  // isVersionOf GO:0031623
  re3: T1R_endo => T1R_surf; Vcyt*kr*T1R_endo; re3 is "T1R recycling from early endosome";  // isVersionOf GO:0032456
  T1R_constitutive_degradation: T1R_endo => $empty_degraded; Vcyt*kdeg_T1R*T1R_endo;  // isVersionOf GO:0032801
  T2R_production: $AA => T2R_surf; Vcyt*k_T2R;  // isVersionOf GO:0032800
  re6: T2R_surf => T2R_endo; Vcyt*ki*T2R_surf; re6 is "T2R internalization to early endosome";  // isVersionOf GO:0031623
  re7: T2R_endo => T2R_surf; Vcyt*kr*T2R_endo; re7 is "T2R recycling from early endosome";  // isVersionOf GO:0032456
  T2R_constitutive_degradation: T2R_endo => $empty_degraded; Vcyt*kdeg_T2R*T2R_endo;  // isVersionOf GO:0032801
  LRC_activation: TGF_beta_ex + T2R_surf + T1R_surf => LRC_surf; Vcyt*ka_LRC*TGF_beta_ex*T2R_surf*T1R_surf;  // isVersionOf GO:0005102
  re10: LRC_surf => LRC_endo; Vcyt*ki*LRC_surf; re10 is "LRC internalization to early endosome";  // isVersionOf GO:0031623
  LRC_constitutive_degradation: LRC_endo => $empty_degraded; Vcyt*kdeg_LRC*LRC_endo;  // isVersionOf GO:0032801
  dissociation_of_LRC_in_endosome: LRC_endo => T1R_endo + T2R_endo + TGF_beta_endo; Vcyt*kdiss_LRC*LRC_endo;  // isVersionOf GO:0043241
  re13: TGF_beta_endo => $empty_degraded; Vcyt*kdeg_TGF_beta*TGF_beta_endo; re13 is "TGF-beta constitutive degradation";  // isVersionOf GO:0030163
  Smad2_nuclear_import: Smad2c => Smad2n; Vcyt*kimp_Smad2*Smad2c;  // isVersionOf GO:0051169
  Smad2_nuclear_export: Smad2n => Smad2c; Vnuc*kexp_Smad2*Smad2n;  // isVersionOf GO:0051169
  Smad4_nuclear_import: Smad4c => Smad4n; Vcyt*kimp_Smad4*Smad4c;  // isVersionOf GO:0051169
  Smad4_nuclear_export: Smad4n => Smad4c; Vnuc*kexp_Smad4*Smad4n;  // isVersionOf GO:0051169
  Smad2_phosphorylation: Smad2c => PSmad2c; Vcyt*kpho_Smad2*Smad2c*LRC_endo;  // modifiers: LRC_endo; isVersionOf GO:0006468
  PSmad2_nuclear_import: PSmad2c => PSmad2n; Vcyt*kimp_Smad2*PSmad2c;  // isVersionOf GO:0051169
  PSmad2_nuclear_export: PSmad2n => PSmad2c; Vnuc*kexp_Smad2*PSmad2n;  // isVersionOf GO:0051169
  Smad2_Smad4_complex_formation: PSmad2c + Smad4c -> PSmad2_Smad4_c; Vcyt*(kon_Smads*PSmad2c*Smad4c - koff_Smads*PSmad2_Smad4_c); Smad2_Smad4_complex_formation is "Smad2-Smad4 complex formation";  // isVersionOf GO:0006461
  Smad2_Smad4_nuclear_import: PSmad2_Smad4_c => PSmad2_Smad4_n; Vcyt*kimp_Smads*PSmad2_Smad4_c; Smad2_Smad4_nuclear_import is "Smad2-Smad4 nuclear import";
  Smad2_Smad4_dissociation: PSmad2_Smad4_n -> PSmad2n + Smad4n; Vnuc*(koff_Smads*PSmad2_Smad4_n - kon_Smads*PSmad2n*Smad4n); Smad2_Smad4_dissociation is "Smad2-Smad4 dissociation";  // isVersionOf GO:0051169
  Smad2_dephosphorylation: PSmad2n => Smad2n; Vnuc*kdepho_Smad2*PSmad2n;  // isVersionOf GO:0006470
  PSmad2_dimer_formation: 2 PSmad2c -> PSmad2_PSmad2_c; Vcyt*(kon_Smads*PSmad2c^2 - koff_Smads*PSmad2_PSmad2_c);  // isVersionOf GO:0006461
  PSmad2_dimer_nuclear_import: PSmad2_PSmad2_c => PSmad2_PSmad2_n; Vcyt*kimp_Smads*PSmad2_PSmad2_c;  // isVersionOf GO:0051169
  PSmad2_dimmer_dissociation: PSmad2_PSmad2_n -> 2 PSmad2n; Vnuc*(koff_Smads*PSmad2_PSmad2_n - kon_Smads*PSmad2n^2);  // isVersionOf GO:0043241
  re28: LRC_surf => $empty_degraded; Vcyt*klid*LRC_surf*totalNuclearPSmad2; re28 is "negative feedback induced LRC degradation";  // isVersionOf GO:0009057
  non_specific_binding_of_TGF_beta: TGF_beta_ex -> TGF_beta_ns; Vmed*(kon_ns*TGF_beta_ex - koff_ns*TGF_beta_ns); non_specific_binding_of_TGF_beta is "non-specific binding of TGF-beta";  // isVersionOf GO:0005102

  // Events:
  single_pulse_TGF_beta_washout: at ((stimulation_type == 2) && (time == single_pulse_duration)): TGF_beta_ex = 0; single_pulse_TGF_beta_washout is "TGF-beta washout in singel pulse stimulation";

  // Unit definitions:
  unit substance = 1e-9 mole;
  unit volume = litre;
  unit area = metre^2;
  unit length = metre;
  unit time = 60 second; time is "min";
  unit per_min = 1 / (60 second);
  unit nM_per_min = 1e-9 mole / (60 second);
  unit third_order = 1 / ((1e-9 mole)^2 * 60 second); third_order is "third order rate constant";
  unit second_order = 1 / (1e-9 mole * 60 second); second_order is "second order rate constant";
  unit min = 60 second; min is "minute";
  unit nM = 1e-9 mole; nM is "nanomolar";
  unit molecules_per_cell = dimensionless;
end
