// SBML level 2 version 4

model Hsp70Model()
  // Proctor2011_ProteinHomeostasis_NormalCondition
  // This model is from the article:
  // Modelling the Role of the Hsp70/Hsp90 System in the Maintenance of Protein Homeostasis
  // Proctor CJ, Lorimer IAJ PLoS ONE 2011; 6(7): e22038. doi:10.1371/journal.pone.0022038 ,
  // Abstract:
  // Neurodegeneration is an age-related disorder which is characterised by the accumulation of aggregated protein and neuronal cell death. There are many different neurodegenerative diseases which are classified according to the specific proteins involved and the regions of the brain which are affected. Despite individual differences, there are common mechanisms at the sub-cellular level leading to loss of protein homeostasis. The two central systems in protein homeostasis are the chaperone system, which promotes correct protein folding, and the cellular proteolytic system, which degrades misfolded or damaged proteins. Since these systems and their interactions are very complex, we use mathematical modelling to aid understanding of the processes involved. The model developed in this study focuses on the role of Hsp70 (IPR00103) and Hsp90 (IPR001404) chaperones in preventing both protein aggregation and cell death. Simulations were performed under three different conditions: no stress; transient stress due to an increase in reactive oxygen species; and high stress due to sustained increases in reactive oxygen species. The model predicts that protein homeostasis can be maintained during short periods of stress. However, under long periods of stress, the chaperone system becomes overwhelmed and the probability of cell death pathways being activated increases. Simulations were also run in which cell death mediated by the JNK (P45983) and p38 (Q16539) pathways was inhibited. The model predicts that inhibiting either or both of these pathways may delay cell death but does not stop the aggregation process and that eventually cells die due to aggregated protein inhibiting proteasomal function. This problem can be overcome if the sequestration of aggregated protein into inclusion bodies is enhanced. This model predicts responses to reactive oxygen species-mediated stress that are consistent with currently available experimental data. The model can be used to assess specific interventions to reduce cell death due to impaired protein homeostasis.
  // Simulations were performed under three different conditions: 1) normal condition (no stress), 2) moderate stress due to an increase in reactive oxygen species (ROS) i.e. ROS levels were increased by a factor of 4 at time=4hours for a period of 1 hour (not 2 hours as mentioned in the figure 5 legend of the reference publication. This is a typo in the paper and is clarified by the author) and 3) high stress due to sustained increase in reactive oxygen species (ROS) (here ROS increases with time).
  // The model that corresponds to the normal condition is submitted as a main model in the BioModels Database. The other two models, that corresponds to the moderate stress conditions and high stress conditions are available in SBML format as supporting files [go to Curation tab].
  // Supplementary figures S3 (normal condition), S4 (moderate stress condition) and S6 (high stress condition) are reproduced here.
  // biomodels.db:MODEL1005280000
  // biomodels.db:BIOMD0000000344
  // isDescribedBy pubmed:21779370
  // isVersionOf GO:0042592 GO:0006915 GO:0003773 GO:0051085
  // occursIn taxonomy:7711

  // Compartments:
  compartment cytosol = 1;  // isVersionOf GO:0005829
  compartment nucleus = 1;  // GO:0005634

  // Species:
  substanceOnly species NatP in cytosol = 17600;  // isVersionOf CHEBI:36080
  substanceOnly species MisP in cytosol = 0;  // isVersionOf CHEBI:36080
  substanceOnly species Hsp70 in cytosol = 1400;  // isPartOf interpro:IPR001023
  substanceOnly species Hsp90 in cytosol = 1850;  // isVersionOf interpro:IPR001404
  substanceOnly species Hsp70_dam in cytosol = 0;  // isVersionOf interpro:IPR001023
  substanceOnly species Hsp90_dam in cytosol = 0;  // isVersionOf interpro:IPR001404
  substanceOnly species Hsp90_Proteasome in cytosol = 0;  // isVersionOf interpro:IPR001023 GO:0000502
  substanceOnly species Hsp70_Proteasome in cytosol = 0;  // isVersionOf interpro:IPR001404 GO:0000502
  substanceOnly species Hsp70Client in cytosol = 490;  // isVersionOf CHEBI:36080
  substanceOnly species Hsp90Client in cytosol = 590;  // isVersionOf CHEBI:36080
  substanceOnly species Hsp70_Hsp70Client in cytosol = 10;  // hasPart CHEBI:36080 interpro:IPR001023
  substanceOnly species Hsp90_Hsp90Client in cytosol = 10;  // hasPart CHEBI:36080 interpro:IPR001404
  substanceOnly species Akt in cytosol = 340;  // isVersionOf uniprot:P31749
  substanceOnly species Akt_Hsp90 in cytosol = 30;  // hasPart uniprot:P31749 interpro:IPR001404
  substanceOnly species CHIP in cytosol = 255;  // isVersionOf uniprot:Q9UNE7
  substanceOnly species Akt_CHIP_Hsp90 in cytosol = 80;  // hasPart uniprot:P31749 uniprot:Q9UNE7 interpro:IPR001404
  substanceOnly species Akt_Proteasome in cytosol = 0;  // hasPart uniprot:P31749 GO:0000502
  substanceOnly species Hsf1 in cytosol = 5;  // isVersionOf uniprot:Q00613
  substanceOnly species Hsf1_Hsp90 in cytosol = 95;  // hasPart uniprot:Q00613 interpro:IPR001404
  substanceOnly species Hsp90_MisP in cytosol = 470;  // hasPart CHEBI:36080 interpro:IPR001023
  substanceOnly species Hsp70_MisP in cytosol = 410;  // hasPart CHEBI:36080 interpro:IPR001404
  substanceOnly species Hsf1_Hsf1_Hsf1 in nucleus = 0;  // hasPart uniprot:Q00613
  substanceOnly species Hsf1_Hsf1_Hsf1_P in nucleus = 0;  // isVersionOf kegg.compound:C00562; hasPart uniprot:Q00613
  substanceOnly species Hsf1_Hsf1 in cytosol = 0;  // hasPart uniprot:Q00613
  substanceOnly species HSEHsp70 in nucleus = 2;
  substanceOnly species HSEHsp90 in nucleus = 2;
  substanceOnly species HSEHsp70_Hsf1_Hsf1_Hsf1 in nucleus = 0;  // isVersionOf GO:0043234
  substanceOnly species HSEHsp70_Hsf1_Hsf1_Hsf1_P in nucleus = 0;  // isVersionOf kegg.compound:C00562 GO:0043234
  substanceOnly species HSEHsp90_Hsf1_Hsf1_Hsf1 in nucleus = 0;  // isVersionOf GO:0043234
  substanceOnly species HSEHsp90_Hsf1_Hsf1_Hsf1_P in nucleus = 0;  // isVersionOf kegg.compound:C00562 GO:0043234
  substanceOnly species Jnk in cytosol = 100;  // isVersionOf uniprot:P45983
  substanceOnly species Jnk_P in cytosol = 0;  // isVersionOf uniprot:P45983 kegg.compound:C00562
  substanceOnly species Ppx in cytosol = 0;  // isVersionOf GO:0008287
  substanceOnly species Mkp1 in cytosol = 0;  // isVersionOf uniprot:P28562
  substanceOnly species Mkp1_P in cytosol = 100;  // isVersionOf uniprot:P28562 kegg.compound:C00562
  substanceOnly species Mkp1_Proteasome in cytosol = 0;  // hasPart uniprot:P28562 GO:0000502
  substanceOnly species Hsp70_Ppx in cytosol = 100;  // hasPart interpro:IPR001023 GO:0008287
  substanceOnly species Pkc in cytosol = 100;  // isVersionOf interpro:IPR012233
  substanceOnly species p38 in cytosol = 100;  // isVersionOf uniprot:Q16539
  substanceOnly species p38_P in cytosol = 0;  // isVersionOf uniprot:Q16539 kegg.compound:C00562
  substanceOnly species Proteasome in cytosol = 500;  // isVersionOf GO:0000502
  substanceOnly species MisP_Proteasome in cytosol = 0;  // hasPart CHEBI:36080 GO:0000502
  substanceOnly species AggP in cytosol = 0;  // isVersionOf CHEBI:36080
  substanceOnly species SeqAggP in cytosol = 0;  // isVersionOf CHEBI:36080
  substanceOnly species AggP_Proteasome in cytosol = 0;  // hasPart CHEBI:36080 GO:0000502
  substanceOnly species ROS in cytosol = 10;  // isVersionOf CHEBI:26523
  substanceOnly species $ATP in cytosol = 10000;  // isPartOf CHEBI:15422
  substanceOnly species $ADP in cytosol = 1000;  // isPartOf CHEBI:16761
  substanceOnly species $Source in cytosol = 1;
  substanceOnly species $Sink in cytosol = 1;
  substanceOnly species p38Death in cytosol = 0;
  substanceOnly species JNKDeath in cytosol = 0;
  substanceOnly species PIDeath in cytosol = 0;
  substanceOnly species CellDeath in cytosol = 0;

  // Parameters:
  ksynNatP = 0.042;
  kmisfold = 2e-6;
  kbinMisPProt = 1e-7;
  kdegMisP = 0.01;
  kagg = 1e-8;
  kseqagg = 7e-7;
  kbinAggPProt = 1e-5;
  kbinHspMisp = 8e-6;
  krelHspMisp = 8e-5;
  krefold = 0.00055;
  kbinHsf1Hsp90 = 0.02;
  krelHsf1Hsp90 = 0.5;
  kdimerHsf1 = 8e-5;
  ktrimerHsf1 = 0.01;
  kdetrimerHsf1 = 0.5;
  kdedimerHsf1 = 0.5;
  kbinHSEHsf1 = 0.05;
  krelHSEHsf1 = 0.08;
  kupregHsp = 0.2;
  kbasalsynHsp70 = 0.008;
  kbasalsynHsp90 = 0.008;
  kbinHsp70Prot = 1.2e-8;
  kbinHsp90Prot = 1e-8;
  kdegHsp70 = 0.01;
  kdegHsp90 = 0.01;
  kgenROS = 0.01;
  kremROS = 0.001;
  kbinHsp70client = 0.0002;
  krelHsp70client = 5;
  kbinHsp90client = 0.0002;
  krelHsp90client = 5;
  kphosJnk = 0.02;
  kdephosJnkMkp1 = 0.05;
  kbinHsp70Ppx = 0.2;
  krelHsp70Ppx = 5;
  kphosHsf1 = 0.03;
  kdephosHsf1 = 0.01;
  kbinHSEPhosTriH = 0.1;
  krelHSEPhosTriH = 0.08;
  kphosp38 = 0.02;
  kdephosp38Mkp1 = 0.05;
  kgenROSAggP = 1e-6;
  ksynAkt = 0.0015;
  kbinAktHsp90 = 0.00037;
  krelAktHsp90 = 7;
  kbinAktProt = 6e-8;
  krelAktProt = 1e-8;
  kdegAkt = 0.01;
  kbinCHIP = 2e-7;
  krelCHIP = 1e-8;
  ksynMkp1 = 1e-5;
  kbinMkp1Prot = 9.6e-9;
  kdegMkp1 = 0.01;
  kphosMkp1 = 0.02;
  kdephosMkp1 = 0.001;
  kgenROSp38 = 0.0001;
  kdamHsp = 1e-8;
  kp38death = 1.5e-7;
  kJnkdeath = 1.5e-7;
  kPIdeath = 2e-8;
  kp38act = 1;
  kalive = 1;

  // Assignment rules:
  tot_Hsp90 := Hsp90 + Hsp90_dam + Hsp90_Proteasome + Hsp90_Hsp90Client + Akt_Hsp90 + Akt_CHIP_Hsp90 + Hsf1_Hsp90 + Hsp90_MisP;
  tot_Hsp70 := Hsp70 + Hsp70_dam + Hsp70_Proteasome + Hsp70_Hsp70Client + Hsp70_MisP + Hsp70_Ppx;
  tot_MisP := MisP + Hsp70_MisP + Hsp90_MisP;

  // Reactions:
  ProteinSynthesis: $Source => NatP; ksynNatP*Source*kalive;  // isVersionOf GO:0006412
  Misfolding: NatP + ROS => MisP + ROS; kmisfold*NatP*ROS*kalive;  // isVersionOf GO:0000302
  Hsp90MisPBinding: MisP + Hsp90 => Hsp90_MisP; kbinHspMisp*MisP*Hsp90*kalive;  // isVersionOf GO:0051087
  Hsp90unsuccessulRefolding: Hsp90_MisP => MisP + Hsp90; krelHspMisp*Hsp90_MisP*kalive;  // isVersionOf GO:0070389
  Hsp90refolding: Hsp90_MisP + $ATP => Hsp90 + NatP + $ADP; krefold*Hsp90_MisP*kalive*ATP/(5000 + ATP);  // isVersionOf GO:0070389
  Hsp70MisPBinding: MisP + Hsp70 => Hsp70_MisP; kbinHspMisp*MisP*Hsp70*kalive;  // isVersionOf GO:0051087
  Hsp70unsuccessulRefolding: Hsp70_MisP => MisP + Hsp70; krelHspMisp*Hsp70_MisP*kalive;  // isVersionOf GO:0070389
  Hsp70refolding: Hsp70_MisP + $ATP => Hsp70 + NatP + $ADP; krefold*Hsp70_MisP*kalive*ATP/(5000 + ATP);  // isVersionOf GO:0070389
  Hsp70ClientBinding: Hsp70 + Hsp70Client => Hsp70_Hsp70Client; kbinHsp70client*Hsp70*Hsp70Client*kalive;  // isVersionOf GO:0006461
  Hsp70ClientRelease: Hsp70_Hsp70Client => Hsp70 + Hsp70Client; krelHsp70client*Hsp70_Hsp70Client*kalive;  // isVersionOf GO:0032986
  Hsp90ClientBinding: Hsp90 + Hsp90Client => Hsp90_Hsp90Client; kbinHsp90client*Hsp90*Hsp90Client*kalive;  // isVersionOf GO:0006461
  Hsp90ClientRelease: Hsp90_Hsp90Client => Hsp90 + Hsp90Client; krelHsp90client*Hsp90_Hsp90Client*kalive;  // isVersionOf GO:0032986
  Hsp90HSF1Binding: Hsp90 + Hsf1 => Hsf1_Hsp90; kbinHsf1Hsp90*Hsp90*Hsf1*kalive;  // isVersionOf GO:0006461
  Hsp90HSF1Release: Hsf1_Hsp90 => Hsp90 + Hsf1; krelHsf1Hsp90*Hsf1_Hsp90*kalive;  // isVersionOf GO:0032986
  dimerisation: 2 Hsf1 => Hsf1_Hsf1; (Hsf1 - 1)*kdimerHsf1*kalive*Hsf1/2;  // isVersionOf GO:0042803
  trimerisation: Hsf1 + Hsf1_Hsf1 => Hsf1_Hsf1_Hsf1; ktrimerHsf1*Hsf1*Hsf1_Hsf1*kalive;  // isVersionOf GO:0070206
  deTrimerisation: Hsf1_Hsf1_Hsf1 => Hsf1 + Hsf1_Hsf1; kdetrimerHsf1*Hsf1_Hsf1_Hsf1*kalive;  // isVersionOf GO:0070206
  deDimerisation: Hsf1_Hsf1 => 2 Hsf1; kdedimerHsf1*Hsf1_Hsf1*kalive;  // isVersionOf GO:0043241
  HSE70TriHBinding: Hsf1_Hsf1_Hsf1 + HSEHsp70 => HSEHsp70_Hsf1_Hsf1_Hsf1; kbinHSEHsf1*HSEHsp70*Hsf1_Hsf1_Hsf1*kalive;  // isVersionOf GO:0006461
  HSE70TriHRelease: HSEHsp70_Hsf1_Hsf1_Hsf1 => HSEHsp70 + Hsf1_Hsf1_Hsf1; krelHSEHsf1*HSEHsp70_Hsf1_Hsf1_Hsf1*kalive;  // isVersionOf GO:0032986
  HSE90TriHBinding: Hsf1_Hsf1_Hsf1 + HSEHsp90 => HSEHsp90_Hsf1_Hsf1_Hsf1; kbinHSEHsf1*HSEHsp90*Hsf1_Hsf1_Hsf1*kalive;  // isVersionOf GO:0006461
  HSE90TriHRelease: HSEHsp90_Hsf1_Hsf1_Hsf1 => HSEHsp90 + Hsf1_Hsf1_Hsf1; krelHSEHsf1*HSEHsp90_Hsf1_Hsf1_Hsf1*kalive;  // isVersionOf GO:0032986
  Hsf1_Hsf1_Hsf1Phosphorylation: Hsf1_Hsf1_Hsf1 + Pkc => Hsf1_Hsf1_Hsf1_P + Pkc; kphosHsf1*Hsf1_Hsf1_Hsf1*Pkc*kalive;  // isVersionOf GO:0016310
  Hsf1_Hsf1_Hsf1DePhosphorylation: Hsf1_Hsf1_Hsf1_P + Hsp70_Ppx => Hsf1_Hsf1_Hsf1 + Hsp70_Ppx; kdephosHsf1*Hsf1_Hsf1_Hsf1_P*Hsp70_Ppx*kalive;  // isVersionOf GO:0016311
  HSE70PhosTriHBinding: Hsf1_Hsf1_Hsf1_P + HSEHsp70 => HSEHsp70_Hsf1_Hsf1_Hsf1_P; kbinHSEPhosTriH*HSEHsp70*Hsf1_Hsf1_Hsf1_P*kalive;  // isVersionOf GO:0006461
  HSE70PhosTriHRelease: HSEHsp70_Hsf1_Hsf1_Hsf1_P => Hsf1_Hsf1_Hsf1_P + HSEHsp70; krelHSEPhosTriH*HSEHsp70_Hsf1_Hsf1_Hsf1_P*kalive;  // isVersionOf GO:0032986
  HSE90PhosTriHBinding: Hsf1_Hsf1_Hsf1_P + HSEHsp90 => HSEHsp90_Hsf1_Hsf1_Hsf1_P; kbinHSEPhosTriH*HSEHsp90*Hsf1_Hsf1_Hsf1_P*kalive;  // isVersionOf GO:0006461
  HSE90PhosTriHRelease: HSEHsp90_Hsf1_Hsf1_Hsf1_P => Hsf1_Hsf1_Hsf1_P + HSEHsp90; krelHSEPhosTriH*HSEHsp90_Hsf1_Hsf1_Hsf1_P*kalive;  // isVersionOf GO:0032986
  Hsp90BasalSynthesis: $Source => Hsp90; kbasalsynHsp90*kalive;  // isVersionOf GO:0006412
  Hsp90Upregulation: HSEHsp90_Hsf1_Hsf1_Hsf1_P => HSEHsp90_Hsf1_Hsf1_Hsf1_P + Hsp90; kupregHsp*HSEHsp90_Hsf1_Hsf1_Hsf1_P*kalive;  // isVersionOf GO:0032092
  Hsp90ProteasomeBinding: Hsp90 + Proteasome => Hsp90_Proteasome; kbinHsp90Prot*Hsp90*Proteasome*kalive;  // isVersionOf GO:0006461
  Hsp90Degradation: Hsp90_Proteasome + $ATP => Proteasome + $ADP; kdegHsp90*Hsp90_Proteasome*kalive*ATP/(5000 + ATP);  // isVersionOf GO:0009056
  Hsp70BasalSynthesis: $Source => Hsp70; kbasalsynHsp70*kalive;  // isVersionOf GO:0006412
  Hsp70Upregulation: HSEHsp70_Hsf1_Hsf1_Hsf1_P => HSEHsp70_Hsf1_Hsf1_Hsf1_P + Hsp70; kupregHsp*HSEHsp70_Hsf1_Hsf1_Hsf1_P*kalive;  // isVersionOf GO:0032092
  Hsp70ProteasomeBinding: Hsp70 + Proteasome => Hsp70_Proteasome; kbinHsp70Prot*Hsp70*Proteasome*kalive;  // isVersionOf GO:0006461
  Hsp70Degradation: Hsp70_Proteasome + $ATP => Proteasome + $ADP; kdegHsp70*Hsp70_Proteasome*kalive*ATP/(5000 + ATP);  // isVersionOf GO:0009056
  MisPProteasomeBinding1: Hsp70_MisP + Proteasome => MisP_Proteasome + Hsp70; kbinMisPProt*Hsp70_MisP*Proteasome*kalive;  // isVersionOf GO:0070628
  MisPProteasomeBinding2: Hsp90_MisP + Proteasome => MisP_Proteasome + Hsp90; kbinMisPProt*Hsp90_MisP*Proteasome*kalive;  // isVersionOf GO:0070628
  MisPDegradation: MisP_Proteasome + $ATP => Proteasome + $ADP; kdegMisP*MisP_Proteasome*kalive*ATP/(5000 + ATP);  // isVersionOf GO:0009056
  radicalFormation: $Source => ROS; kgenROS*Source*kalive;  // isVersionOf GO:0009058
  radicalScavenging: ROS => $Sink; kremROS*ROS*kalive;  // isVersionOf GO:0009056
  Hsp70_PpxBinding: Hsp70 + Ppx => Hsp70_Ppx; kbinHsp70Ppx*Hsp70*Ppx*kalive;  // isVersionOf GO:0006461
  Hsp70_PPXRelease: Hsp70_Ppx => Hsp70 + Ppx; krelHsp70Ppx*Hsp70_Ppx*kalive;  // isVersionOf GO:0043241
  JnkPhosphorylation: ROS + Jnk => ROS + Jnk_P; kphosJnk*Jnk*ROS*kalive;  // isVersionOf GO:0016310
  JNKDephosphorylatioByMkp1: Jnk_P + Mkp1_P => Jnk + Mkp1_P; kdephosJnkMkp1*Jnk_P*Mkp1_P*kalive;  // isVersionOf GO:0016311
  p38Phosphorylation: ROS + p38 => ROS + p38_P; kphosp38*ROS*p38*kalive;  // isVersionOf GO:0016310
  p38DePhosphorylationByMkp1: p38_P + Mkp1_P => p38 + Mkp1_P; kdephosp38Mkp1*p38_P*Mkp1_P*kalive;  // isVersionOf GO:0016311
  Aggregation1: 2 MisP => AggP; kagg*MisP*(MisP - 1)*0.5*kalive;  // isVersionOf GO:0070841
  SequesteringOfAggregate: MisP + AggP => SeqAggP; kagg*MisP*AggP*kalive;  // isVersionOf GO:0051235
  InclusionGrowth: SeqAggP + MisP => 2 SeqAggP; kseqagg*SeqAggP*MisP*kalive;  // isVersionOf GO:0090261
  ProteasomeInhibtion: AggP + Proteasome => AggP_Proteasome; kbinAggPProt*AggP*Proteasome*kalive;  // isVersionOf GO:0006461
  ROSgenerationSmallAggP: AggP => AggP + ROS; kgenROSAggP*AggP*kalive;  // isVersionOf GO:0052064
  ROSgenerationAggPProteasome: AggP_Proteasome => AggP_Proteasome + ROS; kgenROSAggP*AggP_Proteasome*kalive;  // isVersionOf GO:0052064
  AktSynthesis: $Source => Akt; ksynAkt*Source*kalive;  // isVersionOf GO:0006412
  Hsp90AktBinding: Hsp90 + Akt => Akt_Hsp90; kbinAktHsp90*Hsp90*Akt*kalive;  // isVersionOf GO:0006461
  Hsp90AktRelease: Akt_Hsp90 => Akt + Hsp90; krelAktHsp90*Akt_Hsp90*kalive;  // isVersionOf GO:0043241
  CHIPbinding: CHIP + Akt_Hsp90 => Akt_CHIP_Hsp90; kbinCHIP*CHIP*Akt_Hsp90*kalive;  // isVersionOf GO:0006461
  CHIPrelease: Akt_CHIP_Hsp90 => CHIP + Akt_Hsp90; krelCHIP*Akt_CHIP_Hsp90*kalive;  // isVersionOf GO:0043241
  AktProteasomeBinding: Akt_CHIP_Hsp90 + Proteasome => Akt_Proteasome + CHIP + Hsp90; kbinAktProt*Akt_CHIP_Hsp90*Proteasome*kalive;  // isVersionOf GO:0070628
  AktProteasomeRelease: Akt_Proteasome => Akt + Proteasome; krelAktProt*Akt_Proteasome*kalive;  // isVersionOf GO:0043241
  AktDegradation: Akt_Proteasome + $ATP => Proteasome + $ADP; kdegAkt*Akt_Proteasome*kalive*ATP/(5000 + ATP);  // isVersionOf GO:0009056
  Mkp1Synthesis: $Source => Mkp1; ksynMkp1*Source*kalive;  // isVersionOf GO:0006412
  Mkp1ProteasomeBinding: Mkp1 + Proteasome => Mkp1_Proteasome; kbinMkp1Prot*Mkp1*Proteasome*kalive;  // isVersionOf GO:0006461
  Mkp1Degradation: Mkp1_Proteasome + $ATP => Proteasome + $ADP; kdegMkp1*Mkp1_Proteasome*kalive*ATP/(5000 + ATP);  // isVersionOf GO:0009056
  Mkp1Phosphorylation: Mkp1 + Hsp70 => Mkp1_P + Hsp70; kphosMkp1*Mkp1*Hsp70*kalive;  // isVersionOf GO:0016310
  Mkp1Dephosphorylation: Mkp1_P + ROS => Mkp1 + ROS; kdephosMkp1*Mkp1_P*ROS*kalive;  // isVersionOf GO:0016311
  p38ROSproduction: p38_P => p38_P + ROS; kgenROSp38*p38_P*kalive*kp38act;  // isVersionOf GO:0052064
  Hsp70Damage: Hsp70 + ROS => Hsp70_dam + ROS; kdamHsp*Hsp70*ROS*kalive;  // isVersionOf GO:0006974
  Hsp90Damage: Hsp90 + ROS => Hsp90_dam + ROS; kdamHsp*Hsp90*ROS*kalive;  // isVersionOf GO:0006974
  Hsp70DamProteasomeBinding: Hsp70_dam + Proteasome => Hsp70_Proteasome; kbinHsp70Prot*Hsp70_dam*Proteasome*kalive;  // isVersionOf GO:0006461
  Hsp90DamProteasomeBinding: Hsp90_dam + Proteasome => Hsp90_Proteasome; kbinHsp90Prot*Hsp90_dam*Proteasome*kalive;  // isVersionOf GO:0006461
  Hsp70DamAggregation1: 2 Hsp70_dam => AggP; kagg*Hsp70_dam*(Hsp70_dam - 1)*0.5*kalive;  // isVersionOf GO:0070841
  Hsp70DamInclusionFormation: Hsp70_dam + AggP => SeqAggP; kagg*Hsp70_dam*AggP*kalive;  // isVersionOf GO:0070841
  Hsp90DamAggregation: 2 Hsp90_dam => AggP; kagg*Hsp90_dam*(Hsp90_dam - 1)*0.5*kalive;  // isVersionOf GO:0070841
  Hsp90DamInclusionFormation: Hsp90_dam + AggP => SeqAggP; kagg*Hsp90_dam*AggP*kalive;  // isVersionOf GO:0070841
  Hsp70DamSequestering: Hsp70_dam + SeqAggP => 2 SeqAggP; kseqagg*Hsp70_dam*SeqAggP*kalive;  // isVersionOf GO:0051235
  Hsp90DamSequestering: Hsp90_dam + SeqAggP => 2 SeqAggP; kseqagg*Hsp90_dam*SeqAggP*kalive;  // isVersionOf GO:0051235
  p38CellDeath: p38_P => p38_P + p38Death + CellDeath; kp38death*p38_P*kalive*kp38act;  // isVersionOf GO:0008219
  JnkCellDeath: Jnk_P => Jnk_P + JNKDeath + CellDeath; kJnkdeath*Jnk_P*kalive;  // isVersionOf GO:0008219
  PICellDeath: AggP_Proteasome => AggP_Proteasome + PIDeath + CellDeath; kPIdeath*AggP_Proteasome*kalive;  // isVersionOf GO:0008219

  // Events:
  DeathOfCell: at (CellDeath >= 1): kalive = 0;

  // Unit definitions:
  unit substance = item;
end
