// SBML level 2 version 4

model Fridlyand2010_GlucoseSensitivity_B()
  // This a model from the article:
  // Glucose sensing in the pancreatic beta cell: a computational systems analysis.
  // Fridlyand LE, Philipson LH. Theor Biol Med Model. 2010 May 24;7:15. 20497556 ,
  // Abstract:
  // BACKGROUND: Pancreatic beta-cells respond to rising blood glucose by increasing oxidative metabolism, leading to an increased ATP/ADP ratio in the cytoplasm. This leads to a closure of KATP channels, depolarization of the plasma membrane, influx of calcium and the eventual secretion of insulin. Such mechanism suggests that beta-cell metabolism should have a functional regulation specific to secretion, as opposed to coupling to contraction. The goal of this work is to uncover contributions of the cytoplasmic and mitochondrial processes in this secretory coupling mechanism using mathematical modeling in a systems biology approach. METHODS: We describe a mathematical model of beta-cell sensitivity to glucose. The cytoplasmic part of the model includes equations describing glucokinase, glycolysis, pyruvate reduction, NADH and ATP production and consumption. The mitochondrial part begins with production of NADH, which is regulated by pyruvate dehydrogenase. NADH is used in the electron transport chain to establish a proton motive force, driving the F1F0 ATPase. Redox shuttles and mitochondrial Ca2+ handling were also modeled. RESULTS: The model correctly predicts changes in the ATP/ADP ratio, Ca2+ and other metabolic parameters in response to changes in substrate delivery at steady-state and during cytoplasmic Ca2+ oscillations. Our analysis of the model simulations suggests that the mitochondrial membrane potential should be relatively lower in beta cells compared with other cell types to permit precise mitochondrial regulation of the cytoplasmic ATP/ADP ratio. This key difference may follow from a relative reduction in respiratory activity. The model demonstrates how activity of lactate dehydrogenase, uncoupling proteins and the redox shuttles can regulate beta-cell function in concert; that independent oscillations of cytoplasmic Ca2+ can lead to slow coupled metabolic oscillations; and that the relatively low production rate of reactive oxygen species in beta-cells under physiological conditions is a consequence of the relatively decreased mitochondrial membrane potential. CONCLUSION: This comprehensive model predicts a special role for mitochondrial control mechanisms in insulin secretion and ROS generation in the beta cell. The model can be used for testing and generating control hypotheses and will help to provide a more complete understanding of beta-cell glucose-sensing central to the physiology and pathology of pancreatic beta-cells.
  // This model was taken from the Vcell MathModel directory and was converted to SBML
  // This model originates from BioModels Database: A Database of Annotated Published Models (http://www.ebi.ac.uk/biomodels/). It is copyright (c) 2005-2011 The BioModels.net Team.
  // For more information see the terms of use .
  // To cite BioModels Database, please use: Li C, Donizelli M, Rodriguez N, Dharuri H, Endler L, Chelliah V, Li L, He E, Henry A, Stefan MI, Snoep JL, Hucka M, Le Novère N, Laibe C (2010) BioModels Database: An enhanced, curated and annotated resource for published quantitative kinetic models. BMC Syst Biol., 4:92.
  // biomodels.db:MODEL1108090001
  // biomodels.db:BIOMD0000000349
  // isDescribedBy pubmed:20497556
  // isVersionOf biomodels.db:BIOMD0000000348
  // occursIn taxonomy:9606 BTO:0000783
  // isVersionOf GO:0044342 GO:0061178

  // Compartments:
  compartment compartment;

  // Species:
  species G3P in compartment = G3P_init;  // isVersionOf CHEBI:17138
  species PYR in compartment = PYR_init;  // isVersionOf CHEBI:15361
  species ATP in compartment = ATP_init;  // isVersionOf CHEBI:15422
  species NADHm in compartment = NADHm_init;  // isVersionOf CHEBI:16908
  species NADHc in compartment = NADHc_init;  // isVersionOf CHEBI:16908
  species Vm in compartment = Vm_init;  // isVersionOf PATO:0001462
  species Cam in compartment = Cam_init;  // isVersionOf CHEBI:29108

  // Parameters:
  ai = 0.341;
  am = 0.2;
  Ao = 4000;
  ATP_init = 3700;
  Cac_init = 0.1;
  Cam_init = 0.2;
  Cmit = 1.82;
  Cmp = 6158;
  F = 96480;
  fi = 0.01;
  fm = 0.0003;
  G3P_init = 30;
  gKCa = 25;
  Glu = 8;
  gmVCa = 20;
  hgl = 1.7;
  hp = 8;
  hpc = 8;
  kat = -0.00492;
  kATP = 4e-5;
  kATPCa = 9e-5;
  kbt = -0.00443;
  kCaA = 30;
  KCaj = 8;
  KCam = 0.05;
  KgNc = 0.09;
  kgpd = 1e-5;
  Klnc = 1;
  klp = 0.0305;
  Kmadp = 20;
  KmATP = 500;
  Kmg3p = 200;
  Kmgl = 7;
  KmLD = 47.5;
  KmNh = 3000;
  Kmph = 131.4;
  Kmpyr = 47.5;
  knadhc = 0.0001;
  knadhm = 0.0001;
  KNaj = 8000;
  KpCam = 0.165;
  KPNm = 81;
  ksg = 2e-5;
  KTNc = 0.002;
  KTNm = 16.78;
  NADHc_init = 10;
  NADHm_init = 50;
  Nam = 5000;
  Ni = 10000;
  Ntc = 2000;
  Ntm = 2200;
  PCa = 0.004;
  Plb = 0.0012;
  Plr = 0.0012;
  PYR_init = 10;
  Tnadh = 0.05;
  Tv = 26.73;
  u1 = 1.5;
  u2 = 1.1;
  Vci = 0.764;
  Vi = 0.53;
  Vm_init = 100;
  Vme = 22;
  Vmglu = 0.011;
  Vmgpd = 0.5;
  Vmldh = 1.2;
  Vmmit = 0.0144;
  Vmnc = 0.025;
  Vmpdh = 0.3;
  Vmph = 8;
  Vp_init = -70;
  ZCa = 2;
  Vp = Vp_init;
  Cac = Cac_init;

  // Assignment rules:
  ACa := 1 + (-(1*(1/exp(Cam*(1/KpCam)))));
  AD := MgADP*MgADP*(1/(MgADP*MgADP + Kmadp*Kmadp));
  ADP := Ao + (-ATP);
  AT := Vm^hp*(1/(Kmph^hp + Vm^hp));
  DelJNCa := 1 + Ni^3*(1/KNaj^3) + Cam*(1/KCaj) + Ni^3*Cam*(1/(KNaj^3*KCaj)) + Nam^3*(1/KNaj^3) + Cac*(1/KCaj) + Nam^3*Cac*(1/(KNaj^3*KCaj));
  FDe := NADHm*(1/(KmNh + NADHm));
  FLNADc := NADHc*(1/(Klnc + NADHc*(1/NADc)))*(1/NADc);
  FNADc := NADHc*(1/(KTNc + NADHc*(1/NADc)))*(1/NADc);
  FPCa := 1*(1/(1 + u2*(1 + u1*(1/(1 + Cam*(1/KCam))^2))));
  FPNAD := NADm*(1/(KPNm + NADm*(1/NADHm)))*(1/NADHm);
  FPYR := PYR*(1/(Kmpyr + PYR));
  FTe := (1 + kat*Vm)*(1/(1 + kbt*Vm));
  hCa := 1*(1/(1 + exp(0.1666667*(15 + Vp))));
  IKCa := gKCa*nKCa*(75 + Vp);
  IVCa := gmVCa*PVCa*hCa*(-100 + Vp);
  JGlu := Vmglu*Glu^hgl*ATP*(1/(Kmgl^hgl + Glu^hgl))*(1/(KmATP + ATP));
  Jgpd := Vmgpd*G3P*NADc*(1/(G3P + Kmg3p))*(1/(KgNc + NADc*(1/NADHc)))*(1/NADHc);
  Jhl := (Plb + Plr)*exp(klp*Vm);
  Jhres := Vme*FTe*FDe;
  JLDH := Vmldh*FLNADc*PYR*(1/(KmLD + PYR));
  JNCa := Vmnc*(exp(0.5*Vm*Ni^3*Cam*(1/(Tv*KNaj^3*KCaj))) + (-exp(-(0.5*Vm*Nam^3*Cac*(1/(Tv*KNaj^3*KCaj))))))*(1/DelJNCa);
  JO2 := 0.1*Jhres;
  Jph := Vmph*AD*AT*ACa;
  JPYR := Vmpdh*FPNAD*FPCa*FPYR;
  Jtnadh := Tnadh*FNADc*NADm*(1/(KTNm + NADm*(1/NADHm)))*(1/NADHm);
  Juni := PCa*ZCa*Vm*(am*Cam*exp(-(Vm*ZCa*(1/Tv))) + (-(ai*Cac)))*(1/Tv)*(1/(-1 + exp(-(Vm*ZCa*(1/Tv)))));
  MgADP := 0.055*ADP;
  NADc := Ntc + (-NADHc);
  NADm := Ntm + (-NADHm);
  nKCa := Cac^3*(1/(0.015625 + Cac^3));
  PVCa := 1*(1/(1 + exp(0.1052632*(-19 + (-Vp)))));

  // Rate rules:
  G3P' = (2*JGlu + (-Jgpd))*(1/Vi) + (-(kgpd*G3P));
  PYR' = (Jgpd + (-JPYR) + (-JLDH))*(1/(Vi + Vmmit));
  ATP' = -((kATP + kATPCa*Cac)*ATP) + (2*JGlu + 0.231*Jph)*(1/Vi);
  NADHm' = (4.6*JPYR + (-(0.1*Jhres)) + Jtnadh)*(1/Vmmit) + (-(knadhm*NADHm));
  NADHc' = (Jgpd + (-Jtnadh) + (-JLDH))*(1/Vi) + (-(knadhc*NADHc));
  Vm' = (Jhres + (-Jph) + (-Jhl) + (-(2*Juni)) + (-JNCa))*(1/Cmit);
  Cam' = fm*(Juni + (-JNCa))*(1/Vmmit);
  Vp' = -((IVCa + IKCa)*(1/Cmp));
  Cac' = -(fi*IVCa*(1/(2*F*Vci))) + (-(ksg*Cac));
end
