// SBML level 2 version 4

model DallaMan2007_MealModel_GlucoseInsulinSystem()
  // This a model from the article:
  // Meal simulation model of the glucose-insulin system.
  // Dalla Man C, Rizza RA, Cobelli C. IEEE Trans Biomed Eng. 2007 Oct;54(10):1740-9. 17926672 ,
  // Abstract:
  // A simulation model of the glucose-insulin system in the postprandial state can be useful in several circumstances, including testing of glucose sensors, insulin infusion algorithms and decision support systems for diabetes. Here, we present a new simulation model in normal humans that describes the physiological events that occur after a meal, by employing the quantitative knowledge that has become available in recent years. Model parameters were set to fit the mean data of a large normal subject database that underwent a triple tracer meal protocol which provided quasi-model-independent estimates of major glucose and insulin fluxes, e.g., meal rate of appearance, endogenous glucose production, utilization of glucose, insulin secretion. By decomposing the system into subsystems, we have developed parametric models of each subsystem by using a forcing function strategy. Model results are shown in describing both a single meal and normal daily life (breakfast, lunch, dinner) in normal. The same strategy is also applied on a smaller database for extending the model to type 2 diabetes
  // This model originates from BioModels Database: A Database of Annotated Published Models (http://www.ebi.ac.uk/biomodels/). It is copyright (c) 2005-2011 The BioModels.net Team.
  // For more information see the terms of use .
  // To cite BioModels Database, please use: Li C, Donizelli M, Rodriguez N, Dharuri H, Endler L, Chelliah V, Li L, He E, Henry A, Stefan MI, Snoep JL, Hucka M, Le Novère N, Laibe C (2010) BioModels Database: An enhanced, curated and annotated resource for published quantitative kinetic models. BMC Syst Biol., 4:92.
  // biomodels.db:MODEL1110030000
  // biomodels.db:BIOMD0000000379
  // isDescribedBy pubmed:17926672
  // occursIn taxonomy:9606
  // isPartOf biomodels.db:BIOMD0000000356
  // isVersionOf GO:0061178

  // Compartments:
  compartment Compartment1 = 1; Compartment1 is "default";

  // Species:
  species G_p in Compartment1 = 178/Compartment1;  // isVersionOf CHEBI:17234
  species G_t in Compartment1 = 135/Compartment1;  // isVersionOf CHEBI:17234
  species I_l in Compartment1 = 4.5/Compartment1;  // isVersionOf uniprot:P01308
  species I_p in Compartment1 = 1.25/Compartment1;  // isVersionOf uniprot:P01308
  species Q_sto1 in Compartment1 = 78000/Compartment1;  // isVersionOf CHEBI:17234
  species Q_gut in Compartment1 = 0;  // CHEBI:17234
  species I_1 in Compartment1 = 25/Compartment1;  // isVersionOf uniprot:P01308
  species I_d in Compartment1 = 25/Compartment1;
  species X in Compartment1 = 0;  // isVersionOf uniprot:P01308
  species I_po in Compartment1 = 3.6/Compartment1;  // isVersionOf uniprot:P01308
  species Y in Compartment1 = 0;
  species Q_sto2 in Compartment1 = 0;  // isVersionOf CHEBI:17234

  // Parameters:
  V_G = 1.88;
  k_1 = 0.065;
  k_2 = 0.079;
  G_b = 95;
  V_I = 0.05;
  m_1 = 0.19;
  m_2 = 0.484;
  m_4 = 0.194;
  m_5 = 0.0304;
  m_6 = 0.6471;
  HE_b = 0.6;
  I_b = 25;
  S_b = 1.8;
  S_b_minus = -1.8;
  k_max = 0.0558;
  k_min = 0.008;
  k_abs = 0.057;
  k_gri = 0.0558;
  f = 0.9;
  b = 0.82;
  d = 0.01;
  BW = 78;
  k_p1 = 2.7;
  k_p2 = 0.0021;
  k_p3 = 0.009;
  k_p4 = 0.0618;
  k_i = 0.0079;
  U_ii = 1;
  V_m0 = 2.5;
  V_mX = 0.047;
  K_m0 = 225.59;
  p_2U = 0.0331;
  part = 0.2;
  K = 2.3;
  alpha = 0.05;
  beta = 0.11;
  gamma = 0.5;
  k_e1 = 0.0005;
  k_e2 = 339;
  D = 78000;

  // Assignment rules:
  aa := 5/2/(1 - b)/D;
  cc := 5/2/d/D;
  EGP := k_p1 - k_p2*G_p - k_p3*I_d - k_p4*I_po;
  V_mmax := (1 - part)*(V_m0 + V_mX*X);
  U_idm := V_mmax*G_t/(K_m0 + G_t);
  E := 0;
  S := gamma*I_po;
  I := I_p/V_I;
  G := G_p/V_G;
  HE := -m_5*S + m_6;
  m_3 := HE*m_1/(1 - HE);
  Q_sto := Q_sto1 + Q_sto2;
  Ra := f*k_abs*Q_gut/BW;
  k_empt := k_min + (k_max - k_min)/2*(tanh(aa*(Q_sto - b*D)) - tanh(cc*(Q_sto - d*D)) + 2);
  U_id := U_idm;
  U := U_ii + U_id;
  S_po := Y + K*(EGP + Ra - E - U_ii - k_1*G_p + k_2*G_t)/V_G + S_b;

  // Rate rules:
  G_p' = EGP + Ra - E - U_ii - k_1*G_p + k_2*G_t;
  G_t' = -U_id + k_1*G_p - k_2*G_t;
  I_l' = -m_1*I_l - m_3*I_l + m_2*I_p + S;
  I_p' = -m_2*I_p - m_4*I_p + m_1*I_l;
  Q_sto1' = -k_gri*Q_sto1;
  Q_sto2' = -k_empt*Q_sto2 + k_gri*Q_sto1;
  Q_gut' = -k_abs*Q_gut + k_empt*Q_sto2;
  I_1' = -k_i*(I_1 - I);
  I_d' = -k_i*(I_d - I_1);
  X' = -p_2U*X + p_2U*(I - I_b);
  I_po' = -gamma*I_po + S_po;
  Y' = -alpha*(Y - beta*(G - G_b));
end
