// SBML level 2 version 4

model Ayati2010_BoneRemodelingDynamics_WithTumourDrugTreatment()
  // Ayati2010_BoneRemodelingDynamics_WithTumour+DrugTreatment
  // This a model from the article:
  // A mathematical model of bone remodeling dynamics for normal bone cell populations and myeloma bone disease
  // Bruce P Ayati, Claire M Edwards, Glenn F Webb and John P Wikswo. Biology Direct 2010 Apr 20;5(28). 20406449 ,
  // Abstract:
  // BACKGROUND: Multiple myeloma is a hematologic malignancy associated with the development of a destructive osteolytic bone disease. RESULTS: Mathematical models are developed for normal bone remodeling and for the dysregulated bone remodeling that occurs in myeloma bone disease. The models examine the critical signaling between osteoclasts (bone resorption) and osteoblasts (bone formation). The interactions of osteoclasts and osteoblasts are modeled as a system of differential equations for these cell populations, which exhibit stable oscillations in the normal case and unstable oscillations in the myeloma case. In the case of untreated myeloma, osteoclasts increase and osteoblasts decrease, with net bone loss as the tumor grows. The therapeutic effects of targeting both myeloma cells and cells of the bone marrow microenvironment on these dynamics are examined. CONCLUSIONS: The current model accurately reflects myeloma bone disease and illustrates how treatment approaches may be investigated using such computational approaches.
  // The paper describes three models 1) Zero-dimensional Bone Model without Tumou r, 2) Zero-dimensional Bone Model with Tumour and 3) Zero-dimensional Bone Model with Tumour and Drug Treatment. This model corresponds to the Zero-dimensional Bo ne Model with Tumour and Drug Treatment.
  // Typos in the publication:
  // Equation (4): The first term should be (β1/α1)^(g12/Γ) and not (β2/α2)^(g12/Γ)
  // Equation (14): The first term should be (β1/α1)^(((g12/(1+r12))/Γ) and not (β2/α2)^(((g12/(1+r12))/Γ)
  // Equation (13): The first term should be (β1/α1)^((1-g22+r22)/Γ) and not (β1/α1)^((1-g22-r22)/Γ)
  // All these corrections has been implemented in the model, with the authors agreement.
  // Beyond these, there are several mismatches between the equation numbers that are mentioned in for each equation and the reference that has been made to these equations in the figure legend.
  // biomodels.db:MODEL1112060002
  // biomodels.db:BIOMD0000000403
  // isDescribedBy pubmed:20406449
  // isVersionOf GO:0046849 DOID:9538
  // isDerivedFrom biomodels.db:BIOMD0000000148 biomodels.db:BIOMD0000000279
  // occursIn taxonomy:7711

  // Compartments:
  compartment Compartment = 1;  // isVersionOf BTO:0000140

  // Species:
  species C in Compartment = 13; C is "Osteoclasts";  // isVersionOf BTO:0000968
  species B in Compartment = 300; B is "Osteoblasts";  // isVersionOf BTO:0001593
  species z in Compartment = 100; z is "BoneMass";  // isVersionOf PATO:0000125
  species Tumour in Compartment = 1;  // isVersionOf BTO:0002101

  // Parameters:
  alpha1 = 3;
  beta1 = 0.2;
  alpha2 = 4;
  beta2 = 0.02;
  k1 = 0.0748;
  k2 = 0.0006395;
  g11 = 1.1;
  g21 = -0.5;
  g12 = 1;
  g22 = 0;
  gammaT = 0.005;
  LT = 100;
  r11 = 0.005;
  r21 = 0;
  r12 = 0;
  r22 = 0.2;
  v1 = 0.001;
  v2 = 0.008;

  // Assignment rules:
  y1 := piecewise(C - C_bar, C > C_bar, 0);
  y2 := piecewise(B - B_bar, B > B_bar, 0);
  C_bar := (beta1/alpha1)^((1 - g22 + r22)/gamma)*(beta2/alpha2)^(g21*(1 + r21)/gamma);
  B_bar := (beta1/alpha1)^(g12/(1 + r12)/gamma)*(beta2/alpha2)^((1 - g11*(1 + r11))/gamma);
  gamma := g12/(1 + r12)*g21*(1 + r21) - (1 - g11*(1 + r11))*(1 - g22 + r22);
  V1 := piecewise(v1, time >= 600, 0);
  V2 := piecewise(v2, time >= 600, 0);

  // Rate rules:
  C' = alpha1*C^(g11*(1 + r11*Tumour/LT))*B^(g21*(1 + r21*Tumour/LT)) - beta1*C;
  B' = alpha2*C^(g12/(1 + r12*Tumour/LT))*B^(g22 - r22*Tumour/LT) - (beta2 - V1)*B;
  z' = k2*y2 - k1*y1;
  Tumour' = (gammaT - V2)*Tumour*ln(LT/Tumour);
end
