// SBML level 2 version 4

model Faratian2009_PTENrole_TrastuzumabResistance()
  // This model is from the article:
  // Systems biology reveals new strategies for personalizing cancer medicine and confirms the role of PTEN in resistance to trastuzumab.
  // Faratian D, Goltsov A, Lebedeva G, Sorokin A, Moodie S, Mullen P, Kay C, Um IH, Langdon S, Goryanin I, Harrison DJ Cancer Res. 2009; 69(16): 6713-20 19638581 ,
  // Abstract:
  // Resistance to targeted cancer therapies such as trastuzumab is a frequent clinical problem not solely because of insufficient expression of HER2 receptor but also because of the overriding activation states of cell signaling pathways. Systems biology approaches lend themselves to rapid in silico testing of factors, which may confer resistance to targeted therapies. Inthis study, we aimed to develop a new kinetic model that could be interrogated to predict resistance to receptor tyrosine kinase (RTK) inhibitor therapies and directly test predictions in vitro and in clinical samples. The new mathematical model included RTK inhibitor antibody binding, HER2/HER3 dimerization and inhibition, AKT/mitogen-activated protein kinase cross-talk, and the regulatory properties of PTEN. The model was parameterized using quantitative phosphoprotein expression data from cancer cell lines using reverse-phase protein microarrays. Quantitative PTEN protein expression was found to be the key determinant of resistance to anti-HER2 therapy in silico, which was predictive of unseen experiments in vitro using the PTEN inhibitor bp(V). When measured in cancer cell lines, PTEN expression predicts sensitivity to anti-HER2 therapy; furthermore, this quantitative measurement is more predictive of response (relative risk, 3.0; 95% confidence interval, 1.6-5.5; P < 0.0001) than other pathway components taken in isolation and when tested by multivariate analysis in a cohort of 122 breast cancers treated with trastuzumab. For the first time, a systems biology approach has successfully been used to stratify patients for personalized therapy in cancer and is further compelling evidence that PTEN, appropriately measured in the clinical setting, refines clinical decision making in patients treated with anti-HER2 therapies.
  // To the extent possible under law, all copyright and related or neighbouring rights to this encoded model have been dedicated to the public domain worldwide. Please refer to CC0 Public Domain Dedication for more information.
  // In summary, you are entitled to use this encoded model in absolutely any manner you deem suitable, verbatim, or with modification, alone or embedded it in a larger context, redistribute it, commercially or not, in a restricted way or not.
  // To cite BioModels Database, please use: Li C, Donizelli M, Rodriguez N, Dharuri H, Endler L, Chelliah V, Li L, He E, Henry A, Stefan MI, Snoep JL, Hucka M, Le Novère N, Laibe C (2010) BioModels Database: An enhanced, curated and annotated resource for published quantitative kinetic models. BMC Syst Biol., 4:92.
  // biomodels.db:MODEL1108180000
  // biomodels.db:BIOMD0000000424
  // isDescribedBy pubmed:19638581
  // isDescribedBy GO:0042493
  // isDerivedFrom biomodels.db:BIOMD0000000146 biomodels.db:BIOMD0000000048
  // occursIn BTO:0000356

  // Compartments:
  compartment Default = 1;  // GO:0005886

  // Species:
  species E3 in Default = 80;  // isVersionOf ec-code:2.7.10.1 uniprot:P21860
  species PI3K_LY in Default = 0;  // hasPart GO:0005942 chembl.compound:CHEMBL98350
  species E3H in Default = 0;  // hasPart ec-code:2.7.10.1 uniprot:Q02297 uniprot:P21860
  species E2 in Default = 100;  // isVersionOf ec-code:2.7.10.1 uniprot:P04626
  species E23H in Default = 0;  // hasPart ec-code:2.7.10.1 uniprot:P21860 uniprot:Q02297 uniprot:P04626
  species E23HP in Default = 0;  // hasPart ec-code:2.7.10.1 uniprot:P04626 uniprot:Q02297 uniprot:P21860; isVersionOf kegg.compound:C00562
  species Shc in Default = 100;  // uniprot:P29353
  species E23HP_Shc in Default = 0;  // isVersionOf kegg.compound:C00562; hasPart ec-code:2.7.10.1 uniprot:P21860 uniprot:Q02297 uniprot:P04626
  species E23HP_ShcP in Default = 0;  // hasPart ec-code:2.7.10.1 uniprot:P29353 uniprot:P04626 uniprot:Q02297; isVersionOf kegg.compound:C00562
  species GS in Default = 100;  // hasPart uniprot:P62993 uniprot:Q07889 uniprot:Q07890
  species E23HP_ShGS in Default = 0;  // hasPart ec-code:2.7.10.1 uniprot:P29353 uniprot:P04626 uniprot:Q02297; isVersionOf kegg.compound:C00562
  species E2_Per in Default = 0;  // isVersionOf ec-code:2.7.10.1; hasPart uniprot:P04626 insdc:AAC37531.1 chembl.compound:CHEMBL2007641
  species PTEN_bpV in Default = 0;  // hasPart uniprot:P60484 insdc:AAH05821.1 pubchem.compound:16760324
  species RasGDP in Default = 120;  // hasPart CHEBI:17552 uniprot:P01116
  species PI3Ka_PIP3 in Default = 0;  // hasPart GO:0005942 pubchem.compound:24755492
  species Raf in Default = 100;  // isVersionOf uniprot:P04049
  species E23H_C in Default = 0;  // hasPart ec-code:2.7.10.1 uniprot:P04626 uniprot:Q02297 uniprot:P21860; occursIn GO:0005737
  species MEK in Default = 10;  // isVersionOf uniprot:Q02750
  species MEKP in Default = 0;  // isVersionOf uniprot:Q02750 kegg.compound:C00562
  species PP2A in Default = 10;  // isVersionOf uniprot:P63151
  species MEKP_PP2A in Default = 0;  // hasPart uniprot:P63151 uniprot:Q02750; isVersionOf kegg.compound:C00562
  species MEK_PP2A in Default = 0;  // hasPart uniprot:P63151 uniprot:Q02750
  species Akt_PIP3_PP2A in Default = 0;  // hasPart uniprot:P31749 uniprot:P63151 pubchem.compound:24755492
  species MEKPP_PP2A in Default = 0;  // hasPart uniprot:P63151 uniprot:Q02750; isVersionOf kegg.compound:C00562
  species ERK in Default = 10;  // isVersionOf uniprot:P27361
  species ERKP in Default = 0;  // isVersionOf uniprot:P27361 kegg.compound:C00562
  species E3H_C in Default = 0;  // occursIn GO:0005737; hasPart ec-code:2.7.10.1 uniprot:P21860 uniprot:Q02297
  species PI3K in Default = 200;  // isVersionOf GO:0005942
  species E23HP_PI3K in Default = 0;  // isVersionOf kegg.compound:C00562 GO:0005942; hasPart ec-code:2.7.10.1 uniprot:P21860 uniprot:Q02297 uniprot:P04626
  species Akt_PIP3 in Default = 0;  // hasPart uniprot:P31749 pubchem.compound:24755492
  species PI3Ka in Default = 0;  // isVersionOf GO:0005942
  species PI2 in Default = 300;  // isVersionOf CHEBI:15552 kegg.compound:C01312
  species Akt_PI_P_PP2A in Default = 0;  // hasPart uniprot:P63151 uniprot:P31749 pubchem.compound:24755492; isVersionOf kegg.compound:C00562
  species PTEN in Default = 42.7798;  // isVersionOf ec-code:3.1.3.16 uniprot:P60484 kegg.compound:C05981
  species PIP3 in Default = 8.05772e-12;  // isVersionOf CHEBI:16618 kegg.compound:C05981 pubchem.compound:24755492
  species PTEN_PIP3 in Default = 3.14554e-8;  // hasPart uniprot:P60484 pubchem.compound:24755492
  species PTEN_PI in Default = 5.02914e-8;  // hasPart CHEBI:15552 uniprot:P60484
  species PTENP in Default = 3.39885;  // isVersionOf uniprot:P60484 kegg.compound:C00562
  species PTENP_PTEN in Default = 0.955337;  // isVersionOf uniprot:P60484 kegg.compound:C00562 GO:0043234
  species Akt_PI_P in Default = 0;  // isVersionOf kegg.compound:C00562; hasPart uniprot:P31749 pubchem.compound:24755492
  species Akt in Default = 100;  // isVersionOf uniprot:P31749
  species E23HP_PI3Ka in Default = 0;  // isVersionOf kegg.compound:C00562 GO:0005942; hasPart uniprot:P21860 uniprot:Q02297 uniprot:P04626
  species PTEN_PTEN in Default = 0.955337;  // isVersionOf uniprot:P60484 GO:0043234
  species PI3Ka_PI in Default = 0;  // hasPart CHEBI:15552 CHEBI:16618
  species MEKPP in Default = 0;  // isVersionOf uniprot:Q02750 kegg.compound:C00562
  species Akt_PI_PP in Default = 0;  // hasPart uniprot:P31749 pubchem.compound:24755492; isVersionOf kegg.compound:C00562
  species Akt_PI_PP_PP2A in Default = 0;  // hasPart uniprot:P31749 uniprot:P63151 pubchem.compound:24755492; isVersionOf kegg.compound:C00562
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  species Per in Default = 0;  // isVersionOf chembl.compound:CHEMBL2007641
  species ShGS in Default = 0;  // hasPart uniprot:Q07890 uniprot:Q07889 uniprot:P62993 uniprot:P29353
  species E2Per in Default = 0;  // hasPart uniprot:P04626 chembl.compound:CHEMBL2007641; occursIn GO:0005737
  species ERKPP in Default = 0;  // isVersionOf uniprot:P27361 kegg.compound:C00562
  species Rafa in Default = 0;  // isVersionOf uniprot:P04049
  species RasGTP in Default = 0;  // hasPart CHEBI:15996 uniprot:P01116
  species ShcP in Default = 0;  // isVersionOf uniprot:P29353 kegg.compound:C00562
  species HRG in Default = 3000;  // isVersionOf uniprot:Q02297

  // Parameters:
  mu = 0;
  scal = 1;
  scall = 0.6;
  scalll = 30;
  tE3P_max = 65;
  tERKP_max = 10;
  pAkt_max = 91;
  E3_0 = 0;
  PI0 = 70;
  Akt0 = 10;
  bpV = 0;
  LY = 0;
  PI3K_CY = 0;
  k1 = 0.005;
  Kd_1 = 600;
  k2 = 10;
  Kd_2 = 10;
  k51 = 0.01;
  k53 = 0.01;
  k3 = 1;
  Kd_3 = 0.1;
  V4 = 10;
  K4 = 50;
  k5 = 0.06;
  Kd_5 = 1;
  k6 = 12;
  k_6 = 3;
  k7 = 36;
  Kd_7 = 9;
  k8 = 12;
  Kd_8 = 0.1;
  k9 = 35;
  k_9 = 0;
  V10 = 0.0154;
  K10 = 340;
  k27 = 3;
  Kd_27 = 1;
  k28 = 300;
  k_28 = 0;
  k29 = 13520;
  k_29 = 0;
  V30 = 900;
  k11 = 6;
  K11 = 0.18;
  V12 = 3;
  K12 = 0.1;
  k13 = 1;
  K13 = 11.7;
  k14 = 0.6;
  K14 = 50;
  E_raf = 7;
  k15 = 2.1;
  K15 = 1;
  k16 = 0.06;
  Kd_16 = 1;
  k16_kat = 0.6;
  k18 = 0.6;
  k22 = 0.06;
  k23 = 1.2;
  K23 = 10;
  V24 = 1.8;
  K24 = 10;
  k31 = 0.03;
  K_d31 = 100;
  k55 = 30;
  k56 = 30;
  k32 = 8000;
  Kd_32 = 0.01;
  k33 = 15;
  k34 = 3.6;
  V35 = 150;
  K35 = 2;
  k36 = 1;
  Kd_36 = 2.2;
  k37 = 150;
  k38 = 150;
  k39 = 15000;
  Kd_39 = 20;
  V40 = 15000;
  K40 = 0.1;
  k41 = 3;
  Kd_41 = 0.1;
  k42 = 45;
  k43 = 30;
  k47 = 0.3;
  k48 = 0.001;
  k49 = 0.003;
  Kd_49 = 20000;
  k50 = 0.6;
  k_50 = 0.012;
  k57 = 100;
  Kd_57 = 10;
  k58 = 100;
  Kd_58 = 80;
  sens = 0;
  Pool_1_ = 2900;
  Pool_2_ = -2920;
  Pool_3_ = 200;
  Pool_4_ = 50;
  Pool_5_ = 300;
  Pool_6_ = 0;
  Pool_7_ = 10;
  Pool_8_ = 100;
  Pool_9_ = 10;
  Pool_10_ = 10;
  Pool_11_ = 100;
  Pool_12_ = 120;
  Pool_13_ = 100;
  Pool_14_ = 100;

  // Assignment rules:
  tE3P := (E23HP + E23HP_PI3K + E23HP_PI3Ka + E23HP_Shc + E23HP_ShcP + E23HP_ShGS)/tE3P_max;
  tPTEN := PTENP + PTEN + PTENP_PTEN + PTEN_PTEN + PTEN_PIP3 + PTEN_PI;
  tPTENP := PTENP/7.6;
  pAkt := (Akt_PI_PP + Akt_PI_P + Akt_PI_PP_PP2A + Akt_PI_P_PP2A)/pAkt_max;
  tERKP := (ERKP + ERKPP)/tERKP_max;

  // Reactions:
  R1: E3 + HRG => E3H; k1*(E3*HRG - Kd_1*E3H);  // fast
  R2: E2 + E3H => E23H; k2*(E3H*E2 - Kd_2*E23H);  // fast
  R3: E23H => E23HP; k3*(E23H - Kd_3*E23HP);  // fast
  R4: E23HP => E23H; V4*E23HP/(K4 + E23HP);  // fast
  R5: E23HP + Shc => E23HP_Shc; k5*(E23HP*Shc - Kd_5*E23HP_Shc);  // fast
  R6: E23HP_Shc => E23HP_ShcP; k6*E23HP_Shc - k_6*E23HP_ShcP;  // fast
  R7: E23HP_ShcP + GS => E23HP_ShGS; k7*(E23HP_ShcP*GS - Kd_7*E23HP_ShGS);  // fast
  R8: E23HP_ShGS => E23HP + ShGS; k8*(E23HP_ShGS - Kd_8*E23HP*ShGS);  // fast
  R9: ShGS => GS + ShcP; k9*(ShGS - k_9*ShcP*GS);  // fast
  R10: ShcP => Shc; V10*ShcP/(K10 + ShcP);  // fast
  R11: RasGDP => RasGTP; k11*RasGDP*ShGS/(K11 + RasGDP);  // modifiers: ShGS; fast
  R12: RasGTP => RasGDP; V12*RasGTP/(K12 + RasGTP);  // fast
  R13: Raf => Rafa; k13*Raf*RasGTP/(K13 + Raf);  // modifiers: RasGTP; fast
  R14: Rafa => Raf; k14*Rafa*(Akt_PI_PP + E_raf)/(Rafa + K14);  // modifiers: Akt_PI_PP; fast
  R15: MEK => MEKP; k15*MEK*Rafa/(K15 + MEK);  // modifiers: Rafa; fast
  R16_1: MEKP + PP2A => MEKP_PP2A; k16*MEKP*PP2A;  // fast
  R16_2: MEKP_PP2A => MEK_PP2A; k16_kat*MEKP_PP2A;  // fast
  R16_3: MEK_PP2A => MEK + PP2A; k18*MEK_PP2A;  // fast
  R17_1: MEKP => MEKPP; k15*MEKP*Rafa/(K15 + MEKP);  // modifiers: Rafa; fast
  R18_1: MEKPP + PP2A => MEKPP_PP2A; k16*(PP2A*MEKPP - Kd_16*MEKPP_PP2A);  // fast
  R18_2: MEKPP_PP2A => MEKP_PP2A; k16_kat*MEKPP_PP2A;  // fast
  R18_3: MEKP_PP2A => MEKP + PP2A; k22*MEKP_PP2A;  // fast
  R19: ERK => ERKP; k23*ERK*MEKPP/(K23 + ERK);  // modifiers: MEKPP; fast
  R20: ERKP => ERK; V24*ERKP/(K24 + ERKP);  // fast
  R21: ERKP => ERKPP; k23*ERKP*MEKPP/(K23 + ERKP);  // modifiers: MEKPP; fast
  R22: ERKPP => ERKP; V24*ERKPP/(K24 + ERKPP);  // fast
  R23: E23HP + PI3K => E23HP_PI3K; k27*(E23HP*PI3K - Kd_27*E23HP_PI3K);  // fast
  R24: E23HP_PI3K => E23HP_PI3Ka; k28*(E23HP_PI3K - k_28*E23HP_PI3Ka);  // fast
  R25: E23HP_PI3Ka => E23HP + PI3Ka; k29*E23HP_PI3Ka - k_29*E23HP*PI3Ka;  // fast
  R26: PI3Ka => PI3K; V30*PI3Ka;  // fast
  R27_1: PI2 + PI3Ka => PI3Ka_PI; k31*(PI2*PI3Ka - K_d31*PI3Ka_PI);  // fast
  R28_1: PIP3 + PTEN => PTEN_PIP3; k32*(PIP3*PTEN - Kd_32*PTEN_PIP3);  // fast
  R28_2: PTEN_PIP3 => PTEN_PI; k33*PTEN_PIP3;  // fast
  R28_3: PTEN_PI => PI2 + PTEN; k34*PTEN_PI;  // fast
  R28_4: PTEN => PTENP; V35*PTEN/(K35 + PTEN);  // fast
  R28_5: PTEN + PTENP => PTENP_PTEN; k36*(PTEN*PTENP - Kd_36*PTENP_PTEN);  // fast
  R28_6: PTENP_PTEN => PTEN_PTEN; k37*PTENP_PTEN;  // fast
  R28_7: PTEN_PTEN => 2 PTEN; k38*PTEN_PTEN;  // fast
  R29: Akt + PIP3 => Akt_PIP3; k39*(PIP3*Akt - Kd_39*Akt_PIP3);  // fast
  R30: Akt_PIP3 => Akt_PI_P; V40*Akt_PIP3/(K40 + Akt_PIP3);  // fast
  R31_1: Akt_PI_P + PP2A => Akt_PI_P_PP2A; k41*Akt_PI_P*PP2A;  // fast
  R31_2: Akt_PI_P_PP2A => Akt_PIP3_PP2A; k42*Akt_PI_P_PP2A;  // fast
  R31_3: Akt_PIP3_PP2A => Akt_PIP3 + PP2A; k43*Akt_PIP3_PP2A;  // fast
  R32: Akt_PI_P => Akt_PI_PP; V40*Akt_PI_P/(K40 + Akt_PI_P);  // fast
  R33_1: Akt_PI_PP + PP2A => Akt_PI_PP_PP2A; k41*(Akt_PI_PP*PP2A - Kd_41*Akt_PI_PP_PP2A);  // fast
  R33_2: Akt_PI_PP_PP2A => Akt_PI_P_PP2A; k42*Akt_PI_PP_PP2A;  // fast
  R33_3: Akt_PI_P_PP2A => Akt_PI_P + PP2A; k47*Akt_PI_P_PP2A;  // fast
  R34: E23HP => ; k48*E23HP;  // fast
  R35: E2 + Per => E2_Per; k49*(Per*E2 - Kd_49*E2_Per);  // fast
  R36: E2_Per => E2Per; k50*E2_Per - k_50*E2Per;  // fast
  R37: E3H => E3H_C; k51*E3H;  // fast
  R38: E2 + E3H_C => E23H; k2*(E3H_C*E2 - Kd_2*E23H);  // fast
  R39: E23H => E23H_C; k53*E23H;  // fast
  R40: E23H_C => E23HP; k3*(E23H_C - Kd_3*E23HP);  // fast
  R41: PI3Ka_PI => PI3Ka_PIP3; k55*PI3Ka_PI;  // fast
  R42: PI3Ka_PIP3 => PI3Ka + PIP3; k56*PI3Ka_PIP3;  // fast
  R43: PTEN => PTEN_bpV; k57*(PTEN*bpV - Kd_57*PTEN_bpV);  // fast
  R44: PI3K => PI3K_LY; k58*(PI3K*LY - Kd_58*PI3K_LY);  // fast
end
