// SBML level 2 version 4

model MODEL1303060000()
  // Ray2013 - Meiotic initiation in S. cerevisiae
  // A mathematical representation of early meiotic events, particularly feedback mechanisms at the system level and phosphorylation of signalling molecules for regulating protein activities, is described here
  // This model is described in the article:
  // Dynamic modeling of yeast meiotic initiation.
  // Ray D, Su Y, Ye P.
  // BMC Syst Biol. 2013 May 1;7:37
  // Abstract:
  // BACKGROUND: Meiosis is the sexual reproduction process common to eukaryotes. The diploid yeast Saccharomyces cerevisiae undergoes meiosis in sporulation medium to form four haploid spores. Initiation of the process is tightly controlled by intricate networks of positive and negative feedback loops. Intriguingly, expression of early meiotic proteins occurs within a narrow time window. Further, sporulation efficiency is strikingly different for yeast strains with distinct mutations or genetic backgrounds. To investigate signal transduction pathways that regulate transient protein expression and sporulation efficiency, we develop a mathematical model using ordinary differential equations. The model describes early meiotic events, particularly feedback mechanisms at the system level and phosphorylation of signaling molecules for regulating protein activities.
  // RESULTS: The mathematical model is capable of simulating the orderly and transient dynamics of meiotic proteins including Ime1, the master regulator of meiotic initiation, and Ime2, a kinase encoded by an early gene. The model is validated by quantitative sporulation phenotypes of single-gene knockouts. Thus, we can use the model to make novel predictions on the cooperation between proteins in the signaling pathway. Virtual perturbations on feedback loops suggest that both positive and negative feedback loops are required to terminate expression of early meiotic proteins. Bifurcation analyses on feedback loops indicate that multiple feedback loops are coordinated to modulate sporulation efficiency. In particular, positive auto-regulation of Ime2 produces a bistable system with a normal meiotic state and a more efficient meiotic state.
  // CONCLUSIONS: By systematically scanning through feedback loops in the mathematical model, we demonstrate that, in yeast, the decisions to terminate protein expression and to sporulate at different efficiencies stem from feedback signals toward the master regulator Ime1 and the early meiotic protein Ime2. We argue that the architecture of meiotic initiation pathway generates a robust mechanism that assures a rapid and complete transition into meiosis. This type of systems-level regulation is a commonly used mechanism controlling developmental programs in yeast and other organisms. Our mathematical model uncovers key regulations that can be manipulated to enhance sporulation efficiency, an important first step in the development of new strategies for producing gametes with high quality and quantity.
  // This model is hosted on BioModels Database and identified by: MODEL1303060000 .
  // To cite BioModels Database, please use: BioModels Database: An enhanced, curated and annotated resource for published quantitative kinetic models .
  // To the extent possible under law, all copyright and related or neighbouring rights to this encoded model have been dedicated to the public domain worldwide. Please refer to CC0 Public Domain Dedication for more information.
  // biomodels.db:MODEL1303060000

  // Compartments:
  compartment V = 1; V is "C";

  // Species:
  species Rim11 in V = 0;
  species pUme6 in V = 0;
  species pSok2 in V = 1;
  species Ime1 in V = 0;
  species pIme1 in V = 0;
  species Ime2 in V = 0;

  // Parameters:
  sime1 = 10;
  sime2 = 10;
  sprimeime2 = 3;
  dime1 = 1;
  dprimeime1 = 1;
  dpime1 = 1;
  dime2 = 8;
  prim11 = 0.01;
  urim11 = 0.1;
  pume6 = 0.3;
  uume6 = 0.01;
  psok2 = 0.7;
  usok2 = 1;
  pime1 = 2;
  csok2 = 0.05;
  cime1 = 0.01;
  c1 = 0.01;
  c2 = 1.4;
  c3 = 2;

  // Reactions:
  rim11_1: -> Rim11; V*(urim11*(1 - Rim11) - prim11*Rim11);
  pume6_1: -> pUme6 + Rim11; V*((1 - pUme6)*pume6*Rim11 - uume6*pUme6);
  sok2_1: -> pSok2 + Ime1; V*(csok2/(csok2 + Ime1)*(1 - pSok2)*psok2 - usok2*pSok2);
  ime1_1: => Ime1 + pSok2 + Rim11 + Ime2; V*(cime1/(cime1 + pSok2)*sime1 - (pime1*Ime1*Rim11 + dime1*Ime1 + dprimeime1*Ime2*(Ime1/(c1 + Ime1))));
  pime1_1: => pIme1 + Ime1 + Rim11; V*(pime1*Ime1*Rim11 - dpime1*pIme1);
  ime2_1: -> Ime2 + pUme6 + pIme1; V*(sime2*pUme6*pIme1 + sprimeime2*Ime2^5/(c2^5 + Ime2^5) - dime2*Ime2/(c3 + Ime2));
end
