// SBML level 2 version 4
// dcterms:bibliographicCitation: urn:miriam:pubmed:22004735

function Constant_flux_irreversible(v)
  v;
end
Constant_flux_irreversible is "Constant flux (irreversible)";

model MODEL1303130001()
  // Venkatraman2011 - PLS-UPA behaviour in the presence of substrate competition
  // The posibility of ultrasensitivity and bistable activation of PLS (Plasmin) and UPA (Urokinase-type plasminogen activator) in the presence of substrate competition is explained here using a mathematical model.
  // This model is described in the article:
  // Steady states and dynamics of urokinase-mediated plasmin activation in silico and in vitro.
  // Venkatraman L, Li H, Dewey CF Jr, White JK, Bhowmick SS, Yu H, Tucker-Kellogg L.
  // Biophys J. 2011 Oct 19;101(8):1825-34.
  // Abstract:
  // Plasmin (PLS) and urokinase-type plasminogen activator (UPA) are ubiquitous proteases that regulate the extracellular environment. Although they are secreted in inactive forms, they can activate each other through proteolytic cleavage. This mutual interplay creates the potential for complex dynamics, which we investigated using mathematical modeling and in vitro experiments. We constructed ordinary differential equations to model the conversion of precursor plasminogen into active PLS, and precursor urokinase (scUPA) into active urokinase (tcUPA). Although neither PLS nor UPA exhibits allosteric cooperativity, modeling showed that cooperativity occurred at the system level because of substrate competition. Computational simulations and bifurcation analysis predicted that the system would be bistable over a range of parameters for cooperativity and positive feedback. Cell-free experiments with recombinant proteins tested key predictions of the model. PLS activation in response to scUPA stimulus was found to be cooperative in vitro. Finally, bistability was demonstrated in vitro by the presence of two significantly different steady-state levels of PLS activation for the same levels of stimulus. We conclude that ultrasensitive, bistable activation of UPA-PLS is possible in the presence of substrate competition. An ultrasensitive threshold for activation of PLS and UPA would have ramifications for normal and disease processes, including angiogenesis, metastasis, wound healing, and fibrosis.
  // The cooperativity parameter "ci" was missing in the original model. The parameter "ci" has been added to the added.
  // This model is hosted on BioModels Database and identified by: MODEL1303130001 .
  // To cite BioModels Database, please use: BioModels Database: An enhanced, curated and annotated resource for published quantitative kinetic models .
  // To the extent possible under law, all copyright and related or neighbouring rights to this encoded model have been dedicated to the public domain worldwide. Please refer to CC0 Public Domain Dedication for more information.
  // isDescribedBy pubmed:22004735
  // biomodels.db:MODEL1303130001

  // Compartments:
  compartment compartment_1 = 1;

  // Species:
  species plg in compartment_1 = 0.01;
  species pls in compartment_1 = 0;
  species scupa in compartment_1 = 0.002;
  species tcupa in compartment_1 = 0;
  species X in compartment_1 = 0.2;
  species Xpls in compartment_1 = 0;

  // Parameters:
  u1 = 0.084;
  u2 = 0.032;
  u3 = 0.0032;
  alpha1 = 0.0032;
  alpha2 = 0.01;
  alpha3 = 0.01;
  keff_zymogen = 0.035;
  keff_PLS = 40;
  keff_pos = 0.9;
  k1 = 50;
  k_1 = 0.016;
  k2 = 0.02;
  ci = 1;

  // Reactions:
  reaction_1: scupa + plg => pls + scupa; compartment_1*keff_zymogen*scupa*plg;
  reaction_2: pls + scupa => tcupa + pls; compartment_1*keff_PLS*pls^ci*scupa;
  reaction_3: tcupa + plg => pls + tcupa; compartment_1*keff_pos*tcupa*plg;
  reaction_4: scupa => ; compartment_1*u1*scupa;
  reaction_5: plg => ; compartment_1*u2*plg;
  reaction_6: pls => ; compartment_1*u1*pls;
  reaction_7: tcupa => ; compartment_1*u1*tcupa;
  reaction_8: pls + X -> Xpls; compartment_1*(k1*pls*X - k_1*Xpls);
  reaction_9: Xpls => pls; compartment_1*k2*Xpls;
  reaction_10: X => ; compartment_1*u2*X;
  reaction_11: Xpls => ; compartment_1*u2*Xpls;
  reaction_12: => scupa; compartment_1*Constant_flux_irreversible(alpha1);
  reaction_13: => plg; compartment_1*Constant_flux_irreversible(alpha2);
  reaction_14: => X; compartment_1*Constant_flux_irreversible(alpha3);

  // Unit definitions:
  unit substance = 1e-6 mole;
end
