// SBML level 2 version 4

model MODEL1304190001()
  // Mufudza2012 - Estrogen effect on the dynamics of breast cancer
  // biomodels.db:MODEL1304190001

  // Compartments:
  compartment Tissue = 1;

  // Species:
  species H in Tissue = 1; H is "normal cells";
  species T in Tissue = 1e-5; T is "Tumour cells";
  species I in Tissue = 1.37931; I is "Immune cells";
  species E in Tissue = 2; E is "17-beta estradiol";

  // Parameters:
  alpha1 = 0.7;
  alpha2 = 0.98;
  beta1 = 0.3;
  beta2 = 0.4;
  delta1 = 1;
  gamma2 = 0.9;
  s = 0.4;
  rho = 0.2;
  omega = 0.3;
  mu = 0.29;
  alpha3 = 1;
  gamma3 = 0.085;
  sigma1 = 1.2;
  sigma2 = 0.94;
  sigma3 = 0.3;
  v = 0.4;
  theta = 0.8;
  pi = 0.3;

  // Rate rules:
  H' = H*(alpha1 - beta1*H - delta1*T) - sigma1*H*E;
  T' = T*(alpha3 - beta2*T) - gamma2*I*T + sigma2*H*E;
  I' = s + rho*I*T/(omega + T) - gamma3*I*T - mu*I - sigma3*I*E/(v + E);
  E' = pi - theta*E;
end
