<Lems>

    <!-- Specify which component to run -->
    <Target component="sim1"/>

    <!-- Include core NeuroML2 ComponentType definitions -->
    <Include file="Cells.xml"/>
    <Include file="Networks.xml"/>
    <Include file="Simulation.xml"/>

    <Include file="passiveCell.nml"/>

    <pulseGenerator id="pg" delay="50ms" duration="50ms" amplitude="0.1 nA" />

    <network id="net1">
        <population id="pop0" component="passiveCell" size="1"/>
        <explicitInput target="pop0[0]" input="pg" destination="synapses"/>
    </network>

    <!-- End of NeuroML2 content -->

    <Simulation id="sim1" length="150ms" step="0.01ms" target="net1">

        <Display id="d1" title="Voltage" timeScale="1ms" xmin="0" xmax="150" ymin="-90" ymax="60">
            <Line id="v" quantity="pop0[0]/v" scale="1mV"  color="#000000" timeScale="1ms"/>
        </Display>
        <!--
        <Display id="d2" title="Ex1: Simple HH example: rate variables" timeScale="1ms" xmin="0" xmax="150" ymin="-0.1" ymax="1.1">

            <Line id="na_m" quantity="hhpop[0]/naChans/na/m/q" scale="1"  color="#000000" timeScale="1ms"/>
            <Line id="na_h" quantity="hhpop[0]/naChans/na/h/q" scale="1"  color="#ff0000" timeScale="1ms"/>
            <Line id="k_n" quantity="hhpop[0]/kChans/k/n/q" scale="1"  color="#0000ff" timeScale="1ms"/>
        </Display>-->

        <Display id="d3" title="Injected current" timeScale="1ms" xmin="0" xmax="150" ymin="-0.01" ymax=".11">
            <Line id="i" quantity="pop0[0]/pg/i" scale="1nA"  color="#000000" timeScale="1ms"/>
        </Display>

        <OutputFile id="of0" fileName="passive_v.dat">
            <OutputColumn id="v" quantity="pop0[0]/v"/>
        </OutputFile>

    </Simulation>

</Lems>
