// SBML level 2 version 1
// DOQCS : http://doqcs.ncbs.res.in/
//    Accession Name = MAPK_osc
//    Accession Number = 27
//    Transcriber = Sridhar Hariharaputran, NCBS
//    Developer = Boris N. Kholodenko
//    Species = Xenopus
//    Tissue = Oocyte extract
//    Cell Compartment = Cytosol
//    Notes = This MAPK model is based on <a href="http://www.ncbi.nlm.nih.gov/entrez/query.fcgi?cmd=Retrieve&db=pubmed&dopt=Abstract&list_uids=10712587">Boris N. Kholodenko Eur J Biochem. (2000) 267(6):1583-8</a> for data from Xenopus oocytes extracts.
//     Note: All the concentrations are in micro Mole (uM)

model testid()
  // MAPK_osc
  // This MAPK model is based on <a href = "http://www.ncbi.nlm.nih.gov/entrez/query.fcgi?cmd=Retrieve&db=pubmed&dopt=Abstract&list_uids=10712587">Boris N. Kholodenko Eur J Biochem. (2000) 267(6):1583-8</a> for data from Xenopus extracts.

  // Compartments:
  compartment default_compartment = 1e-18;
  compartment geometry = 1.6667e-18;

  // Species:
  species MAPK_slash_MAPK in geometry = 0.3;
  species MAPK_slash_MKKK in geometry = 0.1;
  species MAPK_slash_MKK in geometry = 0.3;
  species MAPK_slash_int1 in geometry = 0.001;
  species MAPK_slash_MKKK_minus_P in geometry = 0;
  species MAPK_slash_int3 in geometry = 0.001;
  species MAPK_slash_int5 in geometry = 0.001;
  species MAPK_slash_MKK_minus_P in geometry = 0;
  species MAPK_slash_MAPK_minus_P in geometry = 0;
  species MAPK_slash_int2 in geometry = 0.001;
  species MAPK_slash_int4 in geometry = 0.001;
  species MAPK_slash_Ras_minus_MKKKK in geometry = 0.001;
  species MAPK_slash_inactiveRas_minus_MKKK in geometry = 0;
  species MAPK_slash_MKK_minus_PP in geometry = 0;
  species MAPK_slash_MAPK_minus_PP in geometry = 0;

  // Reactions:
  // kf*MAPK_slash_MAPK_minus_PP*MAPK_slash_Ras_minus_MKKKK-kb*MAPK_slash_inactiveRas_minus_MKKK
  // From Kholodenko, 2000 Eur J Biochem 267 the Kd is 9 nM. We use a rather fast Kf of 1/sec/uM so that equilibrium is maintained.
  MAPK_slash_Neg_feedback: MAPK_slash_MAPK_minus_PP + MAPK_slash_Ras_minus_MKKKK -> MAPK_slash_inactiveRas_minus_MKKK; kf*MAPK_slash_MAPK_minus_PP*MAPK_slash_Ras_minus_MKKKK - kb*MAPK_slash_inactiveRas_minus_MKKK;
    kf = 1.666667e-18 vol_uMINVsecINV; kb = 1.5e-20 vol_secINV;
  // kcat*MAPK_slash_int1*MAPK_slash_MKKK_minus_P/(Km+MAPK_slash_MKKK_minus_P)
  // Km is 8nM and Vmax is 0.25nM.s-1 from 2000.
  MAPK_slash_int1_slash_2: MAPK_slash_MKKK_minus_P => MAPK_slash_MKKK; MAPK_slash_int1_slash_2_kcat*MAPK_slash_int1*MAPK_slash_MKKK_minus_P/(MAPK_slash_int1_slash_2_Km + MAPK_slash_MKKK_minus_P);  // modifiers: MAPK_slash_int1
    MAPK_slash_int1_slash_2_kcat = 4.166667e-19 vol_secINV; MAPK_slash_int1_slash_2_Km = 0.008 uM1;
  // kcat*MAPK_slash_MKKK_minus_P*MAPK_slash_MKK/(Km+MAPK_slash_MKK)
  // Km is 15 nM and Vmax is 0.025s-1 from 2000
  MAPK_slash_MKKK_minus_P_slash_3: MAPK_slash_MKK => MAPK_slash_MKK_minus_P; MAPK_slash_MKKK_minus_P_slash_3_kcat*MAPK_slash_MKKK_minus_P*MAPK_slash_MKK/(MAPK_slash_MKKK_minus_P_slash_3_Km + MAPK_slash_MKK);  // modifiers: MAPK_slash_MKKK_minus_P
    MAPK_slash_MKKK_minus_P_slash_3_kcat = 4.166667e-20 vol_secINV; MAPK_slash_MKKK_minus_P_slash_3_Km = 0.01500006 uM1;
  // kcat*MAPK_slash_MKKK_minus_P*MAPK_slash_MKK_minus_P/(Km+MAPK_slash_MKK_minus_P)
  // Km is 15nM and Vmax is 0.025s-1 from 2000.
  MAPK_slash_MKKK_minus_P_slash_4: MAPK_slash_MKK_minus_P => MAPK_slash_MKK_minus_PP; MAPK_slash_MKKK_minus_P_slash_4_kcat*MAPK_slash_MKKK_minus_P*MAPK_slash_MKK_minus_P/(MAPK_slash_MKKK_minus_P_slash_4_Km + MAPK_slash_MKK_minus_P);  // modifiers: MAPK_slash_MKKK_minus_P
    MAPK_slash_MKKK_minus_P_slash_4_kcat = 4.166667e-20 vol_secINV; MAPK_slash_MKKK_minus_P_slash_4_Km = 0.01500006 uM1;
  // kcat*MAPK_slash_int3*MAPK_slash_MKK_minus_P/(Km+MAPK_slash_MKK_minus_P)
  // The Km is 15nM and the Vmax is 0.75nM.s-1 from 2000.
  MAPK_slash_int3_slash_6: MAPK_slash_MKK_minus_P => MAPK_slash_MKK; MAPK_slash_int3_slash_6_kcat*MAPK_slash_int3*MAPK_slash_MKK_minus_P/(MAPK_slash_int3_slash_6_Km + MAPK_slash_MKK_minus_P);  // modifiers: MAPK_slash_int3
    MAPK_slash_int3_slash_6_kcat = 1.25e-18 vol_secINV; MAPK_slash_int3_slash_6_Km = 0.015 uM1;
  // kcat*MAPK_slash_int5*MAPK_slash_MAPK_minus_P/(Km+MAPK_slash_MAPK_minus_P)
  // The Km is 15nM and Vmax is 0.5nM.s-1 from 2000
  MAPK_slash_int5_slash_10: MAPK_slash_MAPK_minus_P => MAPK_slash_MAPK; MAPK_slash_int5_slash_10_kcat*MAPK_slash_int5*MAPK_slash_MAPK_minus_P/(MAPK_slash_int5_slash_10_Km + MAPK_slash_MAPK_minus_P);  // modifiers: MAPK_slash_int5
    MAPK_slash_int5_slash_10_kcat = 8.333333e-19 vol_secINV; MAPK_slash_int5_slash_10_Km = 0.0149997 uM1;
  // kcat*MAPK_slash_int2*MAPK_slash_MKK_minus_PP/(Km+MAPK_slash_MKK_minus_PP)
  // The Km is 15nM and Vmax is 0.75nM.s-1 from Kholodenko, 2000
  MAPK_slash_int2_slash_5: MAPK_slash_MKK_minus_PP => MAPK_slash_MKK_minus_P; MAPK_slash_int2_slash_5_kcat*MAPK_slash_int2*MAPK_slash_MKK_minus_PP/(MAPK_slash_int2_slash_5_Km + MAPK_slash_MKK_minus_PP);  // modifiers: MAPK_slash_int2
    MAPK_slash_int2_slash_5_kcat = 1.25e-18 vol_secINV; MAPK_slash_int2_slash_5_Km = 0.015 uM1;
  // kcat*MAPK_slash_int4*MAPK_slash_MAPK_minus_PP/(Km+MAPK_slash_MAPK_minus_PP)
  // The Km is 15nM and Vmax is 0.5nM.s-1 from 2000
  MAPK_slash_int4_slash_9: MAPK_slash_MAPK_minus_PP => MAPK_slash_MAPK_minus_P; MAPK_slash_int4_slash_9_kcat*MAPK_slash_int4*MAPK_slash_MAPK_minus_PP/(MAPK_slash_int4_slash_9_Km + MAPK_slash_MAPK_minus_PP);  // modifiers: MAPK_slash_int4
    MAPK_slash_int4_slash_9_kcat = 8.333333e-19 vol_secINV; MAPK_slash_int4_slash_9_Km = 0.0149997 uM1;
  // kcat*MAPK_slash_Ras_minus_MKKKK*MAPK_slash_MKKK/(Km+MAPK_slash_MKKK)
  // The Km is 10nM and Vmax is 2.5nM sec^-1. We assume that there is 1 nM of the Ras-MKKKK. From Kholodenko, 2000. If the enzymes are not flagged as Available, then this Km should be set to 0.1 to oscillations.
  MAPK_slash_Ras_minus_MKKKK_slash_1: MAPK_slash_MKKK => MAPK_slash_MKKK_minus_P; MAPK_slash_Ras_minus_MKKKK_slash_1_kcat*MAPK_slash_Ras_minus_MKKKK*MAPK_slash_MKKK/(MAPK_slash_Ras_minus_MKKKK_slash_1_Km + MAPK_slash_MKKK);  // modifiers: MAPK_slash_Ras_minus_MKKKK
    MAPK_slash_Ras_minus_MKKKK_slash_1_kcat = 4.166667e-18 vol_secINV; MAPK_slash_Ras_minus_MKKKK_slash_1_Km = 0.01 uM1;
  // kcat*MAPK_slash_MKK_minus_PP*MAPK_slash_MAPK/(Km+MAPK_slash_MAPK)
  // The Km is 15nM which is 0.015uM Vmax is 0.025s-1 from Kholodenko, 2000.
  MAPK_slash_MKK_minus_PP_slash_7: MAPK_slash_MAPK => MAPK_slash_MAPK_minus_P; MAPK_slash_MKK_minus_PP_slash_7_kcat*MAPK_slash_MKK_minus_PP*MAPK_slash_MAPK/(MAPK_slash_MKK_minus_PP_slash_7_Km + MAPK_slash_MAPK);  // modifiers: MAPK_slash_MKK_minus_PP
    MAPK_slash_MKK_minus_PP_slash_7_kcat = 4.166667e-20 vol_secINV; MAPK_slash_MKK_minus_PP_slash_7_Km = 0.01500006 uM1;
  // kcat*MAPK_slash_MKK_minus_PP*MAPK_slash_MAPK_minus_P/(Km+MAPK_slash_MAPK_minus_P)
  // The Km is 15nM which is 0.015uM and Vmax is 0.025s-1 from Kholodenko, 2000
  MAPK_slash_MKK_minus_PP_slash_8: MAPK_slash_MAPK_minus_P => MAPK_slash_MAPK_minus_PP; MAPK_slash_MKK_minus_PP_slash_8_kcat*MAPK_slash_MKK_minus_PP*MAPK_slash_MAPK_minus_P/(MAPK_slash_MKK_minus_PP_slash_8_Km + MAPK_slash_MAPK_minus_P);  // modifiers: MAPK_slash_MKK_minus_PP
    MAPK_slash_MKK_minus_PP_slash_8_kcat = 4.166667e-20 vol_secINV; MAPK_slash_MKK_minus_PP_slash_8_Km = 0.01500006 uM1;

  // Unit definitions:
  unit uM1 = 1e-6 mole / litre;
  unit vol_secINV = litre / second;
  unit vol_uMINVsecINV = litre^2 / (1e-6 mole * second);
  unit substance = 1e-6 mole;
end
